# OpenSim document version 20001
Model Lumbar_C_238:
  length_units: meters
  force_units: N
  gravity: 0 -9.80665 0
  defaults: Thelen2003Muscle default: max_isometric_force=546 optimal_fiber_length=0.0535 tendon_slack_length=0.078
      pennation_angle=0 activation_time_constant=0.01 deactivation_time_constant=0.04 Vmax=10 Vmax0=5
      FmaxTendonStrain=0.033 FmaxMuscleStrain=0.6 KshapeActive=0.5 KshapePassive=4 damping=0.05 Af=0.3 Flen=1.8
  ForceSet:
    Thelen2003Muscle Ps_L1_VB_r: max_isometric_force=97 optimal_fiber_length=0.1841 tendon_slack_length=0.0647
        pennation_angle=0.18675
      PathPoint P1: lumbar1 (-0.0101595 0.02327 0.02)
      PathPoint P2: pelvis (-0.0238 -0.057 0.0759)
    Thelen2003Muscle Ps_L1_TP_r: max_isometric_force=28 optimal_fiber_length=0.1818 tendon_slack_length=0.0639
        pennation_angle=0.18675
      PathPoint P1: lumbar1 (-0.02325 0.0146584 0.02262516)
      PathPoint P2: pelvis (-0.0238 -0.057 0.0759)
    Thelen2003Muscle Ps_L1_L2_IVD_r: max_isometric_force=55.2 optimal_fiber_length=0.166 tendon_slack_length=0.0583
        pennation_angle=0.1867502
      PathPoint P1: lumbar1 (-0.00125362 0.00350798 0.02068341)
      PathPoint P2: pelvis (-0.0238 -0.057 0.0759)
    Thelen2003Muscle Ps_L2_TP_r: max_isometric_force=97 optimal_fiber_length=0.1597 tendon_slack_length=0.0561
        pennation_angle=0.1867502
      PathPoint P1: lumbar2 (-0.02162137 0.01458703 0.02224896)
      PathPoint P2: pelvis (-0.0238 -0.057 0.0759)
    Thelen2003Muscle Ps_L2_L3_IVD_r: max_isometric_force=54.74 optimal_fiber_length=0.144 tendon_slack_length=0.0506
        pennation_angle=0.1867502
      PathPoint P1: lumbar2 (0.00196252 0.00338519 0.02144785)
      PathPoint P2: pelvis (-0.0238 -0.057 0.0759)
    Thelen2003Muscle Ps_L3_TP_r: max_isometric_force=46.46 optimal_fiber_length=0.1394 tendon_slack_length=0.049
        pennation_angle=0.1867502
      PathPoint P1: lumbar3 (-0.02450655 0.0207283 0.02825987)
      PathPoint P2: pelvis (-0.0238 -0.057 0.0759)
    Thelen2003Muscle Ps_L3_L4_IVD_r: max_isometric_force=16.56 optimal_fiber_length=0.1235 tendon_slack_length=0.0434
        pennation_angle=0.1867502
      PathPoint P1: lumbar3 (0.00115193 0.00621063 0.02115333)
      PathPoint P2: pelvis (-0.0238 -0.057 0.0759)
    Thelen2003Muscle Ps_L4_TP_r: max_isometric_force=74 optimal_fiber_length=0.1195 tendon_slack_length=0.042
        pennation_angle=0.1867502
      PathPoint P1: lumbar4 (-0.015649 0.02494645 0.02587684)
      PathPoint P2: pelvis (-0.0238 -0.057 0.0759)
    Thelen2003Muscle Ps_L4_L5_IVD_r: max_isometric_force=36.34 optimal_fiber_length=0.0998 tendon_slack_length=0.0351
        pennation_angle=0.1867502
      PathPoint P1: lumbar4 (0.00541963 0.00394754 0.02059657)
      PathPoint P2: pelvis (-0.0238 -0.057 0.0759)
    Thelen2003Muscle Ps_L5_TP_r: max_isometric_force=79.58 optimal_fiber_length=0.1034 tendon_slack_length=0.0363
        pennation_angle=0.1867502
      PathPoint P1: lumbar5 (-0.00562001 0.02913976 0.02528807)
      PathPoint P2: pelvis (-0.0238 -0.057 0.0759)
    Thelen2003Muscle Ps_L5_VB_r: max_isometric_force=87.86 optimal_fiber_length=0.0903 tendon_slack_length=0.0317
        pennation_angle=0.1867502
      PathPoint P1: lumbar5 (0.01 0.01241 0.019)
      PathPoint P2: pelvis (-0.0238 -0.057 0.0759)
    Thelen2003Muscle Ps_L1_VB_l: max_isometric_force=97 optimal_fiber_length=0.1841 tendon_slack_length=0.0647
        pennation_angle=0.18675
      PathPoint P1: lumbar1 (-0.0101595 0.02327 -0.02)
      PathPoint P2: pelvis (-0.0238 -0.057 -0.0759)
    Thelen2003Muscle Ps_L1_TP_l: max_isometric_force=28 optimal_fiber_length=0.1818 tendon_slack_length=0.0639
        pennation_angle=0.18675
      PathPoint P1: lumbar1 (-0.02325 0.0146584 -0.02263)
      PathPoint P2: pelvis (-0.0238 -0.057 -0.0759)
    Thelen2003Muscle Ps_L1_L2_IVD_l: max_isometric_force=55.2 optimal_fiber_length=0.166 tendon_slack_length=0.0583
        pennation_angle=0.1867502
      PathPoint P1: lumbar1 (-0.00125362 0.00350798 -0.02068)
      PathPoint P2: pelvis (-0.0238 -0.057 -0.0759)
    Thelen2003Muscle Ps_L2_TP_l: max_isometric_force=97 optimal_fiber_length=0.1597 tendon_slack_length=0.0561
        pennation_angle=0.1867502
      PathPoint P1: lumbar2 (-0.02162137 0.01458703 -0.02225)
      PathPoint P2: pelvis (-0.0238 -0.057 -0.0759)
    Thelen2003Muscle Ps_L2_L3_IVD_l: max_isometric_force=54.74 optimal_fiber_length=0.144 tendon_slack_length=0.0506
        pennation_angle=0.1867502
      PathPoint P1: lumbar2 (0.00196252 0.00338519 -0.02145)
      PathPoint P2: pelvis (-0.0238 -0.057 -0.0759)
    Thelen2003Muscle Ps_L3_TP_l: max_isometric_force=46.46 optimal_fiber_length=0.1394 tendon_slack_length=0.049
        pennation_angle=0.1867502
      PathPoint P1: lumbar3 (-0.02450655 0.0207283 -0.02826)
      PathPoint P2: pelvis (-0.0238 -0.057 -0.0759)
    Thelen2003Muscle Ps_L3_L4_IVD_l: max_isometric_force=16.56 optimal_fiber_length=0.1235 tendon_slack_length=0.0434
        pennation_angle=0.1867502
      PathPoint P1: lumbar3 (0.00115193 0.00621063 -0.02115)
      PathPoint P2: pelvis (-0.0238 -0.057 -0.0759)
    Thelen2003Muscle Ps_L4_TP_l: max_isometric_force=74 optimal_fiber_length=0.1195 tendon_slack_length=0.042
        pennation_angle=0.1867502
      PathPoint P1: lumbar4 (-0.015649 0.02494645 -0.02588)
      PathPoint P2: pelvis (-0.0238 -0.057 -0.0759)
    Thelen2003Muscle Ps_L4_L5_IVD_l: max_isometric_force=36.34 optimal_fiber_length=0.0998 tendon_slack_length=0.0351
        pennation_angle=0.1867502
      PathPoint P1: lumbar4 (0.00541963 0.00394754 -0.0206)
      PathPoint P2: pelvis (-0.0238 -0.057 -0.0759)
    Thelen2003Muscle Ps_L5_TP_l: max_isometric_force=79.58 optimal_fiber_length=0.1034 tendon_slack_length=0.0363
        pennation_angle=0.1867502
      PathPoint P1: lumbar5 (-0.00562001 0.02913976 -0.02529)
      PathPoint P2: pelvis (-0.0238 -0.057 -0.0759)
    Thelen2003Muscle Ps_L5_VB_l: max_isometric_force=87.86 optimal_fiber_length=0.0903 tendon_slack_length=0.0317
        pennation_angle=0.1867502
      PathPoint P1: lumbar5 (0.01 0.01241 -0.019)
      PathPoint P2: pelvis (-0.0238 -0.057 -0.0759)
    Thelen2003Muscle rect_abd_r: max_isometric_force=263 optimal_fiber_length=0.2238 tendon_slack_length=0.017
        pennation_angle=0
      PathPoint P1: pelvis (-0.04158234 -0.09647618 -0.01068875)
      PathPoint P2: torso (0.08805974 0.222575 -0.03445094)
    Thelen2003Muscle rect_abd_l: max_isometric_force=263 optimal_fiber_length=0.2238 tendon_slack_length=0.017
        pennation_angle=0
      PathPoint P1: pelvis (-0.04158 -0.09648 0.01069)
      PathPoint P2: torso (0.08806 0.22257 0.03445)
    Thelen2003Muscle IL_L1_r: max_isometric_force=50 optimal_fiber_length=0.05149358 tendon_slack_length=0.1089064
        pennation_angle=0.2408554
      PathPoint P1: pelvis (-0.15941 0.01094561 0.03829366)
      PathPoint P2: lumbar1 (-0.03007022 0.01550207 0.02917845)
      PathWrap: wrap_object=Cylinder2 method=hybrid
    Thelen2003Muscle IL_L2_r: max_isometric_force=71 optimal_fiber_length=0.03726 tendon_slack_length=0.078918
        pennation_angle=0.2408554
      PathPoint P1: pelvis (-0.150919 0.02817724 0.04264889)
      PathPoint P2: lumbar2 (-0.02983186 0.01166855 0.02852937)
      PathWrap: wrap_object=Cylinder method=hybrid
    Thelen2003Muscle IL_L3_r: max_isometric_force=84 optimal_fiber_length=0.025162 tendon_slack_length=0.053294
        pennation_angle=0.2408554
      PathPoint P1: pelvis (-0.1369204 0.0398108 0.04751102)
      PathPoint P2: lumbar3 (-0.02921602 0.01998814 0.0305391)
      PathWrap: wrap_object=Cylinder method=hybrid
    Thelen2003Muscle IL_L4_r: max_isometric_force=87 optimal_fiber_length=0.01671 tendon_slack_length=0.035393
        pennation_angle=0.2408554
      PathPoint P1: pelvis (-0.131838 0.03659732 0.04420413)
      PathPoint P2: lumbar4 (-0.021962 0.02558231 0.03142871)
      PathWrap: wrap_object=Cylinder method=hybrid
    Thelen2003Muscle IL_L1_l: max_isometric_force=50 optimal_fiber_length=0.05149358 tendon_slack_length=0.1089064
        pennation_angle=0.2408554
      PathPoint P1: pelvis (-0.15941 0.01094561 -0.03829366)
      PathPoint P2: lumbar1 (-0.03007022 0.01550207 -0.02917845)
      PathWrap: wrap_object=Cylinder2 method=hybrid
    Thelen2003Muscle IL_L2_l: max_isometric_force=71 optimal_fiber_length=0.03726 tendon_slack_length=0.078918
        pennation_angle=0.2408554
      PathPoint P1: pelvis (-0.150919 0.02817724 -0.04264889)
      PathPoint P2: lumbar2 (-0.02983186 0.01166855 -0.02852937)
      PathWrap: wrap_object=Cylinder method=hybrid
    Thelen2003Muscle IL_L3_l: max_isometric_force=84 optimal_fiber_length=0.025162 tendon_slack_length=0.053294
        pennation_angle=0.2408554
      PathPoint P1: pelvis (-0.1369204 0.0398108 -0.04751102)
      PathPoint P2: lumbar3 (-0.02921602 0.01998814 -0.0305391)
      PathWrap: wrap_object=Cylinder method=hybrid
    Thelen2003Muscle IL_L4_l: max_isometric_force=87 optimal_fiber_length=0.01671 tendon_slack_length=0.035393
        pennation_angle=0.2408554
      PathPoint P1: pelvis (-0.131838 0.03659732 -0.04420413)
      PathPoint P2: lumbar4 (-0.021962 0.02558231 -0.03142871)
      PathWrap: wrap_object=Cylinder method=hybrid
    Thelen2003Muscle IL_R5_r: max_isometric_force=11 optimal_fiber_length=0.15464 tendon_slack_length=0.216471
        pennation_angle=0.2408554
      PathPoint IL_r5_R-P1: pelvis (-0.1562967 0.0143181 0.03897207)
      PathPoint IL_r5_R-P2: lumbar2 (-0.04962978 0.00211134 0.04157)
      PathPoint IL_r5_R-P2: torso (-0.07928 0.1754146 0.04326777)
      PathPoint IL_r5_R-P3: torso (-0.08078761 0.2026088 0.04339877)
      PathPoint IL_r5_R-P4: torso (-0.08270198 0.2317399 0.04377235)
      PathPoint IL_r5_R-P5: torso (-0.08358583 0.2601881 0.04501278)
      PathPoint IL_r5_R-P6: torso (-0.08084872 0.2808287 0.04530176)
      PathPoint IL_r5_R-P7: torso (-0.07613774 0.3007641 0.04556778)
      PathWrap: wrap_object=Cylinder2 method=hybrid
    Thelen2003Muscle IL_R6_r: max_isometric_force=14 optimal_fiber_length=0.14826 tendon_slack_length=0.17931
        pennation_angle=0.2408554
      PathPoint IL_r6_R-P1: pelvis (-0.1452496 0.03100819 0.04256804)
      PathPoint IL_r6_R-P2: lumbar2 (-0.04921435 0.00236612 0.04436001)
      PathPoint IL_r6_R-P2: torso (-0.08008408 0.1736274 0.04614724)
      PathPoint IL_r6_R-P3: torso (-0.08330203 0.2051512 0.04642501)
      PathPoint IL_r6_R-P4: torso (-0.08395925 0.2350885 0.04728)
      PathPoint IL_r6_R-P5: torso (-0.0816046 0.2628183 0.04826674)
      PathPoint IL_r6_R-P6: torso (-0.07621232 0.2767654 0.04858569)
      PathWrap: wrap_object=Cylinder2 method=hybrid
    Thelen2003Muscle IL_R7_r: max_isometric_force=18 optimal_fiber_length=0.155 tendon_slack_length=0.15356
        pennation_angle=0.2408554
      PathPoint IL_r7_R-P1: pelvis (-0.1341586 0.03835635 0.0458664)
      PathPoint IL_r7_R-P2: lumbar2 (-0.04866491 0.00237387 0.04726)
      PathPoint IL_r7_R-P2: torso (-0.08034863 0.1745633 0.04865706)
      PathPoint IL_r7_R-P3: torso (-0.08335543 0.2035537 0.04917659)
      PathPoint IL_r7_R-P4: torso (-0.08436597 0.2341566 0.04955155)
      PathPoint IL_r7_R-P5: torso (-0.07920411 0.2577447 0.0508997)
    Thelen2003Muscle IL_R8_r: max_isometric_force=16 optimal_fiber_length=0.1391 tendon_slack_length=0.13081
        pennation_angle=0.2408554
      PathPoint IL_r8_R-P1: pelvis (-0.1373268 0.04290114 0.0501801)
      PathPoint IL_r8_R-P2: lumbar2 (-0.04819782 0.00285524 0.05001)
      PathPoint IL_r8_R-P2: torso (-0.07905233 0.170344 0.05123292)
      PathPoint IL_r8_R-P3: torso (-0.08110614 0.2035255 0.05104958)
      PathPoint IL_r8_R-P4: torso (-0.07971801 0.227964 0.05228642)
    Thelen2003Muscle IL_R9_r: max_isometric_force=23 optimal_fiber_length=0.1554 tendon_slack_length=0.08383
        pennation_angle=0.2408554
      PathPoint IL_r9_R-P1: pelvis (-0.1333102 0.04488414 0.05113938)
      PathPoint IL_r9_R-P2: lumbar2 (-0.04835241 0.00265461 0.05219)
      PathPoint IL_r9_R-P2: torso (-0.07948966 0.174496 0.05371)
      PathPoint IL_r9_R-P3: torso (-0.07693997 0.1939647 0.05378585)
    Thelen2003Muscle IL_R10_r: max_isometric_force=46 optimal_fiber_length=0.1309 tendon_slack_length=0.06917
        pennation_angle=0.2408554
      PathPoint IL_r10_R-P1: pelvis (-0.1303028 0.04775 0.05310857)
      PathPoint IL_r10_R-P2: lumbar2 (-0.04808827 0.00262684 0.05467)
      PathPoint IL_r10_R-P2: torso (-0.07495746 0.1628421 0.05623426)
    Thelen2003Muscle IL_R11_r: max_isometric_force=57 optimal_fiber_length=0.1161 tendon_slack_length=0.05062
        pennation_angle=0.2408554
      PathPoint IL_r11_R-P1: pelvis (-0.1274636 0.0499569 0.05547076)
      PathPoint IL_r11_R-P2: lumbar2 (-0.04794706 0.00270337 0.05769001)
      PathPoint IL_r11_R-P2: torso (-0.06243966 0.1358816 0.05990456)
    Thelen2003Muscle IL_R12_r: max_isometric_force=68 optimal_fiber_length=0.089 tendon_slack_length=0.03657
        pennation_angle=0.2408554
      PathPoint IL_r12_R-P1: pelvis (-0.1248135 0.05212424 0.05792486)
      PathPoint IL_r12_R-P2: torso (-0.03833463 0.1060968 0.05939633)
    Thelen2003Muscle IL_R5_l: max_isometric_force=11 optimal_fiber_length=0.15464 tendon_slack_length=0.216471
        pennation_angle=0.2408554
      PathPoint IL_r5_R-P1: pelvis (-0.1562967 0.0143181 -0.03897)
      PathPoint IL_r5_R-P2: lumbar2 (-0.04962978 0.00211134 -0.04157)
      PathPoint IL_r5_R-P2: torso (-0.07928 0.1754146 -0.04327)
      PathPoint IL_r5_R-P3: torso (-0.08078761 0.2026088 -0.0434)
      PathPoint IL_r5_R-P4: torso (-0.08270198 0.2317399 -0.04377)
      PathPoint IL_r5_R-P5: torso (-0.08358583 0.2601881 -0.04501)
      PathPoint IL_r5_R-P6: torso (-0.08084872 0.2808287 -0.0453)
      PathPoint IL_r5_R-P7: torso (-0.07613774 0.3007641 -0.04557)
      PathWrap: wrap_object=Cylinder2 method=hybrid
    Thelen2003Muscle IL_R6_l: max_isometric_force=14 optimal_fiber_length=0.14826 tendon_slack_length=0.17931
        pennation_angle=0.2408554
      PathPoint IL_r6_R-P1: pelvis (-0.1452496 0.03100819 -0.04257)
      PathPoint IL_r6_R-P2: lumbar2 (-0.04921435 0.00236612 -0.04436)
      PathPoint IL_r6_R-P2: torso (-0.08008408 0.1736274 -0.04615)
      PathPoint IL_r6_R-P3: torso (-0.08330203 0.2051512 -0.04643)
      PathPoint IL_r6_R-P4: torso (-0.08395925 0.2350885 -0.04728)
      PathPoint IL_r6_R-P5: torso (-0.0816046 0.2628183 -0.04827)
      PathPoint IL_r6_R-P6: torso (-0.07621232 0.2767654 -0.04859)
      PathWrap: wrap_object=Cylinder2 method=hybrid
    Thelen2003Muscle IL_R7_l: max_isometric_force=18 optimal_fiber_length=0.155 tendon_slack_length=0.15356
        pennation_angle=0.2408554
      PathPoint IL_r7_R-P1: pelvis (-0.1341586 0.03835635 -0.04587)
      PathPoint IL_r7_R-P2: lumbar2 (-0.04866491 0.00237387 -0.04726)
      PathPoint IL_r7_R-P2: torso (-0.08034863 0.1745633 -0.04866)
      PathPoint IL_r7_R-P3: torso (-0.08335543 0.2035537 -0.04918)
      PathPoint IL_r7_R-P4: torso (-0.08436597 0.2341566 -0.04955)
      PathPoint IL_r7_R-P5: torso (-0.07920411 0.2577447 -0.0509)
    Thelen2003Muscle IL_R8_l: max_isometric_force=16 optimal_fiber_length=0.1391 tendon_slack_length=0.13081
        pennation_angle=0.2408554
      PathPoint IL_r8_R-P1: pelvis (-0.1373268 0.04290114 -0.05018)
      PathPoint IL_r8_R-P2: lumbar2 (-0.04819782 0.00285524 -0.05001)
      PathPoint IL_r8_R-P2: torso (-0.07905233 0.170344 -0.05123)
      PathPoint IL_r8_R-P3: torso (-0.08110614 0.2035255 -0.05105)
      PathPoint IL_r8_R-P4: torso (-0.07971801 0.227964 -0.05229)
    Thelen2003Muscle IL_R9_l: max_isometric_force=23 optimal_fiber_length=0.1554 tendon_slack_length=0.08383
        pennation_angle=0.2408554
      PathPoint IL_r9_R-P1: pelvis (-0.1333102 0.04488414 -0.05114)
      PathPoint IL_r9_R-P2: lumbar2 (-0.04835241 0.00265461 -0.05219)
      PathPoint IL_r9_R-P2: torso (-0.07948966 0.174496 -0.05371)
      PathPoint IL_r9_R-P3: torso (-0.07693997 0.1939647 -0.05379)
    Thelen2003Muscle IL_R10_l: max_isometric_force=46 optimal_fiber_length=0.1309 tendon_slack_length=0.06917
        pennation_angle=0.2408554
      PathPoint IL_r10_R-P1: pelvis (-0.1303028 0.04775 -0.05311)
      PathPoint IL_r10_R-P2: lumbar2 (-0.04808827 0.00262684 -0.05467)
      PathPoint IL_r10_R-P2: torso (-0.07495746 0.1628421 -0.05623)
    Thelen2003Muscle IL_R11_l: max_isometric_force=57 optimal_fiber_length=0.1161 tendon_slack_length=0.05062
        pennation_angle=0.2408554
      PathPoint IL_r11_R-P1: pelvis (-0.1274636 0.0499569 -0.05547)
      PathPoint IL_r11_R-P2: lumbar2 (-0.04794706 0.00270337 -0.05769)
      PathPoint IL_r11_R-P2: torso (-0.06243966 0.1358816 -0.0599)
    Thelen2003Muscle IL_R12_l: max_isometric_force=68 optimal_fiber_length=0.089 tendon_slack_length=0.03657
        pennation_angle=0.2408554
      PathPoint IL_r12_R-P1: pelvis (-0.1248135 0.05212424 -0.05792)
      PathPoint IL_r12_R-P2: torso (-0.03833463 0.1060968 -0.0594)
    Thelen2003Muscle LTpT_T1_r: max_isometric_force=13 optimal_fiber_length=0.102785 tendon_slack_length=0.24305
        pennation_angle=0.2199115
      PathPoint LTpT_t1_R-P1: lumbar1 (-0.04597493 -0.01057015 0.00321)
      PathPoint LTpT_t1_R-P2: torso (-0.05238171 0.399196 0.02615)
      PathWrap: wrap_object=Chest_r method=hybrid
    Thelen2003Muscle LTpT_T2_r: max_isometric_force=26 optimal_fiber_length=0.10611 tendon_slack_length=0.2555
        pennation_angle=0.2199115
      PathPoint LTpT_t2_R-P1: lumbar2 (-0.04479615 -0.01432284 0.00383)
      PathPoint LTpT_t2_R-P2: torso (-0.05612828 0.3802547 0.02654)
      PathWrap: wrap_object=Chest_r method=hybrid
    Thelen2003Muscle LTpT_T3_r: max_isometric_force=26 optimal_fiber_length=0.10673 tendon_slack_length=0.25648
        pennation_angle=0.2199115
      PathPoint LTpT_t3_R-P1: lumbar3 (-0.0462017 -0.00342738 0.00407)
      PathPoint LTpT_t3_R-P2: lumbar1 (-0.03711 -0.01402 0.005)
      PathPoint LTpT_t3_R-P2: torso (-0.0651001 0.3588587 0.02598)
      PathWrap: wrap_object=Chest_r method=hybrid
    Thelen2003Muscle LTpT_T4_r: max_isometric_force=10 optimal_fiber_length=0.10676 tendon_slack_length=0.2566
        pennation_angle=0.2199115
      PathPoint LTpT_t4_R-P1: lumbar4 (-0.0457852 0.00705986 0.00282)
      PathPoint LTpT_t4_R-P2: lumbar1 (-0.03711294 -0.01402467 0.00612)
      PathPoint LTpT_t4_R-P2: torso (-0.0732536 0.337677 0.02615)
      PathWrap: wrap_object=Chest_r method=hybrid
    Thelen2003Muscle LTpT_T5_r: max_isometric_force=10 optimal_fiber_length=0.10076 tendon_slack_length=0.24214
        pennation_angle=0.2199115
      PathPoint LTpT_t5_R-P1: lumbar4 (-0.04730011 0.00396965 0.00008)
      PathPoint LTpT_t5_R-P2: lumbar2 (-0.044 0.0044 0.0064)
      PathPoint LTpT_t5_R-P2: torso (-0.07613775 0.3146224 0.02808)
      PathWrap: wrap_object=Chest_r method=hybrid
    Thelen2003Muscle LTpT_T6_r: max_isometric_force=15 optimal_fiber_length=0.10311 tendon_slack_length=0.23597
        pennation_angle=0.2199115
      PathPoint LTpT_t6_R-P1: lumbar5 (-0.03622 0.01615 0.00021356)
      PathPoint LTpT_t6_R-P2: lumbar2 (-0.044 0.0044 0.009)
      PathPoint LTpT_t6_R-P3: torso (-0.07479784 0.1862859 0.01546523)
      PathPoint LTpT_t6_R-P2: torso (-0.08338001 0.2892955 0.02766)
    Thelen2003Muscle LTpT_T7_r: max_isometric_force=18 optimal_fiber_length=0.11827 tendon_slack_length=0.22357
        pennation_angle=0.2199115
      PathPoint LTpT_t7_R-P1: sacrum (-0.1313165 0.06051274 0.00027686)
      PathPoint LTpT_t7_R-P2: lumbar2 (-0.04399 0.0044 0.011)
      PathPoint LTpT_t7_R-P3: torso (-0.07595577 0.1862599 0.01955706)
      PathPoint LTpT_t7_R-P2: torso (-0.0822431 0.2630911 0.02647)
    Thelen2003Muscle LTpT_T8_r: max_isometric_force=29 optimal_fiber_length=0.12614 tendon_slack_length=0.19968
        pennation_angle=0.2199115
      PathPoint LTpT_t8_R-P1: sacrum (-0.1429013 0.0502456 0.00037451)
      PathPoint LTpT_t8_R-P2: lumbar4 (-0.04697387 0.01804426 0.00565735)
      PathPoint LTpT_t8_R-P3: lumbar3 (-0.04674975 0.01354587 0.00831636)
      PathPoint LTpT_t8_R-P2: lumbar2 (-0.04531588 0.00310151 0.01094)
      PathPoint LTpT_t8_R-P2: torso (-0.08045917 0.2358989 0.0255)
    Thelen2003Muscle LTpT_T9_r: max_isometric_force=34 optimal_fiber_length=0.12436 tendon_slack_length=0.21077
        pennation_angle=0.2199115
      PathPoint LTpT_t9_R-P1: sacrum (-0.1658217 0.02683523 0)
      PathPoint LTpT_t9_R-P2: lumbar4 (-0.04672 0.01796 0.00748)
      PathPoint LTpT_t9_R-P3: lumbar3 (-0.04642947 0.01385341 0.00968998)
      PathPoint LTpT_t9_R-P3: lumbar2 (-0.04471634 0.00347304 0.0115)
      PathPoint LTpT_t9_R-P2: torso (-0.07693998 0.2183536 0.02633)
    Thelen2003Muscle LTpT_T10_r: max_isometric_force=37 optimal_fiber_length=0.1123 tendon_slack_length=0.171608
        pennation_angle=0.2199115
      PathPoint LTpT_t10_R-P1: sacrum (-0.1644634 0.02456109 0.01072)
      PathPoint LTpT_t10_R-P2: lumbar4 (-0.04672 0.01796 0.01256)
      PathPoint LTpT_t10_R-P2: lumbar3 (-0.0461 0.01403 0.01441)
      PathPoint LTpT_t10_R-P3: lumbar2 (-0.044 0.00338 0.01525)
      PathPoint LTpT_t10_R-P2: torso (-0.06982331 0.1897756 0.0181)
    Thelen2003Muscle LTpT_T11_r: max_isometric_force=38 optimal_fiber_length=0.098023 tendon_slack_length=0.149396
        pennation_angle=0.2199115
      PathPoint LTpT_t11_R-P1: sacrum (-0.1576492 0.0307094 0.02404)
      PathPoint LTpT_t11_R-P2: lumbar4 (-0.04672 0.017 0.02194)
      PathPoint LTpT_t11_R-P3: lumbar3 (-0.05014815 0.01348878 0.02088499)
      PathPoint LTpT_t11_R-P2: lumbar2 (-0.046 0.00338 0.01983)
      PathPoint LTpT_t11_R-P2: torso (-0.06087897 0.1617182 0.01762)
    Thelen2003Muscle LTpT_T12_r: max_isometric_force=32 optimal_fiber_length=0.077981 tendon_slack_length=0.11885
        pennation_angle=0.2199115
      PathPoint LTpT_t12_R-P1: sacrum (-0.1447599 0.0488 0.02793)
      PathPoint LTpT_t12_R-P2: lumbar4 (-0.04672 0.017 0.02524)
      PathPoint LTpT_t12_R-P3: lumbar3 (-0.0493674 0.01405638 0.02389737)
      PathPoint LTpT_t12_R-P2: lumbar2 (-0.0458028 0.00398333 0.02255426)
      PathPoint LTpT_t12_R-P2: torso (-0.05271704 0.13133 0.01818)
    Thelen2003Muscle LTpT_R4_r: max_isometric_force=10 optimal_fiber_length=0.135533 tendon_slack_length=0.206564
        pennation_angle=0.2199115
      PathPoint LTpT_r4_R-P1: lumbar4 (-0.0457852 0.00705986 0.00282013)
      PathPoint LTpT_r4_R-P2: lumbar2 (-0.04633217 0.00545622 0.01147788)
      PathPoint LTpT_r4_R-P2: torso (-0.07682609 0.1856802 0.02599535)
      PathPoint LTpT_r4_R-P3: torso (-0.07757681 0.2109802 0.02858485)
      PathPoint LTpT_r4_R-P4: torso (-0.07829657 0.2372556 0.0311206)
      PathPoint LTpT_r4_R-P5: torso (-0.07680869 0.2645257 0.03351954)
      PathPoint LTpT_r4_R-P6: torso (-0.07553778 0.3298222 0.03839302)
    Thelen2003Muscle LTpT_R5_r: max_isometric_force=10 optimal_fiber_length=0.1270107 tendon_slack_length=0.193575
        pennation_angle=0.2199115
      PathPoint LTpT_r5_R-P1: lumbar4 (-0.04730011 0.00396965 0.00008)
      PathPoint LTpT_r5_R-P2: lumbar2 (-0.0474338 0.00463268 0.01419621)
      PathPoint LTpT_r5_R-P2: torso (-0.0798949 0.1843553 0.02990677)
      PathPoint LTpT_r5_R-P3: torso (-0.07928691 0.2094307 0.03196816)
      PathPoint LTpT_r5_R-P4: torso (-0.08000665 0.2368928 0.03464452)
      PathPoint LTpT_r5_R-P5: torso (-0.0777671 0.2632596 0.03651632)
      PathPoint LTpT_r5_R-P6: torso (-0.07482216 0.3038269 0.03919318)
    Thelen2003Muscle LTpT_R6_r: max_isometric_force=15 optimal_fiber_length=0.135678 tendon_slack_length=0.184737
        pennation_angle=0.2199115
      PathPoint LTpT_r6_R-P1: lumbar5 (-0.03622 0.01615 0.00021)
      PathPoint LTpT_r6_R-P2: lumbar3 (-0.04699735 0.01473357 0.01084401)
      PathPoint LTpT_r6_R-P2: lumbar2 (-0.044 0.0044 0.014)
      PathPoint LTpT_r6_R-P2: torso (-0.07989489 0.1825018 0.03100732)
      PathPoint LTpT_r6_R-P3: torso (-0.08030735 0.209123 0.03466081)
      PathPoint LTpT_r6_R-P4: torso (-0.080858 0.2364317 0.03734674)
      PathPoint LTpT_r6_R-P5: torso (-0.07749163 0.2631712 0.03952025)
      PathPoint LTpT_r6_R-P6: torso (-0.07361 0.2828934 0.04009547)
    Thelen2003Muscle LTpT_R7_r: max_isometric_force=18 optimal_fiber_length=0.129543 tendon_slack_length=0.194195
        pennation_angle=0.2199115
      PathPoint LTpT_r7_R-P1: sacrum (-0.13132 0.06051 0.00028)
      PathPoint LTpT_r7_R-P2: lumbar4 (-0.04672024 0.01882942 0.00812957)
      PathPoint LTpT_r7_R-P2: lumbar3 (-0.04610048 0.01416942 0.01285534)
      PathPoint LTpT_r7_R-P2: lumbar2 (-0.04399 0.00431532 0.01727237)
      PathPoint LTpT_r7_R-P2: torso (-0.08034866 0.181455 0.03549029)
      PathPoint LTpT_r7_R-P3: torso (-0.08085786 0.207772 0.03958857)
      PathPoint LTpT_r7_R-P4: torso (-0.08186838 0.2359729 0.04224882)
      PathPoint LTpT_r7_R-P5: torso (-0.07920412 0.2594262 0.04333269)
    Thelen2003Muscle LTpT_R8_r: max_isometric_force=29 optimal_fiber_length=0.106076 tendon_slack_length=0.198398
        pennation_angle=0.2199115
      PathPoint LTpT_r8_R-P1: sacrum (-0.1429 0.05025 0.00037)
      PathPoint LTpT_r8_R-P2: lumbar4 (-0.04652879 0.01812358 0.01139335)
      PathPoint LTpT_r8_R-P2: lumbar3 (-0.04592476 0.0135047 0.01603953)
      PathPoint LTpT_r8_R-P2: lumbar2 (-0.04399 0.00388 0.02054143)
      PathPoint LTpT_r8_R-P2: torso (-0.0812671 0.1808376 0.04071285)
      PathPoint LTpT_r8_R-P3: torso (-0.08110615 0.2063711 0.0437166)
      PathPoint LTpT_r8_R-P4: torso (-0.07971802 0.2305295 0.04635374)
    Thelen2003Muscle LTpT_R9_r: max_isometric_force=34 optimal_fiber_length=0.091522 tendon_slack_length=0.207985
        pennation_angle=0.2199115
      PathPoint LTpT_r9_R-P1: sacrum (-0.16582 0.02684 0)
      PathPoint LTpT_r9_R-P2: lumbar4 (-0.04672024 0.01768141 0.01489007)
      PathPoint LTpT_r9_R-P2: lumbar3 (-0.04610048 0.01302352 0.01958209)
      PathPoint LTpT_r9_R-P2: lumbar2 (-0.04399048 0.00393671 0.02418836)
      PathPoint LTpT_r9_R-P2: torso (-0.0807942 0.1788215 0.04335902)
      PathPoint LTpT_r9_R-P3: torso (-0.08022418 0.2003668 0.04675993)
    Thelen2003Muscle LTpT_R10_r: max_isometric_force=37 optimal_fiber_length=0.107241 tendon_slack_length=0.165678
        pennation_angle=0.2199115
      PathPoint LTpT_r10_R-P1: sacrum (-0.16446 0.02456 0.01072)
      PathPoint LTpT_r10_R-P2: lumbar4 (-0.0466654 0.01686411 0.01943915)
      PathPoint LTpT_r10_R-P2: lumbar3 (-0.0460454 0.01267399 0.02345403)
      PathPoint LTpT_r10_R-P2: lumbar2 (-0.04393564 0.00364643 0.02733295)
      PathPoint LTpT_r10_R-P2: torso (-0.07918935 0.1728785 0.04688675)
    Thelen2003Muscle LTpT_R11_r: max_isometric_force=38 optimal_fiber_length=0.104511 tendon_slack_length=0.131312
        pennation_angle=0.2199115
      PathPoint LTpT_r11_R-P1: sacrum (-0.15765 0.03071 0.02404)
      PathPoint LTpT_r11_R-P2: lumbar4 (-0.0461 0.01796 0.02941876)
      PathPoint LTpT_r11_R-P3: lumbar3 (-0.04610001 0.0139338 0.03257726)
      PathPoint LTpT_r11_R-P4: lumbar2 (-0.04402375 0.00448 0.03557344)
      PathPoint LTpT_r11_R-P2: torso (-0.06502161 0.1476557 0.04555504)
    Thelen2003Muscle LTpT_R12_r: max_isometric_force=32 optimal_fiber_length=0.0633 tendon_slack_length=0.123
        pennation_angle=0.2199115
      PathPoint LTpT_r12_R-P1: sacrum (-0.14476 0.0488 0.02793)
      PathPoint LTpT_r12_R-P2: lumbar4 (-0.04672003 0.01757662 0.03350723)
      PathPoint LTpT_r12_R-P2: lumbar3 (-0.04610001 0.01364388 0.03587364)
      PathPoint LTpT_r12_R-P2: lumbar2 (-0.044 0.0044 0.03881525)
      PathPoint LTpT_r12_R-P2: torso (-0.04503508 0.1216435 0.04661483)
      PathWrap: wrap_object=Cylinder2 method=hybrid
    Thelen2003Muscle LTpT_T1_l: max_isometric_force=13 optimal_fiber_length=0.102785 tendon_slack_length=0.24305
        pennation_angle=0.2199115
      PathPoint LTpT_t1_R-P1: lumbar1 (-0.04597493 -0.01057015 -0.00321)
      PathPoint LTpT_t1_R-P2: torso (-0.05238171 0.399196 -0.02615)
      PathWrap: wrap_object=Chest_l method=hybrid
    Thelen2003Muscle LTpT_T2_l: max_isometric_force=26 optimal_fiber_length=0.10611 tendon_slack_length=0.2555
        pennation_angle=0.2199115
      PathPoint LTpT_t2_R-P1: lumbar2 (-0.04479615 -0.01432284 -0.00383)
      PathPoint LTpT_t2_R-P2: torso (-0.05612828 0.3802547 -0.02654)
      PathWrap: wrap_object=Chest_l method=hybrid
    Thelen2003Muscle LTpT_T3_l: max_isometric_force=26 optimal_fiber_length=0.10673 tendon_slack_length=0.25648
        pennation_angle=0.2199115
      PathPoint LTpT_t3_R-P1: lumbar3 (-0.0462017 -0.00342738 -0.00407)
      PathPoint LTpT_t3_R-P2: lumbar1 (-0.03711 -0.01402 -0.005)
      PathPoint LTpT_t3_R-P2: torso (-0.0651001 0.3588587 -0.02598)
      PathWrap: wrap_object=Chest_l method=hybrid
    Thelen2003Muscle LTpT_T4_l: max_isometric_force=10 optimal_fiber_length=0.10676 tendon_slack_length=0.2566
        pennation_angle=0.2199115
      PathPoint LTpT_t4_R-P1: lumbar4 (-0.0457852 0.00705986 -0.00282)
      PathPoint LTpT_t4_R-P2: lumbar1 (-0.03711294 -0.01402467 -0.00612)
      PathPoint LTpT_t4_R-P2: torso (-0.0732536 0.337677 -0.02615)
      PathWrap: wrap_object=Chest_l method=hybrid
    Thelen2003Muscle LTpT_T5_l: max_isometric_force=10 optimal_fiber_length=0.10076 tendon_slack_length=0.24214
        pennation_angle=0.2199115
      PathPoint LTpT_t5_R-P1: lumbar4 (-0.04730011 0.00396965 -0.00008)
      PathPoint LTpT_t5_R-P2: lumbar2 (-0.044 0.0044 -0.0064)
      PathPoint LTpT_t5_R-P2: torso (-0.07613775 0.3146224 -0.02808)
      PathWrap: wrap_object=Chest_l method=hybrid
    Thelen2003Muscle LTpT_T6_l: max_isometric_force=15 optimal_fiber_length=0.10311 tendon_slack_length=0.23597
        pennation_angle=0.2199115
      PathPoint LTpT_t6_R-P1: lumbar5 (-0.03622 0.01615 -0.00021)
      PathPoint LTpT_t6_R-P2: lumbar2 (-0.044 0.0044 -0.009)
      PathPoint LTpT_t6_R-P3: torso (-0.07479784 0.1862859 -0.01547)
      PathPoint LTpT_t6_R-P2: torso (-0.08338001 0.2892955 -0.02766)
    Thelen2003Muscle LTpT_T7_l: max_isometric_force=18 optimal_fiber_length=0.11827 tendon_slack_length=0.22357
        pennation_angle=0.2199115
      PathPoint LTpT_t7_R-P1: sacrum (-0.1313165 0.06051274 -0.00028)
      PathPoint LTpT_t7_R-P2: lumbar2 (-0.04399 0.0044 -0.011)
      PathPoint LTpT_t7_R-P3: torso (-0.07595577 0.1862599 -0.01956)
      PathPoint LTpT_t7_R-P2: torso (-0.0822431 0.2630911 -0.02647)
    Thelen2003Muscle LTpT_T8_l: max_isometric_force=29 optimal_fiber_length=0.12614 tendon_slack_length=0.19968
        pennation_angle=0.2199115
      PathPoint LTpT_t8_R-P1: sacrum (-0.1429013 0.0502456 -0.00037)
      PathPoint LTpT_t8_R-P2: lumbar4 (-0.04697387 0.01804426 -0.00566)
      PathPoint LTpT_t8_R-P3: lumbar3 (-0.04674975 0.01354587 -0.00832)
      PathPoint LTpT_t8_R-P2: lumbar2 (-0.04531588 0.00310151 -0.01094)
      PathPoint LTpT_t8_R-P2: torso (-0.08045917 0.2358989 -0.0255)
    Thelen2003Muscle LTpT_T9_l: max_isometric_force=34 optimal_fiber_length=0.12436 tendon_slack_length=0.21077
        pennation_angle=0.2199115
      PathPoint LTpT_t9_R-P1: sacrum (-0.1658217 0.02683523 0)
      PathPoint LTpT_t9_R-P2: lumbar4 (-0.04672 0.01796 -0.00748)
      PathPoint LTpT_t9_R-P3: lumbar3 (-0.04642947 0.01385341 -0.00969)
      PathPoint LTpT_t9_R-P3: lumbar2 (-0.04471634 0.00347304 -0.0115)
      PathPoint LTpT_t9_R-P2: torso (-0.07693998 0.2183536 -0.02633)
    Thelen2003Muscle LTpT_T10_l: max_isometric_force=37 optimal_fiber_length=0.1123 tendon_slack_length=0.171608
        pennation_angle=0.2199115
      PathPoint LTpT_t10_R-P1: sacrum (-0.1644634 0.02456109 -0.01072)
      PathPoint LTpT_t10_R-P2: lumbar4 (-0.04672 0.01796 -0.01256)
      PathPoint LTpT_t10_R-P2: lumbar3 (-0.0461 0.01403 -0.01441)
      PathPoint LTpT_t10_R-P3: lumbar2 (-0.044 0.00338 -0.01525)
      PathPoint LTpT_t10_R-P2: torso (-0.06982331 0.1897756 -0.0181)
    Thelen2003Muscle LTpT_T11_l: max_isometric_force=38 optimal_fiber_length=0.098023 tendon_slack_length=0.149396
        pennation_angle=0.2199115
      PathPoint LTpT_t11_R-P1: sacrum (-0.1576492 0.0307094 -0.02404)
      PathPoint LTpT_t11_R-P2: lumbar4 (-0.04672 0.017 -0.02194)
      PathPoint LTpT_t11_R-P3: lumbar3 (-0.05014815 0.01348878 -0.02088)
      PathPoint LTpT_t11_R-P2: lumbar2 (-0.046 0.00338 -0.01983)
      PathPoint LTpT_t11_R-P2: torso (-0.06087897 0.1617182 -0.01762)
    Thelen2003Muscle LTpT_T12_l: max_isometric_force=32 optimal_fiber_length=0.077981 tendon_slack_length=0.11885
        pennation_angle=0.2199115
      PathPoint LTpT_t12_R-P1: sacrum (-0.1447599 0.0488 0.02793)
      PathPoint LTpT_t12_R-P2: lumbar4 (-0.04672 0.017 0.02524)
      PathPoint LTpT_t12_R-P3: lumbar3 (-0.0493674 0.01405638 0.02389737)
      PathPoint LTpT_t12_R-P2: lumbar2 (-0.0458028 0.00398333 0.02255426)
      PathPoint LTpT_t12_R-P2: torso (-0.05271704 0.13133 0.01818)
    Thelen2003Muscle LTpT_R4_l: max_isometric_force=10 optimal_fiber_length=0.135533 tendon_slack_length=0.206564
        pennation_angle=0.2199115
      PathPoint LTpT_r4_R-P1: lumbar4 (-0.0457852 0.00705986 -0.00282)
      PathPoint LTpT_r4_R-P2: lumbar2 (-0.04633217 0.00545622 -0.01148)
      PathPoint LTpT_r4_R-P2: torso (-0.07682609 0.1856802 -0.026)
      PathPoint LTpT_r4_R-P3: torso (-0.07757681 0.2109802 -0.02858)
      PathPoint LTpT_r4_R-P4: torso (-0.07829657 0.2372556 -0.03112)
      PathPoint LTpT_r4_R-P5: torso (-0.07680869 0.2645257 -0.03352)
      PathPoint LTpT_r4_R-P6: torso (-0.07553778 0.3298222 -0.03839)
    Thelen2003Muscle LTpT_R5_l: max_isometric_force=10 optimal_fiber_length=0.1270107 tendon_slack_length=0.193575
        pennation_angle=0.2199115
      PathPoint LTpT_r5_R-P1: lumbar4 (-0.04730011 0.00396965 -0.00008)
      PathPoint LTpT_r5_R-P2: lumbar2 (-0.0474338 0.00463268 -0.0142)
      PathPoint LTpT_r5_R-P2: torso (-0.0798949 0.1843553 -0.02991)
      PathPoint LTpT_r5_R-P3: torso (-0.07928691 0.2094307 -0.03197)
      PathPoint LTpT_r5_R-P4: torso (-0.08000665 0.2368928 -0.03464)
      PathPoint LTpT_r5_R-P5: torso (-0.0777671 0.2632596 -0.03652)
      PathPoint LTpT_r5_R-P6: torso (-0.07482216 0.3038269 -0.03919)
    Thelen2003Muscle LTpT_R6_l: max_isometric_force=15 optimal_fiber_length=0.135678 tendon_slack_length=0.184737
        pennation_angle=0.2199115
      PathPoint LTpT_r6_R-P1: lumbar5 (-0.03622 0.01615 -0.00021)
      PathPoint LTpT_r6_R-P2: lumbar3 (-0.04699735 0.01473357 -0.01084)
      PathPoint LTpT_r6_R-P2: lumbar2 (-0.044 0.0044 -0.014)
      PathPoint LTpT_r6_R-P2: torso (-0.07989489 0.1825018 -0.03101)
      PathPoint LTpT_r6_R-P3: torso (-0.08030735 0.209123 -0.03466)
      PathPoint LTpT_r6_R-P4: torso (-0.080858 0.2364317 -0.03735)
      PathPoint LTpT_r6_R-P5: torso (-0.07749163 0.2631712 -0.03952)
      PathPoint LTpT_r6_R-P6: torso (-0.07361 0.2828934 -0.0401)
    Thelen2003Muscle LTpT_R7_l: max_isometric_force=18 optimal_fiber_length=0.129543 tendon_slack_length=0.194195
        pennation_angle=0.2199115
      PathPoint LTpT_r7_R-P1: sacrum (-0.13132 0.06051 -0.00028)
      PathPoint LTpT_r7_R-P2: lumbar4 (-0.04672024 0.01882942 -0.00813)
      PathPoint LTpT_r7_R-P2: lumbar3 (-0.04610048 0.01416942 -0.01286)
      PathPoint LTpT_r7_R-P2: lumbar2 (-0.04399 0.00431532 -0.01727)
      PathPoint LTpT_r7_R-P2: torso (-0.08034866 0.181455 -0.03549)
      PathPoint LTpT_r7_R-P3: torso (-0.08085786 0.207772 -0.03959)
      PathPoint LTpT_r7_R-P4: torso (-0.08186838 0.2359729 -0.04225)
      PathPoint LTpT_r7_R-P5: torso (-0.07920412 0.2594262 -0.04333)
    Thelen2003Muscle LTpT_R8_l: max_isometric_force=29 optimal_fiber_length=0.106076 tendon_slack_length=0.198398
        pennation_angle=0.2199115
      PathPoint LTpT_r8_R-P1: sacrum (-0.1429 0.05025 -0.00037)
      PathPoint LTpT_r8_R-P2: lumbar4 (-0.04652879 0.01812358 -0.01139)
      PathPoint LTpT_r8_R-P2: lumbar3 (-0.04592476 0.0135047 -0.01604)
      PathPoint LTpT_r8_R-P2: lumbar2 (-0.04399 0.00388 -0.02054)
      PathPoint LTpT_r8_R-P2: torso (-0.0812671 0.1808376 -0.04071)
      PathPoint LTpT_r8_R-P3: torso (-0.08110615 0.2063711 -0.04372)
      PathPoint LTpT_r8_R-P4: torso (-0.07971802 0.2305295 -0.04635)
    Thelen2003Muscle LTpT_R9_l: max_isometric_force=34 optimal_fiber_length=0.091522 tendon_slack_length=0.207985
        pennation_angle=0.2199115
      PathPoint LTpT_r9_R-P1: sacrum (-0.16582 0.02684 0)
      PathPoint LTpT_r9_R-P2: lumbar4 (-0.04672024 0.01768141 -0.01489)
      PathPoint LTpT_r9_R-P2: lumbar3 (-0.04610048 0.01302352 -0.01958)
      PathPoint LTpT_r9_R-P2: lumbar2 (-0.04399048 0.00393671 -0.02419)
      PathPoint LTpT_r9_R-P2: torso (-0.0807942 0.1788215 -0.04336)
      PathPoint LTpT_r9_R-P3: torso (-0.08022418 0.2003668 -0.04676)
    Thelen2003Muscle LTpT_R10_l: max_isometric_force=37 optimal_fiber_length=0.107241 tendon_slack_length=0.165678
        pennation_angle=0.2199115
      PathPoint LTpT_r10_R-P1: sacrum (-0.16446 0.02456 -0.01072)
      PathPoint LTpT_r10_R-P2: lumbar4 (-0.0466654 0.01686411 -0.01944)
      PathPoint LTpT_r10_R-P2: lumbar3 (-0.0460454 0.01267399 -0.02345)
      PathPoint LTpT_r10_R-P2: lumbar2 (-0.04393564 0.00364643 -0.02733)
      PathPoint LTpT_r10_R-P2: torso (-0.07918935 0.1728785 -0.04689)
    Thelen2003Muscle LTpT_R11_l: max_isometric_force=38 optimal_fiber_length=0.104511 tendon_slack_length=0.131312
        pennation_angle=0.2199115
      PathPoint LTpT_r11_R-P1: sacrum (-0.15765 0.03071 -0.02404)
      PathPoint LTpT_r11_R-P2: lumbar4 (-0.0461 0.01796 -0.02942)
      PathPoint LTpT_r11_R-P3: lumbar3 (-0.04610001 0.0139338 -0.03258)
      PathPoint LTpT_r11_R-P4: lumbar2 (-0.04402375 0.00448 -0.03557)
      PathPoint LTpT_r11_R-P2: torso (-0.06502161 0.1476557 -0.04556)
    Thelen2003Muscle LTpT_R12_l: max_isometric_force=32 optimal_fiber_length=0.0633 tendon_slack_length=0.123
        pennation_angle=0.2199115
      PathPoint LTpT_r12_R-P1: sacrum (-0.14476 0.0488 -0.02793)
      PathPoint LTpT_r12_R-P2: lumbar4 (-0.04672003 0.01757662 -0.03351)
      PathPoint LTpT_r12_R-P2: lumbar3 (-0.04610001 0.01364388 -0.03587)
      PathPoint LTpT_r12_R-P2: lumbar2 (-0.044 0.0044 -0.03882)
      PathPoint LTpT_r12_R-P2: torso (-0.04503508 0.1216435 -0.04661)
      PathWrap: wrap_object=Cylinder2 method=hybrid
    Thelen2003Muscle LTpL_L5_r: max_isometric_force=53 optimal_fiber_length=0.051468 tendon_slack_length=0.001
        pennation_angle=0.2199115
      PathPoint: sacrum (-0.14125 0.07389 0.03487)
      PathPoint: lumbar5 (-0.01034287 0.02665 0.0224)
    Thelen2003Muscle LTpL_L4_r: max_isometric_force=51 optimal_fiber_length=0.039244 tendon_slack_length=0.042404
        pennation_angle=0.2199115
      PathPoint: pelvis (-0.1505013 0.01748658 0.03730967)
      PathPoint: lumbar4 (-0.02034287 0.02305377 0.02240162)
    Thelen2003Muscle LTpL_L3_r: max_isometric_force=47 optimal_fiber_length=0.054869 tendon_slack_length=0.0596
        pennation_angle=0.2199115
      PathPoint: pelvis (-0.158442 0.01749 0.0402)
      PathPoint: lumbar3 (-0.02916106 0.01963 0.01961)
    Thelen2003Muscle LTpL_L2_r: max_isometric_force=42 optimal_fiber_length=0.067743 tendon_slack_length=0.0744
        pennation_angle=0.2199115
      PathPoint: pelvis (-0.1596876 0.01296878 0.04194586)
      PathPoint: lumbar2 (-0.02876266 0.01255833 0.02029587)
    Thelen2003Muscle LTpL_L1_r: max_isometric_force=36 optimal_fiber_length=0.08127 tendon_slack_length=0.0944
        pennation_angle=0.2199115
      PathPoint: pelvis (-0.1619908 0.01019357 0.04311682)
      PathPoint: lumbar1 (-0.0290759 0.01505554 0.02179509)
      PathWrap: wrap_object=Cylinder2 method=hybrid
    Thelen2003Muscle LTpL_L5_l: max_isometric_force=53 optimal_fiber_length=0.051468 tendon_slack_length=0.001
        pennation_angle=0.2199115
      PathPoint: sacrum (-0.14125 0.07388767 -0.03486699)
      PathPoint: lumbar5 (-0.01034287 0.02665 -0.0224)
    Thelen2003Muscle LTpL_L4_l: max_isometric_force=51 optimal_fiber_length=0.039244 tendon_slack_length=0.042404
        pennation_angle=0.2199115
      PathPoint: pelvis (-0.1505013 0.01748658 -0.03731)
      PathPoint: lumbar4 (-0.02034287 0.02305377 -0.0224)
    Thelen2003Muscle LTpL_L3_l: max_isometric_force=47 optimal_fiber_length=0.054869 tendon_slack_length=0.0596
        pennation_angle=0.2199115
      PathPoint: pelvis (-0.158442 0.01749 -0.0402)
      PathPoint: lumbar3 (-0.02916106 0.01963 -0.01961)
    Thelen2003Muscle LTpL_L2_l: max_isometric_force=42 optimal_fiber_length=0.067743 tendon_slack_length=0.0744
        pennation_angle=0.2199115
      PathPoint: pelvis (-0.1596876 0.01296878 -0.04195)
      PathPoint: lumbar2 (-0.02876 0.01255833 -0.0203)
    Thelen2003Muscle LTpL_L1_l: max_isometric_force=36 optimal_fiber_length=0.08127 tendon_slack_length=0.0944
        pennation_angle=0.2199115
      PathPoint: pelvis (-0.1619908 0.01019 -0.04312)
      PathPoint: lumbar1 (-0.0290759 0.01505554 -0.0218)
      PathWrap: wrap_object=Cylinder2 method=hybrid
    Thelen2003Muscle QL_post_I.1-L3_r: max_isometric_force=18.2 optimal_fiber_length=0.03836231
        tendon_slack_length=0.03218577 pennation_angle=0.1291544
      PathPoint I.1_r-P1: pelvis (-0.12147 0.04631 0.05202)
      PathPoint L3_TP_r-P2: lumbar3 (-0.029 0.01963 0.0303)
    Thelen2003Muscle QL_post_I.2-L4_r: max_isometric_force=24.2 optimal_fiber_length=0.02219488
        tendon_slack_length=0.01862138 pennation_angle=0.1291544
      PathPoint I.2_r-P1: pelvis (-0.1114699 0.05630756 0.05902)
      PathPoint L4_TP_r-P2: lumbar4 (-0.022 0.02605 0.0303)
    Thelen2003Muscle QL_post_I.2-L3_r: max_isometric_force=14.1 optimal_fiber_length=0.05023
        tendon_slack_length=0.04214269 pennation_angle=0.1291544
      PathPoint I.2_r-P1: pelvis (-0.1114699 0.05630756 0.05902)
      PathPoint L3_TP_r-P2: lumbar3 (-0.029 0.01963 0.0303)
    Thelen2003Muscle QL_post_I.2-L2_r: max_isometric_force=8.8 optimal_fiber_length=0.03478374
        tendon_slack_length=0.0191 pennation_angle=0.1291544
      PathPoint I.2_r-P1: pelvis (-0.1114699 0.05630756 0.05902)
      PathPoint L2_TP_r-P2: lumbar2 (-0.031 0.012 0.0303)
    Thelen2003Muscle QL_post_I.3-L1_r: max_isometric_force=12.92 optimal_fiber_length=0.08560792
        tendon_slack_length=0.04446546 pennation_angle=0.1291544
      PathPoint L1_TP-P1: lumbar1 (-0.03263616 0.01487668 0.029)
      PathPoint I.3_r-P1: pelvis (-0.10477 0.06212 0.06917)
    Thelen2003Muscle QL_post_I.3-L2_r: max_isometric_force=13.6 optimal_fiber_length=0.05041593
        tendon_slack_length=0.04229869 pennation_angle=0.1291544
      PathPoint L2_TP_r-P2: lumbar2 (-0.031 0.012 0.0303)
      PathPoint I.3_r-P1: pelvis (-0.10477 0.06212 0.06917)
    Thelen2003Muscle QL_post_I.3-L3_r: max_isometric_force=23.2 optimal_fiber_length=0.03605963
        tendon_slack_length=0.0302538 pennation_angle=0.1291544
      PathPoint L3_TP_r-P2: lumbar3 (-0.029 0.01963 0.0303)
      PathPoint I.3_r-P1: pelvis (-0.10477 0.06212 0.06917)
    Thelen2003Muscle QL_post_I.1-L3_l: max_isometric_force=18.2 optimal_fiber_length=0.03836231
        tendon_slack_length=0.03218577 pennation_angle=0.1291544
      PathPoint I.1_l-P1: pelvis (-0.12147 0.04631 -0.05202)
      PathPoint L3_TP_l-P2: lumbar3 (-0.029 0.01963 -0.0303)
    Thelen2003Muscle QL_post_I.2-L4_l: max_isometric_force=24.2 optimal_fiber_length=0.02219488
        tendon_slack_length=0.01862138 pennation_angle=0.1291544
      PathPoint I.2_l-P1: pelvis (-0.1114699 0.05630756 -0.05902)
      PathPoint L4_TP_l-P2: lumbar4 (-0.022 0.02605 -0.0303)
    Thelen2003Muscle QL_post_I.2-L3_l: max_isometric_force=14.1 optimal_fiber_length=0.05023
        tendon_slack_length=0.04214269 pennation_angle=0.1291544
      PathPoint I.2_l-P1: pelvis (-0.1114699 0.05630756 -0.05902)
      PathPoint L3_TP_l-P2: lumbar3 (-0.029 0.01963 -0.0303)
    Thelen2003Muscle QL_post_I.2-L2_l: max_isometric_force=8.8 optimal_fiber_length=0.03478374
        tendon_slack_length=0.0191 pennation_angle=0.1291544
      PathPoint I.2_l-P1: pelvis (-0.1114699 0.05630756 -0.05902)
      PathPoint L2_TP_l-P2: lumbar2 (-0.031 0.012 -0.0303)
    Thelen2003Muscle QL_post_I.3-L1_l: max_isometric_force=12.92 optimal_fiber_length=0.08560792
        tendon_slack_length=0.04446546 pennation_angle=0.1291544
      PathPoint L1_TP_l-P1: lumbar1 (-0.03263616 0.01487668 -0.029)
      PathPoint I.3_l-P1: pelvis (-0.10477 0.06212 -0.06917)
    Thelen2003Muscle QL_post_I.3-L2_l: max_isometric_force=13.6 optimal_fiber_length=0.05041593
        tendon_slack_length=0.04229869 pennation_angle=0.1291544
      PathPoint L2_TP_l-P2: lumbar2 (-0.031 0.012 -0.0303)
      PathPoint I.3_l-P1: pelvis (-0.10477 0.06212 -0.06917)
    Thelen2003Muscle QL_post_I.3-L3_l: max_isometric_force=23.2 optimal_fiber_length=0.03605963
        tendon_slack_length=0.0302538 pennation_angle=0.1291544
      PathPoint L3_TP_l-P2: lumbar3 (-0.029 0.01963 -0.0303)
      PathPoint I.3_l-P1: pelvis (-0.10477 0.06212 -0.06917)
    Thelen2003Muscle QL_mid_L3-12.3_r: max_isometric_force=5.8 optimal_fiber_length=0.05463846
        tendon_slack_length=0.02837967 pennation_angle=0.1291544
      PathPoint quadratus_lumb_mid_L3_1_r-P1: torso (-0.04191147 0.11237 0.05166)
      PathPoint quadratus_lumb_mid_L3_1_r-P2: lumbar3 (-0.02936156 0.02173074 0.03038)
    Thelen2003Muscle QL_mid_L3-12.2_r: max_isometric_force=6.6 optimal_fiber_length=0.05793535
        tendon_slack_length=0.0300921 pennation_angle=0.1291544
      PathPoint quadratus_lumb_mid_L3_2_r-P2: torso (-0.04247816 0.1192223 0.04319)
      PathPoint quadratus_lumb_mid_L3_2_r-P3: lumbar3 (-0.02936 0.02173 0.03038)
    Thelen2003Muscle QL_mid_L3-12.1_r: max_isometric_force=11 optimal_fiber_length=0.06305602
        tendon_slack_length=0.03275182 pennation_angle=0.1291544
      PathPoint quadratus_lumb_mid_L3_3_r-P2: torso (-0.04128451 0.1282 0.03119)
      PathPoint quadratus_lumb_mid_L3_3_r-P3: lumbar3 (-0.02936 0.02173 0.03038)
    Thelen2003Muscle QL_mid_L2-12.1_r: max_isometric_force=9.2 optimal_fiber_length=0.04077783
        tendon_slack_length=0.02118034 pennation_angle=0.1291544
      PathPoint QL_mid_L2-12.1_l-P1: torso (-0.04128 0.1282 0.03119)
      PathPoint QL_mid_L2-12.1_l-P1: lumbar2 (-0.02912141 0.01689594 0.02562)
    Thelen2003Muscle QL_mid_L4-12.3_r: max_isometric_force=5.4 optimal_fiber_length=0.07288648
        tendon_slack_length=0.03785784 pennation_angle=0.1291544
      PathPoint quadratus_lumb_mid_L4_1_r-P1: torso (-0.04178247 0.1123161 0.05167)
      PathPoint quadratus_lumb_mid_L4_1_r-P2: lumbar4 (-0.02138254 0.0307 0.02806)
    Thelen2003Muscle QL_mid_L3-12.3_l: max_isometric_force=5.8 optimal_fiber_length=0.05463846
        tendon_slack_length=0.02837967 pennation_angle=0.1291544
      PathPoint quadratus_lumb_mid_L3_1_r-P1: torso (-0.04191147 0.11237 -0.05166)
      PathPoint quadratus_lumb_mid_L3_1_r-P2: lumbar3 (-0.02936156 0.02173074 -0.03038)
    Thelen2003Muscle QL_mid_L3-12.2_l: max_isometric_force=6.6 optimal_fiber_length=0.05793535
        tendon_slack_length=0.0300921 pennation_angle=0.1291544
      PathPoint quadratus_lumb_mid_L3_2_r-P2: torso (-0.04247816 0.1192223 -0.04319)
      PathPoint quadratus_lumb_mid_L3_2_r-P3: lumbar3 (-0.02936 0.02173 -0.03038)
    Thelen2003Muscle QL_mid_L3-12.1_l: max_isometric_force=11 optimal_fiber_length=0.06305602
        tendon_slack_length=0.03275182 pennation_angle=0.1291544
      PathPoint quadratus_lumb_mid_L3_3_r-P2: torso (-0.04128451 0.1282 -0.03119)
      PathPoint quadratus_lumb_mid_L3_3_r-P3: lumbar3 (-0.02936 0.02173 -0.03038)
    Thelen2003Muscle QL_mid_L2-12.1_l: max_isometric_force=9.2 optimal_fiber_length=0.04077783
        tendon_slack_length=0.02118034 pennation_angle=0.1291544
      PathPoint P1: torso (-0.04128 0.1282 -0.03119)
      PathPoint P1: lumbar2 (-0.02912141 0.01689594 -0.02562)
    Thelen2003Muscle QL_mid_L4-12.3_l: max_isometric_force=5.4 optimal_fiber_length=0.07288648
        tendon_slack_length=0.03785784 pennation_angle=0.1291544
      PathPoint quadratus_lumb_mid_L4_1_r-P1: torso (-0.04178247 0.1123161 -0.05167)
      PathPoint quadratus_lumb_mid_L4_1_r-P2: lumbar4 (-0.02138254 0.0307 -0.02806)
    Thelen2003Muscle QL_ant_I.2-T12_r: max_isometric_force=7.1 optimal_fiber_length=0.1045452
        tendon_slack_length=0.054301 pennation_angle=0.1291544
      PathPoint I.2_r-P1: pelvis (-0.1114699 0.05630756 0.05902)
      PathPoint T12_r-P2: torso (-0.01420084 0.13014 0.01737)
    Thelen2003Muscle QL_ant_I.3-T12_r: max_isometric_force=13.34 optimal_fiber_length=0.1033426
        tendon_slack_length=0.05367702 pennation_angle=0.1291544
      PathPoint I.3_r-P1: pelvis (-0.10477 0.06212 0.06917)
      PathPoint T12_r-P2: torso (-0.01420084 0.13014 0.01737)
    Thelen2003Muscle QL_ant_I.2-12.1_r: max_isometric_force=4.7 optimal_fiber_length=0.09988925
        tendon_slack_length=0.0518833 pennation_angle=0.1291544
      PathPoint I.2_r-P2: pelvis (-0.1114699 0.05630756 0.05902)
      PathPoint 12.1_r-P3: torso (-0.04028073 0.1244014 0.03745)
    Thelen2003Muscle QL_ant_I.3-12.1_r: max_isometric_force=8.9 optimal_fiber_length=0.0986533
        tendon_slack_length=0.05124134 pennation_angle=0.1291544
      PathPoint I.3_r-P1: pelvis (-0.10477 0.06212 0.06917)
      PathPoint 12.1_r-P2: torso (-0.04028073 0.1244014 0.03745)
    Thelen2003Muscle QL_ant_I.3-12.2_r: max_isometric_force=5.9 optimal_fiber_length=0.09285171
        tendon_slack_length=0.04822795 pennation_angle=0.1291544
      PathPoint I.3_r-P1: pelvis (-0.10477 0.06212 0.06917)
      PathPoint 12.2_r-P2: torso (-0.04024 0.11786 0.04608)
    Thelen2003Muscle QL_ant_I.3-12.3_r: max_isometric_force=6.8 optimal_fiber_length=0.08691859
        tendon_slack_length=0.0451 pennation_angle=0.1291544
      PathPoint I.3_r-P2: pelvis (-0.1047668 0.06211538 0.06917)
      PathPoint 12.3_r-P3: torso (-0.03801 0.1113589 0.05452)
    Thelen2003Muscle QL_ant_I.2-T12_l: max_isometric_force=7.1 optimal_fiber_length=0.1045452
        tendon_slack_length=0.054301 pennation_angle=0.1291544
      PathPoint I.2_l-P1: pelvis (-0.1114699 0.05630756 -0.05902)
      PathPoint T12_l-P2: torso (-0.01420084 0.13014 -0.01737)
    Thelen2003Muscle QL_ant_I.3-T12_l: max_isometric_force=13.34 optimal_fiber_length=0.1033426
        tendon_slack_length=0.05367702 pennation_angle=0.1291544
      PathPoint I.3_l-P1: pelvis (-0.10477 0.06212 -0.06917)
      PathPoint T12_l-P2: torso (-0.01420084 0.13014 -0.01737)
    Thelen2003Muscle QL_ant_I.2-12.1_l: max_isometric_force=4.7 optimal_fiber_length=0.09988925
        tendon_slack_length=0.0518833 pennation_angle=0.1291544
      PathPoint I.2_l-P2: pelvis (-0.1114699 0.05630756 -0.05902)
      PathPoint 12.1_l-P3: torso (-0.04028073 0.1244014 -0.03745)
    Thelen2003Muscle QL_ant_I.3-12.1_l: max_isometric_force=8.9 optimal_fiber_length=0.0986533
        tendon_slack_length=0.05124134 pennation_angle=0.1291544
      PathPoint I.3_l-P1: pelvis (-0.10477 0.06212 -0.06917)
      PathPoint 12.1_l-P2: torso (-0.04028073 0.1244014 -0.03745)
    Thelen2003Muscle QL_ant_I.3-12.2_l: max_isometric_force=5.9 optimal_fiber_length=0.09285171
        tendon_slack_length=0.04822795 pennation_angle=0.1291544
      PathPoint I.3_l-P1: pelvis (-0.10477 0.06212 -0.06917)
      PathPoint 12.2_l-P2: torso (-0.04024 0.11786 -0.04608)
    Thelen2003Muscle QL_ant_I.3-12.3_l: max_isometric_force=6.8 optimal_fiber_length=0.08691859
        tendon_slack_length=0.0451 pennation_angle=0.1291544
      PathPoint I.3_l-P2: pelvis (-0.1047668 0.06211538 -0.06917)
      PathPoint 12.3_l-P3: torso (-0.03801 0.1113589 -0.05452)
    Thelen2003Muscle MF_m1s_r: max_isometric_force=18.4 optimal_fiber_length=0.04684634 tendon_slack_length=0.01947641
        pennation_angle=0
      PathPoint P1: lumbar4 (-0.03097753 0.03239506 0.01747438)
      PathPoint P2: lumbar1 (-0.03431446 -0.0131463 0.00301684)
    Thelen2003Muscle MF_m1t.1_r: max_isometric_force=19.32 optimal_fiber_length=0.0751687 tendon_slack_length=0.0225396
        pennation_angle=0
      PathPoint P1: lumbar5 (-0.01863466 0.03696974 0.01759464)
      PathPoint P2: lumbar1 (-0.04093853 -0.01600457 0.00309636)
    Thelen2003Muscle MF_m1t.2_r: max_isometric_force=16.56 optimal_fiber_length=0.09431214
        tendon_slack_length=0.0282798 pennation_angle=0
      PathPoint P1: sacrum (-0.1214239 0.0839766 0.01884)
      PathPoint P2: lumbar1 (-0.04094 -0.016 0.0031)
    Thelen2003Muscle MF_m1t.3_r: max_isometric_force=27.66 optimal_fiber_length=0.103 tendon_slack_length=0.03088368
        pennation_angle=0
      PathPoint P1: pelvis (-0.1445726 0.02642144 0.03835009)
      PathPoint P2: lumbar1 (-0.04094 -0.016 0.0031)
    Thelen2003Muscle MF_m2s_r: max_isometric_force=17.94 optimal_fiber_length=0.0453974 tendon_slack_length=0.01756569
        pennation_angle=0
      PathPoint P1: lumbar5 (-0.01850286 0.0376762 0.01581229)
      PathPoint P2: lumbar2 (-0.03583408 -0.01175905 0.00354943)
    Thelen2003Muscle MF_m2t.1_r: max_isometric_force=17.94 optimal_fiber_length=0.0638826
        tendon_slack_length=0.01942145 pennation_angle=0
      PathPoint P1: sacrum (-0.1207582 0.08521808 0.02043544)
      PathPoint P2: lumbar2 (-0.03956 -0.01839 0.00364)
    Thelen2003Muscle MF_m2t.2_r: max_isometric_force=45.54 optimal_fiber_length=0.080875 tendon_slack_length=0.0245875
        pennation_angle=0
      PathPoint P1: pelvis (-0.1473347 0.02115906 0.03684921)
      PathPoint P2: lumbar2 (-0.03956 -0.01839 0.00364)
    Thelen2003Muscle MF_m2t.3_r: max_isometric_force=45.54 optimal_fiber_length=0.091657 tendon_slack_length=0.0278654
        pennation_angle=0
      PathPoint P1: pelvis (-0.1497204 0.00799758 0.03457842)
      PathPoint P2: lumbar2 (-0.038808 -0.01873828 0.00236534)
    Thelen2003Muscle MF_m3s_r: max_isometric_force=24.84 optimal_fiber_length=0.039717 tendon_slack_length=0.01651236
        pennation_angle=0
      PathPoint P1: sacrum (-0.1215113 0.08363583 0.01741594)
      PathPoint P2: lumbar3 (-0.03719487 -0.00645328 0.00290733)
    Thelen2003Muscle MF_m3t.1_r: max_isometric_force=24 optimal_fiber_length=0.102818 tendon_slack_length=0.03423556
        pennation_angle=0
      PathPoint P1: pelvis (-0.1645047 -0.03497677 0.01709955)
      PathPoint P2: lumbar3 (-0.04338004 -0.01022519 0.00166214)
    Thelen2003Muscle MF_m3t.2_r: max_isometric_force=24 optimal_fiber_length=0.08536116 tendon_slack_length=0.0284229
        pennation_angle=0
      PathPoint P1: pelvis (-0.1538747 -0.01606214 0.02185394)
      PathPoint P2: lumbar3 (-0.04336 -0.01023 0.00266)
    Thelen2003Muscle MF_m3t.3_r: max_isometric_force=24 optimal_fiber_length=0.08536116 tendon_slack_length=0.0284229
        pennation_angle=0
      PathPoint P1: pelvis (-0.1538747 -0.01606214 0.02185394)
      PathPoint P2: lumbar3 (-0.04336 -0.01023 0.00266)
    Thelen2003Muscle MF_m4s_r: max_isometric_force=24 optimal_fiber_length=0.037155 tendon_slack_length=0.02351
        pennation_angle=0
      PathPoint P1: sacrum (-0.1436888 0.05470988 0.01617919)
      PathPoint P2: lumbar4 (-0.03538188 -0.00021522 0.00224284)
    Thelen2003Muscle MF_m4t.1_r: max_isometric_force=21.4 optimal_fiber_length=0.054815 tendon_slack_length=0.02221967
        pennation_angle=0
      PathPoint P1: sacrum (-0.1522327 0.04152649 0.01535865)
      PathPoint P2: lumbar4 (-0.04180247 0.00016821 0.00288018)
    Thelen2003Muscle MF_m4t.2_r: max_isometric_force=21.4 optimal_fiber_length=0.07336 tendon_slack_length=0.0297369
        pennation_angle=0
      PathPoint P1: pelvis (-0.1622919 -0.02865772 0.01520358)
      PathPoint P2: lumbar4 (-0.0428 0.00017 0.00288)
    Thelen2003Muscle MF_m4t.3_r: max_isometric_force=21.4 optimal_fiber_length=0.084787 tendon_slack_length=0.034369
        pennation_angle=0
      PathPoint P1: pelvis (-0.1708276 -0.04118084 0.01272153)
      PathPoint P2: lumbar4 (-0.0441 0.00017 0.00288)
    Thelen2003Muscle MF_m5s_r: max_isometric_force=10.35 optimal_fiber_length=0.0145575 tendon_slack_length=0.00644247
        pennation_angle=0
      PathPoint P1: sacrum (-0.1304555 0.06627028 0.01042641)
      PathPoint P2: lumbar5 (-0.03016379 0.01539 0.00392934)
    Thelen2003Muscle MF_m5t.1_r: max_isometric_force=10.35 optimal_fiber_length=0.0759196 tendon_slack_length=0.0307746
        pennation_angle=0
      PathPoint P1: sacrum (-0.1740667 0.00522922 0.0100331)
      PathPoint P2: lumbar5 (-0.03551 0.01686295 0.00292592)
    Thelen2003Muscle MF_m5t.2_r: max_isometric_force=10.35 optimal_fiber_length=0.056763 tendon_slack_length=0.02301
        pennation_angle=0
      PathPoint P1: sacrum (-0.1631164 0.02566182 0.01170795)
      PathPoint P2: lumbar5 (-0.03455157 0.01592873 0.00277147)
    Thelen2003Muscle MF_m5t.3_r: max_isometric_force=10.35 optimal_fiber_length=0.0403 tendon_slack_length=0.0070892
        pennation_angle=0
      PathPoint P1: sacrum (-0.1522756 0.04258436 0.01159667)
      PathPoint P2: lumbar5 (-0.03282277 0.01524697 0.00232083)
    Thelen2003Muscle MF_m1.laminar_r: max_isometric_force=8.85 optimal_fiber_length=0.03129
        tendon_slack_length=0.0118819 pennation_angle=0
      PathPoint P1: lumbar3 (-0.03870847 0.02527 0.01691)
      PathPoint P2: lumbar1 (-0.03410191 -0.00560525 0.00619)
    Thelen2003Muscle MF_m2.laminar_r: max_isometric_force=10.2 optimal_fiber_length=0.02692174
        tendon_slack_length=0.01022244 pennation_angle=0
      PathPoint P1: lumbar4 (-0.03056218 0.03350373 0.01694)
      PathPoint P2: lumbar2 (-0.03290099 -0.00561 0.00674)
    Thelen2003Muscle MF_m3.laminar_r: max_isometric_force=10.615 optimal_fiber_length=0.02616
        tendon_slack_length=0.009933 pennation_angle=0
      PathPoint P1: lumbar5 (-0.01870029 0.03744209 0.01617)
      PathPoint P2: lumbar3 (-0.03594424 0.00069045 0.00635)
    Thelen2003Muscle MF_m4.laminar_r: max_isometric_force=7.7 optimal_fiber_length=0.028602 tendon_slack_length=0.01086
        pennation_angle=0
      PathPoint P1: sacrum (-0.12536 0.07748793 0.01934)
      PathPoint P2: lumbar4 (-0.03211529 0.00581344 0.00694)
    Thelen2003Muscle MF_m5.laminar_r: max_isometric_force=16.6 optimal_fiber_length=0.02565
        tendon_slack_length=0.009739 pennation_angle=0
      PathPoint P1: pelvis (-0.134206 0.01111 0.01238)
      PathPoint MF_m5.laminar_-P2: lumbar5 (-0.02589959 0.01705 0.00564)
    Thelen2003Muscle MF_m1s_l: max_isometric_force=18.4 optimal_fiber_length=0.04684634 tendon_slack_length=0.01947641
        pennation_angle=0
      PathPoint P1: lumbar4 (-0.03097753 0.03239506 -0.01747)
      PathPoint P2: lumbar1 (-0.03431446 -0.0131463 -0.00302)
    Thelen2003Muscle MF_m1t.1_l: max_isometric_force=19.32 optimal_fiber_length=0.0751687 tendon_slack_length=0.0225396
        pennation_angle=0
      PathPoint P1: lumbar5 (-0.01863466 0.03696974 -0.01759)
      PathPoint P2: lumbar1 (-0.04093853 -0.01600457 -0.0031)
    Thelen2003Muscle MF_m1t.2_l: max_isometric_force=16.56 optimal_fiber_length=0.09431214
        tendon_slack_length=0.0282798 pennation_angle=0
      PathPoint P1: sacrum (-0.1214239 0.0839766 -0.01884)
      PathPoint P2: lumbar1 (-0.04094 -0.016 -0.0031)
    Thelen2003Muscle MF_m1t.3_l: max_isometric_force=27.66 optimal_fiber_length=0.103 tendon_slack_length=0.03088368
        pennation_angle=0
      PathPoint P1: pelvis (-0.1445726 0.02642144 -0.03835)
      PathPoint P2: lumbar1 (-0.04094 -0.016 -0.0031)
    Thelen2003Muscle MF_m2s_l: max_isometric_force=17.94 optimal_fiber_length=0.0453974 tendon_slack_length=0.01756569
        pennation_angle=0
      PathPoint P1: lumbar5 (-0.01850286 0.0376762 -0.01581)
      PathPoint P2: lumbar2 (-0.03583408 -0.01175905 -0.00355)
    Thelen2003Muscle MF_m2t.1_l: max_isometric_force=17.94 optimal_fiber_length=0.0638826
        tendon_slack_length=0.01942145 pennation_angle=0
      PathPoint P1: sacrum (-0.1207582 0.08521808 -0.02044)
      PathPoint P2: lumbar2 (-0.03956 -0.01839 -0.00364)
    Thelen2003Muscle MF_m2t.2_l: max_isometric_force=45.54 optimal_fiber_length=0.080875 tendon_slack_length=0.0245875
        pennation_angle=0
      PathPoint P1: pelvis (-0.1473347 0.02115906 -0.03685)
      PathPoint P2: lumbar2 (-0.03956 -0.01839 -0.00364)
    Thelen2003Muscle MF_m2t.3_l: max_isometric_force=45.54 optimal_fiber_length=0.091657 tendon_slack_length=0.0278654
        pennation_angle=0
      PathPoint P1: pelvis (-0.1497204 0.00799758 -0.03458)
      PathPoint P2: lumbar2 (-0.038808 -0.01873828 -0.00364)
    Thelen2003Muscle MF_m3s_l: max_isometric_force=24.84 optimal_fiber_length=0.039717 tendon_slack_length=0.01651236
        pennation_angle=0
      PathPoint P1: sacrum (-0.1215113 0.08363583 -0.01742)
      PathPoint P2: lumbar3 (-0.03719487 -0.00645328 -0.00237)
    Thelen2003Muscle MF_m3t.1_l: max_isometric_force=24 optimal_fiber_length=0.102818 tendon_slack_length=0.03423556
        pennation_angle=0
      PathPoint P1: pelvis (-0.1645047 -0.03497677 -0.0171)
      PathPoint P2: lumbar3 (-0.04338004 -0.01022519 -0.00291)
    Thelen2003Muscle MF_m3t.2_l: max_isometric_force=24 optimal_fiber_length=0.08536116 tendon_slack_length=0.0284229
        pennation_angle=0
      PathPoint P1: pelvis (-0.1538747 -0.01606214 -0.02185)
      PathPoint P2: lumbar3 (-0.04336 -0.01023 -0.00266)
    Thelen2003Muscle MF_m3t.3_l: max_isometric_force=24 optimal_fiber_length=0.08536116 tendon_slack_length=0.0284229
        pennation_angle=0
      PathPoint P1: pelvis (-0.1538747 -0.01606214 -0.02185)
      PathPoint P2: lumbar3 (-0.04336 -0.01023 -0.00266)
    Thelen2003Muscle MF_m4s_l: max_isometric_force=24 optimal_fiber_length=0.037155 tendon_slack_length=0.02351
        pennation_angle=0
      PathPoint P1: sacrum (-0.1436888 0.05470988 -0.01618)
      PathPoint P2: lumbar4 (-0.03538188 -0.00021522 -0.00266)
    Thelen2003Muscle MF_m4t.1_l: max_isometric_force=21.4 optimal_fiber_length=0.054815 tendon_slack_length=0.02221967
        pennation_angle=0
      PathPoint P1: sacrum (-0.1522327 0.04152649 -0.01536)
      PathPoint P2: lumbar4 (-0.04180247 0.00016821 -0.00224)
    Thelen2003Muscle MF_m4t.2_l: max_isometric_force=21.4 optimal_fiber_length=0.07336 tendon_slack_length=0.0297369
        pennation_angle=0
      PathPoint P1: pelvis (-0.1622919 -0.02865772 -0.0152)
      PathPoint P2: lumbar4 (-0.0428 0.00017 -0.00288)
    Thelen2003Muscle MF_m4t.3_l: max_isometric_force=21.4 optimal_fiber_length=0.084787 tendon_slack_length=0.034369
        pennation_angle=0
      PathPoint P1: pelvis (-0.1708276 -0.04118084 -0.01272)
      PathPoint P2: lumbar4 (-0.0441 0.00017 -0.00288)
    Thelen2003Muscle MF_m5s_l: max_isometric_force=10.35 optimal_fiber_length=0.0145575 tendon_slack_length=0.00644247
        pennation_angle=0
      PathPoint P1: sacrum (-0.1304555 0.06627028 -0.01043)
      PathPoint P2: lumbar5 (-0.03016379 0.01539 -0.00393)
    Thelen2003Muscle MF_m5t.1_l: max_isometric_force=10.35 optimal_fiber_length=0.0759196 tendon_slack_length=0.0307746
        pennation_angle=0
      PathPoint P1: sacrum (-0.1740667 0.00522922 -0.01003)
      PathPoint P2: lumbar5 (-0.03551 0.01686295 -0.00293)
    Thelen2003Muscle MF_m5t.2_l: max_isometric_force=10.35 optimal_fiber_length=0.056763 tendon_slack_length=0.02301
        pennation_angle=0
      PathPoint P1: sacrum (-0.1631164 0.02566182 -0.01171)
      PathPoint P2: lumbar5 (-0.03455157 0.01592873 -0.00293)
    Thelen2003Muscle MF_m5t.3_l: max_isometric_force=10.35 optimal_fiber_length=0.0403 tendon_slack_length=0.0070892
        pennation_angle=0
      PathPoint P1: sacrum (-0.1522756 0.04258436 -0.0116)
      PathPoint P2: lumbar5 (-0.03282277 0.01524697 -0.00277)
    Thelen2003Muscle MF_m1.laminar_l: max_isometric_force=8.85 optimal_fiber_length=0.03129
        tendon_slack_length=0.0118819 pennation_angle=0
      PathPoint P1: lumbar3 (-0.03870847 0.02527 -0.01691)
      PathPoint P2: lumbar1 (-0.03410191 -0.00560525 -0.00619)
    Thelen2003Muscle MF_m2.laminar_l: max_isometric_force=10.2 optimal_fiber_length=0.02692174
        tendon_slack_length=0.01022244 pennation_angle=0
      PathPoint P1: lumbar4 (-0.03056218 0.03350373 -0.01694)
      PathPoint P2: lumbar2 (-0.03290099 -0.00561 -0.00674)
    Thelen2003Muscle MF_m3.laminar_l: max_isometric_force=10.615 optimal_fiber_length=0.02616
        tendon_slack_length=0.009933 pennation_angle=0
      PathPoint P1: lumbar5 (-0.01870029 0.03744209 -0.01617)
      PathPoint P2: lumbar3 (-0.03594424 0.00069045 -0.00635)
    Thelen2003Muscle MF_m4.laminar_l: max_isometric_force=7.7 optimal_fiber_length=0.028602 tendon_slack_length=0.01086
        pennation_angle=0
      PathPoint P1: sacrum (-0.12536 0.07748793 -0.01934)
      PathPoint P2: lumbar4 (-0.03211529 0.00581344 -0.00694)
    Thelen2003Muscle MF_m5.laminar_l: max_isometric_force=16.6 optimal_fiber_length=0.02565
        tendon_slack_length=0.009739 pennation_angle=0
      PathPoint P1: pelvis (-0.134206 0.01111 -0.01238)
      PathPoint P2: lumbar5 (-0.02589959 0.01705 -0.00564)
    Thelen2003Muscle EO1_r: max_isometric_force=90 optimal_fiber_length=0.0358775 tendon_slack_length=0.0569831
        pennation_angle=0
      PathPoint P1: Abdomen (0.0065502 0.06274311 0.03089373)
      PathPoint P2: torso (0.08819729 0.1779943 0.09565683)
    Thelen2003Muscle EO2_r: max_isometric_force=106.6 optimal_fiber_length=0.0379268 tendon_slack_length=0.055165
        pennation_angle=0
      PathPoint P1: torso (0.09058984 0.14533 0.104779)
      PathPoint P2: Abdomen (0.00723321 0.03295649 0.03645507)
    Thelen2003Muscle EO3_r: max_isometric_force=111.87 optimal_fiber_length=0.038402 tendon_slack_length=0.046576
        pennation_angle=0
      PathPoint P1: torso (0.08537007 0.1133223 0.108229)
      PathPoint P2: Abdomen (0.00677141 0.0129967 0.04163464)
    Thelen2003Muscle EO4_r: max_isometric_force=108 optimal_fiber_length=0.03929399 tendon_slack_length=0.044785
        pennation_angle=0
      PathPoint P1: torso (0.07456051 0.09141641 0.1041119)
      PathPoint default: Abdomen (0.00695134 -0.00599564 0.04033015)
    Thelen2003Muscle EO5_r: max_isometric_force=125.6 optimal_fiber_length=0.0470542 tendon_slack_length=0.0515216
        pennation_angle=0
      PathPoint P1: torso (0.0168281 0.1079592 0.1178628)
      PathPoint P2: pelvis (-0.0592662 0.05941413 0.1138156)
    Thelen2003Muscle EO6_r: max_isometric_force=182.8 optimal_fiber_length=0.05652438 tendon_slack_length=0.05713
        pennation_angle=0
      PathPoint P1: torso (-0.00233202 0.09212323 0.1051061)
      PathPoint P2: pelvis (-0.07007624 0.06213701 0.1041192)
    Thelen2003Muscle IO1_r: max_isometric_force=85.24 optimal_fiber_length=0.04229777 tendon_slack_length=0.06399
        pennation_angle=0
      PathPoint P1: Abdomen (0.00306951 -0.04065765 0.04537545)
      PathPoint P2: pelvis (-0.02564865 0.00060866 0.1224575)
    Thelen2003Muscle IO2_r: max_isometric_force=103.18 optimal_fiber_length=0.0435 tendon_slack_length=0.0659496
        pennation_angle=0
      PathPoint P1: Abdomen (0.00068053 -0.01153038 0.05138893)
      PathPoint P2: pelvis (-0.0345887 0.02556689 0.1270718)
    Thelen2003Muscle IO3_r: max_isometric_force=103.96 optimal_fiber_length=0.0516783 tendon_slack_length=0.07835
        pennation_angle=0
      PathPoint P1: Abdomen (0.00338096 0.02930521 0.04187736)
      PathPoint P2: pelvis (-0.04468011 0.046659 0.1224252)
    Thelen2003Muscle IO4_r: max_isometric_force=123.1 optimal_fiber_length=0.06969329 tendon_slack_length=0.04696
        pennation_angle=0
      PathPoint P1: torso (0.07698861 0.1100322 0.1145)
      PathPoint P2: pelvis (-0.05738 0.05889906 0.1104889)
    Thelen2003Muscle IO5_r: max_isometric_force=108 optimal_fiber_length=0.05683505 tendon_slack_length=0.038296
        pennation_angle=0
      PathPoint P1: torso (0.03742 0.09485 0.1111113)
      PathPoint P2: pelvis (-0.08488889 0.065154 0.09145)
    Thelen2003Muscle IO6_r: max_isometric_force=95.3 optimal_fiber_length=0.05439 tendon_slack_length=0.03665
        pennation_angle=0
      PathPoint P1: torso (0.00544396 0.08441785 0.1)
      PathPoint P2: pelvis (-0.1096003 0.06085626 0.06969784)
    Thelen2003Muscle EO1_l: max_isometric_force=90 optimal_fiber_length=0.0358775 tendon_slack_length=0.0569831
        pennation_angle=0
      PathPoint P1: Abdomen (0.0065502 0.06274311 -0.03089)
      PathPoint P2: torso (0.0882 0.1779943 -0.09566)
    Thelen2003Muscle EO2_l: max_isometric_force=106.6 optimal_fiber_length=0.0379268 tendon_slack_length=0.055165
        pennation_angle=0
      PathPoint P1: torso (0.09058984 0.14533 -0.10478)
      PathPoint P2: Abdomen (0.00723321 0.03295649 -0.03646)
    Thelen2003Muscle EO3_l: max_isometric_force=111.87 optimal_fiber_length=0.038402 tendon_slack_length=0.046576
        pennation_angle=0
      PathPoint P1: torso (0.08537007 0.1133223 -0.10823)
      PathPoint P2: Abdomen (0.00677141 0.0129967 -0.04163)
    Thelen2003Muscle EO4_l: max_isometric_force=108 optimal_fiber_length=0.03929399 tendon_slack_length=0.044785
        pennation_angle=0
      PathPoint P1: torso (0.07456051 0.09141641 -0.10411)
      PathPoint P2: Abdomen (0.00695134 -0.00599564 -0.04033)
    Thelen2003Muscle EO5_l: max_isometric_force=125.6 optimal_fiber_length=0.0470542 tendon_slack_length=0.0515216
        pennation_angle=0
      PathPoint P1: torso (0.0168281 0.1079592 -0.11786)
      PathPoint P2: pelvis (-0.0592662 0.05941413 -0.11382)
    Thelen2003Muscle EO6_l: max_isometric_force=182.8 optimal_fiber_length=0.05652438 tendon_slack_length=0.05713
        pennation_angle=0
      PathPoint P1: torso (-0.00233202 0.09212323 -0.10511)
      PathPoint P2: pelvis (-0.07007624 0.06213701 -0.10412)
    Thelen2003Muscle IO1_l: max_isometric_force=85.24 optimal_fiber_length=0.04229777 tendon_slack_length=0.06399
        pennation_angle=0
      PathPoint P1: Abdomen (0.00306951 -0.04065765 -0.04538)
      PathPoint P2: pelvis (-0.02564865 0.00060866 -0.12246)
    Thelen2003Muscle IO2_l: max_isometric_force=103.18 optimal_fiber_length=0.0435 tendon_slack_length=0.0659496
        pennation_angle=0
      PathPoint P1: Abdomen (0.00068053 -0.01153038 -0.05139)
      PathPoint P2: pelvis (-0.0345887 0.02556689 -0.12707)
    Thelen2003Muscle IO3_l: max_isometric_force=103.96 optimal_fiber_length=0.0516783 tendon_slack_length=0.07835
        pennation_angle=0
      PathPoint P1: Abdomen (0.00338096 0.02930521 -0.04188)
      PathPoint P2: pelvis (-0.04468011 0.046659 -0.12243)
    Thelen2003Muscle IO4_l: max_isometric_force=123.1 optimal_fiber_length=0.06969329 tendon_slack_length=0.04696
        pennation_angle=0
      PathPoint P1: torso (0.07698861 0.1100322 -0.1145)
      PathPoint P2: pelvis (-0.05738 0.05889906 -0.11049)
    Thelen2003Muscle IO5_l: max_isometric_force=108 optimal_fiber_length=0.05683505 tendon_slack_length=0.038296
        pennation_angle=0
      PathPoint P1: torso (0.03742 0.09485 -0.11111)
      PathPoint P2: pelvis (-0.08488889 0.065154 -0.09145)
    Thelen2003Muscle IO6_l: max_isometric_force=95.3 optimal_fiber_length=0.05439 tendon_slack_length=0.03665
        pennation_angle=0
      PathPoint P1: torso (0.00544396 0.08441785 -0.1)
      PathPoint P2: pelvis (-0.1096003 0.06085626 -0.0697)
    Thelen2003Muscle LD_L1_r: max_isometric_force=41.4 optimal_fiber_length=0.316063 tendon_slack_length=0.0692329
        pennation_angle=0
      PathPoint P1: lumbar1 (-0.04120798 -0.01126311 0.00433164)
      PathPoint P2: r_humerus (-0.00948737 -0.01525259 0.00268873)
      PathWrap: wrap_object=Chest_r method=hybrid
    Thelen2003Muscle LD_L2_r: max_isometric_force=41.4 optimal_fiber_length=0.338256 tendon_slack_length=0.0740942
        pennation_angle=0
      PathPoint P1: lumbar2 (-0.04121003 -0.01341482 0.00414584)
      PathPoint P2: r_humerus (-0.00949 -0.01525 0.00269)
      PathWrap: wrap_object=Chest_r method=hybrid
    Thelen2003Muscle LD_L3_r: max_isometric_force=50.6 optimal_fiber_length=0.3550696 tendon_slack_length=0.077777
        pennation_angle=0
      PathPoint P1: lumbar3 (-0.0412101 -0.00326511 0.00385971)
      PathPoint P2: r_humerus (-0.00949 -0.01525 0.00433)
      PathWrap: wrap_object=Chest_r method=hybrid
    Thelen2003Muscle LD_L4_r: max_isometric_force=50.6 optimal_fiber_length=0.3719192 tendon_slack_length=0.081468
        pennation_angle=0
      PathPoint P1: lumbar4 (-0.04118556 0.00371996 0.00462278)
      PathPoint P2: r_humerus (-0.00949 -0.01525 0.00269)
      PathWrap: wrap_object=Chest_r method=hybrid
    Thelen2003Muscle LD_L5_r: max_isometric_force=50.6 optimal_fiber_length=0.3902216 tendon_slack_length=0.080135
        pennation_angle=0
      PathPoint P1: lumbar5 (-0.0344809 0.0184377 0.00411073)
      PathPoint P2: r_humerus (-0.00949 -0.01525 0.00269)
      PathWrap: wrap_object=Chest_r method=hybrid
    Thelen2003Muscle LD_T12_r: max_isometric_force=23 optimal_fiber_length=0.3032209 tendon_slack_length=0.06226857
        pennation_angle=0
      PathPoint P1: r_humerus (-0.00949 -0.01525 0.00269)
      PathPoint P2: torso (-0.05379102 0.1002792 0.0043635)
      PathWrap: wrap_object=Chest_r method=hybrid range=(1 2)
    Thelen2003Muscle LD_T11_r: max_isometric_force=27.6 optimal_fiber_length=0.2848084 tendon_slack_length=0.058487
        pennation_angle=0
      PathPoint P1: r_humerus (-0.00949 -0.01525 0.00269)
      PathPoint P2: torso (-0.06312135 0.127085 0.00345808)
      PathWrap: wrap_object=Chest_r method=hybrid
    Thelen2003Muscle LD_T10_r: max_isometric_force=27.6 optimal_fiber_length=0.279701 tendon_slack_length=0.0437628
        pennation_angle=0
      PathPoint P1: r_humerus (-0.00949 -0.01525 0.00269)
      PathPoint P2: torso (-0.06920162 0.1544713 0.00382991)
      PathWrap: wrap_object=Chest_r method=hybrid
    Thelen2003Muscle LD_T9_r: max_isometric_force=18.4 optimal_fiber_length=0.256967 tendon_slack_length=0.14
        pennation_angle=0
      PathPoint P1: r_humerus (-0.00949 -0.01525 0.00269)
      PathPoint P2: torso (-0.08 0.1892265 0.00407649)
      PathWrap: wrap_object=Chest_r method=hybrid
    Thelen2003Muscle LD_T8_r: max_isometric_force=18.4 optimal_fiber_length=0.232514 tendon_slack_length=0.0477484
        pennation_angle=0
      PathPoint P1: r_humerus (-0.00949 -0.01525 0.00269)
      PathPoint P2: torso (-0.08268454 0.2108802 0.00427544)
      PathWrap: wrap_object=Chest_r method=hybrid
    Thelen2003Muscle LD_T7_r: max_isometric_force=18.4 optimal_fiber_length=0.223761 tendon_slack_length=0.045951
        pennation_angle=0
      PathPoint P1: r_humerus (-0.00949 -0.01525 0.00269)
      PathPoint P2: torso (-0.09173449 0.2300145 0.00407354)
      PathWrap: wrap_object=Chest_r method=hybrid
    Thelen2003Muscle LD_R12_r: max_isometric_force=18.4 optimal_fiber_length=0.2444749 tendon_slack_length=0.0502047
        pennation_angle=0
      PathPoint P1: r_humerus (-0.00949 -0.01525 0.00269)
      PathPoint P2: torso (-0.04327009 0.1215789 0.04426621)
    Thelen2003Muscle LD_R11_r: max_isometric_force=27.6 optimal_fiber_length=0.240735 tendon_slack_length=0.0494366
        pennation_angle=0
      PathPoint P1: r_humerus (-0.00949 -0.01525 0.00433)
      PathPoint P2: torso (-0.06310506 0.1423031 0.05214383)
      PathWrap: wrap_object=Chest_r method=hybrid
    Thelen2003Muscle LD_Il_r: max_isometric_force=32.2 optimal_fiber_length=0.432081 tendon_slack_length=0.0186802
        pennation_angle=0
      PathPoint P1: pelvis (-0.1262257 0.04347951 0.04868304)
      PathPoint P2: r_humerus (-0.00949 -0.01525 0.00269)
      PathWrap: wrap_object=Chest_r method=hybrid
    Thelen2003Muscle LD_L1_l: max_isometric_force=41.4 optimal_fiber_length=0.316063 tendon_slack_length=0.0692329
        pennation_angle=0
      PathPoint P1: lumbar1 (-0.04120798 -0.01126 -0.00433)
      PathPoint P2: l_humerus (-0.00948737 -0.01525 -0.00269)
      PathWrap: wrap_object=Chest_l method=hybrid
    Thelen2003Muscle LD_L2_l: max_isometric_force=41.4 optimal_fiber_length=0.338256 tendon_slack_length=0.0740942
        pennation_angle=0
      PathPoint P1: lumbar2 (-0.04121003 -0.01341 -0.00415)
      PathPoint P2: l_humerus (-0.00949 -0.01525 -0.00269)
      PathWrap: wrap_object=Chest_l method=hybrid
    Thelen2003Muscle LD_L3_l: max_isometric_force=50.6 optimal_fiber_length=0.3550696 tendon_slack_length=0.077777
        pennation_angle=0
      PathPoint P1: lumbar3 (-0.0412101 -0.00326511 -0.00386)
      PathPoint P2: l_humerus (-0.00949 -0.01525 -0.00433)
      PathWrap: wrap_object=Chest_l method=hybrid
    Thelen2003Muscle LD_L4_l: max_isometric_force=50.6 optimal_fiber_length=0.3719192 tendon_slack_length=0.081468
        pennation_angle=0
      PathPoint P1: lumbar4 (-0.04118556 0.00371996 -0.00462)
      PathPoint P2: l_humerus (-0.00949 -0.01525 -0.00269)
      PathWrap: wrap_object=Chest_l method=hybrid
    Thelen2003Muscle LD_L5_l: max_isometric_force=50.6 optimal_fiber_length=0.3902216 tendon_slack_length=0.080135
        pennation_angle=0
      PathPoint P1: lumbar5 (-0.0344809 0.0184377 -0.00411)
      PathPoint P2: l_humerus (-0.00949 -0.01525 -0.00269)
      PathWrap: wrap_object=Chest_l method=hybrid
    Thelen2003Muscle LD_T12_l: max_isometric_force=23 optimal_fiber_length=0.3032209 tendon_slack_length=0.06226857
        pennation_angle=0
      PathPoint P1: l_humerus (-0.00949 -0.01525 -0.00269)
      PathPoint P2: torso (-0.05379102 0.1002792 -0.00436)
      PathWrap: wrap_object=Chest_l method=hybrid
    Thelen2003Muscle LD_T11_l: max_isometric_force=27.6 optimal_fiber_length=0.2848084 tendon_slack_length=0.058487
        pennation_angle=0
      PathPoint P1: l_humerus (-0.00949 -0.01525 -0.00269)
      PathPoint P2: torso (-0.06312135 0.127085 -0.00346)
      PathWrap: wrap_object=Chest_l method=hybrid
    Thelen2003Muscle LD_T10_l: max_isometric_force=27.6 optimal_fiber_length=0.279701 tendon_slack_length=0.0437628
        pennation_angle=0
      PathPoint P1: l_humerus (-0.00949 -0.01525 -0.00269)
      PathPoint P2: torso (-0.06920162 0.1544713 -0.00383)
      PathWrap: wrap_object=Chest_l method=hybrid
    Thelen2003Muscle LD_T9_l: max_isometric_force=18.4 optimal_fiber_length=0.256967 tendon_slack_length=0.14
        pennation_angle=0
      PathPoint P1: l_humerus (-0.00949 -0.01525 -0.00269)
      PathPoint P2: torso (-0.08 0.1892265 -0.00408)
      PathWrap: wrap_object=Chest_l method=hybrid
    Thelen2003Muscle LD_T8_l: max_isometric_force=18.4 optimal_fiber_length=0.232514 tendon_slack_length=0.0477484
        pennation_angle=0
      PathPoint P1: l_humerus (-0.00949 -0.01525 -0.00269)
      PathPoint P2: torso (-0.08268454 0.2108802 -0.00428)
      PathWrap: wrap_object=Chest_l method=hybrid
    Thelen2003Muscle LD_T7_l: max_isometric_force=18.4 optimal_fiber_length=0.223761 tendon_slack_length=0.045951
        pennation_angle=0
      PathPoint P1: l_humerus (-0.00949 -0.01525 -0.00269)
      PathPoint P2: torso (-0.09173449 0.2300145 -0.00407)
      PathWrap: wrap_object=Chest_l method=hybrid
    Thelen2003Muscle LD_R12_l: max_isometric_force=18.4 optimal_fiber_length=0.2444749 tendon_slack_length=0.0502047
        pennation_angle=0
      PathPoint LD_l12_l-P1: l_humerus (-0.00949 -0.01525 -0.00269)
      PathPoint LD_l12_l-P2: torso (-0.04327009 0.1215789 -0.04427)
      PathWrap: wrap_object=Chest_l method=hybrid
    Thelen2003Muscle LD_R11_l: max_isometric_force=27.6 optimal_fiber_length=0.240735 tendon_slack_length=0.0494366
        pennation_angle=0
      PathPoint LD_l11_l-P1: l_humerus (-0.00949 -0.01525 -0.00433)
      PathPoint LD_l11_l-P2: torso (-0.06310506 0.1423031 -0.05214)
      PathWrap: wrap_object=Chest_l method=hybrid
    Thelen2003Muscle LD_Il_l: max_isometric_force=32.2 optimal_fiber_length=0.432081 tendon_slack_length=0.0186802
        pennation_angle=0
      PathPoint P1: pelvis (-0.1262257 0.04347951 -0.04868)
      PathPoint P2: l_humerus (-0.00949 -0.01525 -0.00269)
      PathWrap: wrap_object=Chest_l method=hybrid
    ObjectGroup iliocostalis_lumborum_pars_lumborum: members=(IL_L4_l IL_L4_r IL_L3_l IL_L3_r IL_L2_l IL_L2_r IL_L1_l IL_L1_r)
    ObjectGroup iliocostalis_lumborum_pars_thoracis_left: members=(IL_r12_L IL_r11_L IL_r10_L IL_r9_L IL_r8_L IL_r7_L IL_r6_L IL_r5_L)
    ObjectGroup iliocostalis_lumborum_pars_thoracis_right: members=(IL_r12_R IL_r11_R IL_r10_R IL_r9_R IL_r8_R IL_r7_R IL_r6_R IL_r5_R)
    ObjectGroup longissimus_thoracis_pars_thoracis_left: members=(LTpT_r12_L LTpT_r11_L LTpT_r10_L LTpT_r9_L LTpT_r8_L LTpT_r7_L LTpT_r6_L LTpT_r5_L LTpT_r4_L LTpT_t12_L LTpT_t11_L LTpT_t10_L LTpT_t9_L LTpT_t8_L LTpT_t7_L LTpT_t6_L LTpT_t4_L LTpT_t3_L LTpT_t2_L LTpT_t1_L)
    ObjectGroup longissimus_thoracis_pars_thoracis_right: members=(LTpT_r12_R LTpT_r11_R LTpT_r10_R LTpT_r9_R LTpT_r8_R LTpT_r7_R LTpT_r6_R LTpT_r5_R LTpT_r4_R LTpT_t12_R LTpT_t11_R LTpT_t10_R LTpT_t9_R LTpT_t8_R LTpT_t7_R LTpT_t6_R LTpT_t5_R LTpT_t4_R LTpT_t3_R LTpT_t2_R LTpT_t1_R)
    ObjectGroup longissimus_thoracis_pars_lumborum: members=(LTpL_L5_r LTpL_L4_r LTpL_L3_r LTpL_L2_r LTpL_L1_r LTpL_L5_l LTpL_L4_l LTpL_L3_l LTpL_L2_l LTpL_L1_l)
    ObjectGroup quadratus_lumborum: members=(QL_post_I.1-L3_r QL_post_I.2-L4_r QL_post_I.2-L3_r QL_post_I.2-L2_r QL_post_I.3-L1_r QL_post_I.3-L2_r QL_post_I.3-L3_r QL_mid_L3-12.3_r QL_mid_L3-12.2_r QL_mid_L3-12.1_r QL_mid_L2-12.1_r QL_mid_L4-12.3_r QL_ant_I.2-T12_r QL_ant_I.3-T12_r QL_ant_I.2-12.1_r QL_ant_I.3-12.1_r QL_ant_I.3-12.2_r QL_ant_I.3-12.3_r)
    ObjectGroup Psoas_major: members=(Ps_L1_L2_IVD_r Ps_L2_L3_IVD_r Ps_L3_L4_IVD_r Ps_L4_L5_IVD_r Ps_L1_L2_IVD_l Ps_L2_L3_IVD_l Ps_L3_L4_IVD_l Ps_L4_L5_IVD_l Ps_L1_TP_r Ps_L2_TP_r Ps_L3_TP_r Ps_L4_TP_r Ps_L5_TP_r Ps_L1_TP_l Ps_L2_TP_l Ps_L3_TP_l Ps_L4_TP_l Ps_L5_TP_l Ps_L1_VB_r Ps_L1_VB_l Ps_L5_VB_r Ps_L5_VB_l)
    ObjectGroup Multifidus_spinous_process: members=(MF_m1t.1_r MF_m1t.2_r MF_m1t.3_r MF_m2t.1_r MF_m2t.2_r MF_m2t.3_r MF_m3t.1_r MF_m3t.2_r MF_m3t.3_r MF_m4t.1_r MF_m4t.2_r MF_m4t.3_r MF_m5t.1_r MF_m5t.2_r MF_m5t.3_r MF_m1t.1_l MF_m1t.2_l MF_m1t.3_l MF_m2t.1_l MF_m2t.2_l MF_m2t.3_l MF_m3t.1_l MF_m3t.2_l MF_m3t.3_l MF_m4t.1_l MF_m4t.2_l MF_m4t.3_l MF_m5t.1_l MF_m5t.2_l MF_m5t.3_l MF_m1s_r MF_m2s_r MF_m3s_r MF_m4s_r MF_m5s_r MF_m1s_l MF_m2s_l MF_m3s_l MF_m4s_l MF_m5s_l)
    ObjectGroup Multifidus_entry_level: members=(MF_m1.laminar_r MF_m2.laminar_r MF_m3.laminar_r MF_m4.laminar_r MF_m5.laminar_r MF_m1.laminar_l MF_m2.laminar_l MF_m3.laminar_l MF_m4.laminar_l MF_m5.laminar_l)
    ObjectGroup Ext_Oblique: members=(EO1_l EO2_l EO3_l EO4_l EO5_l EO6_l EO1_r EO2_r EO3_r EO4_r EO5_r EO6_r)
    ObjectGroup Int_Oblique: members=(IO1_l IO2_l IO3_l IO4_l IO5_l IO6_l IO1_r IO2_r IO3_r IO4_r IO5_r IO6_r)
    ObjectGroup Rectus_Abdominis: members=(rect_abd_r rect_abd_l)
    ObjectGroup Latissimus Dorsi: members=(LD_Il_l LD_Il_r LD_T7_l LD_T8_l LD_T9_l LD_T10_l LD_T11_l LD_T12_l LD_R11_l LD_R12_l LD_L1_l LD_L2_l LD_L3_l LD_L4_l LD_L5_l LD_T7_r LD_T8_r LD_T9_r LD_T10_r LD_T11_r LD_T12_r LD_R11_r LD_R12_r LD_L1_r LD_L2_r LD_L3_r LD_L4_r LD_L5_r)
  BodySet:
    Body ground: mass=0 mass_center=(0 0 0) inertia_xx=0 inertia_yy=0 inertia_zz=0 meshes=treadmill.vtp
    Body r_humerus: mass=0 mass_center=(0 0 0) inertia_xx=0 inertia_yy=0 inertia_zz=0 meshes=arm_r_humerus.vtp
      WeldJoint r_shoulder: parent_body=torso location_in_parent=(0.02351 0.34534 0.16907) location=(0 0 0)
    Body l_humerus: mass=0 mass_center=(0 0 0) inertia_xx=0 inertia_yy=0 inertia_zz=0 meshes=humerus_lv.vtp
      WeldJoint l_shoulder: parent_body=torso location_in_parent=(0.02351 0.34534 -0.16907) location=(0 0 0)
    Body femur_l: mass=0 mass_center=(0 0 0) inertia_xx=0 inertia_yy=0 inertia_zz=0 meshes=l_femur.vtp
      WeldJoint hip_l: parent_body=pelvis location_in_parent=(-0.07907 -0.08 -0.077) location=(0 0 0)
    Body femur_r: mass=0 mass_center=(0 0 0) inertia_xx=0 inertia_yy=0 inertia_zz=0 meshes=femur_r.vtp
      WeldJoint hip_r: parent_body=pelvis location_in_parent=(-0.07907 -0.08 0.077) location=(0 0 0)
    Body pelvis: mass=0 mass_center=(0 0 0) inertia_xx=0.075 inertia_yy=0.08 inertia_zz=0.03
        meshes=(pelvis_rv.vtp pelvis_lv.vtp)
      WeldJoint gndpelvis: parent_body=ground location_in_parent=(0 0.979 0) location=(0 0 0)
    Body sacrum: mass=7.486 mass_center=(0 0 0) inertia_xx=0.075 inertia_yy=0.08 inertia_zz=0.03 meshes=sacrum.vtp
      CustomJoint HipJnt: parent_body=pelvis location_in_parent=(0 -0.049 0) location=(0 0 0)
        Coordinate Hip_Flexion: motion_type=rotational default_value=0 initial_value=0 range=(-1.5 1.5) clamped=false
        SpatialTransform: axes_held_at_zero=(rotation2 rotation3 translation1 translation2 translation3)
          TransformAxis rotation1: coordinates=Hip_Flexion axis=(0 0 1) LinearFunction(coefficients=1 0)
    Body LB_wrap: mass=0 mass_center=(0 0 0) inertia_xx=0 inertia_yy=0 inertia_zz=0
      CustomJoint LB_wrapjnt: parent_body=sacrum location_in_parent=(-0.098 0.071 0) location=(0 0 0)
        Coordinate LB_wrapjnt_r3: motion_type=rotational default_value=0 initial_value=0 range=(-99999.9 99999.9)
            clamped=false
        Coordinate LB_wrapjnt_t1: motion_type=translational default_value=0 initial_value=0 range=(-99999.9 99999.9)
            clamped=false
        Coordinate LB_wrapjnt_t2: motion_type=translational default_value=0 initial_value=0 range=(-99999.9 99999.9)
            clamped=false
        SpatialTransform: axes_held_at_zero=(rotation2 rotation3 translation3)
          TransformAxis rotation1: coordinates=LB_wrapjnt_r3 axis=(0 0 1) LinearFunction(coefficients=1 0)
          TransformAxis translation1: coordinates=LB_wrapjnt_t1 axis=(1 0 0) LinearFunction(coefficients=1 0)
          TransformAxis translation2: coordinates=LB_wrapjnt_t2 axis=(0 1 0) LinearFunction(coefficients=1 0)
      WrapCylinder Cylinder2: translation=(-0.118 0.0768 0) quadrant=all radius=0.07 length=0.26
    Body Abdomen: mass=0 mass_center=(0 0 0) inertia_xx=0 inertia_yy=0 inertia_zz=0
      CustomJoint Abdjnt: parent_body=sacrum location_in_parent=(-0.098 0.071 0) location=(-0.09 -0.09 0)
        Coordinate Abs_r3: motion_type=rotational default_value=0 initial_value=0 range=(-1.7 1.7) clamped=false
        Coordinate Abs_t1: motion_type=translational default_value=0 initial_value=0 range=(-99999.9 99999.9)
            clamped=false locked=true
        Coordinate Abs_t2: motion_type=translational default_value=0 initial_value=0 range=(-99999.9 99999.9)
            clamped=false locked=true
        SpatialTransform: axes_held_at_zero=(rotation2 rotation3 translation3)
          TransformAxis rotation1: coordinates=Abs_r3 axis=(0 0 1) LinearFunction(coefficients=1 0)
          TransformAxis translation1: coordinates=Abs_t1 axis=(1 0 0) LinearFunction(coefficients=1 0)
          TransformAxis translation2: coordinates=Abs_t2 axis=(0 1 0) LinearFunction(coefficients=1 0)
      WrapEllipsoid Abdomen: translation=(0 0 0) quadrant=x dimensions=(0.01 0.08 0.05)
    Body lumbar5: mass=1.824 mass_center=(0.01728 0.0183 0) inertia_xx=0.01219 inertia_yy=0.01765 inertia_zz=0.00546
        meshes=lumbar5.vtp
      CustomJoint L5_S1_IVDjnt: parent_body=sacrum location_in_parent=(-0.098 0.071 0) location=(0 0 0)
        Coordinate flex_extension: motion_type=rotational default_value=0 initial_value=0 range=(-1.22173 0.4537856)
            clamped=false
        Coordinate lat_bending: motion_type=rotational default_value=0 initial_value=0 range=(-0.4363323 0.4363323)
            clamped=false
        Coordinate axial_rotation: motion_type=rotational default_value=0 initial_value=0 range=(-0.9791297 0.9791297)
            clamped=false
        SpatialTransform: axes_held_at_zero=(translation1 translation2 translation3)
          TransformAxis rotation1: coordinates=flex_extension axis=(0 0 1) LinearFunction(coefficients=0.08892727 0)
          TransformAxis rotation2: coordinates=lat_bending axis=(1 0 0)
              PiecewiseLinearFunction(x=-1.018749 1.018749, y=-0.1380555 0.1380555)
          TransformAxis rotation3: coordinates=axial_rotation axis=(0 1 0)
            NaturalCubicSpline: x=(-0.9791297 0 0.9791297) y=(-0.0296706 0 0.02792527)
    Body lumbar4: mass=1.799 mass_center=(0.01816 0.02179527 0) inertia_xx=0.01123 inertia_yy=0.01643 inertia_zz=0.0052
        meshes=lumbar4.vtp
      CustomJoint L4_L5_IVDjnt: parent_body=lumbar5 location_in_parent=(0.01 0.0296 0) location=(0.001 -0.0025 0)
        Coordinate L4_L5_IVDjnt_r3: motion_type=rotational default_value=0 initial_value=0 range=(-99999.9 99999.9)
            clamped=false
        Coordinate L4_L5_IVD_bendjnt_r1: motion_type=rotational default_value=0 initial_value=0
            range=(-99999.9 99999.9) clamped=false
        Coordinate L4_L5_IVD_rotjnt_r2: motion_type=rotational default_value=0 initial_value=0 range=(-99999.9 99999.9)
            clamped=false
        SpatialTransform: axes_held_at_zero=(translation1 translation2 translation3)
          TransformAxis rotation1: coordinates=L4_L5_IVDjnt_r3 axis=(0 0 1) LinearFunction(coefficients=1 0)
          TransformAxis rotation2: coordinates=L4_L5_IVD_bendjnt_r1 axis=(1 0 0) Constant(value=0)
          TransformAxis rotation3: coordinates=L4_L5_IVD_rotjnt_r2 axis=(0 1 0) Constant(value=0)
    Body lumbar3: mass=1.67 mass_center=(0.017839 0.02327394 0) inertia_xx=0.01066 inertia_yy=0.01608
        inertia_zz=0.00541 meshes=lumbar3.vtp
      CustomJoint L3_L4_IVDjnt: parent_body=lumbar4 location_in_parent=(0 0.032 0) location=(-0.0006 -0.0012 0)
        Coordinate L3_L4_IVDjnt_r3: motion_type=rotational default_value=0 initial_value=0 range=(-99999.9 99999.9)
            clamped=false
        Coordinate L3_L4_IVD_bendjnt_r1: motion_type=rotational default_value=0 initial_value=0
            range=(-99999.9 99999.9) clamped=false
        Coordinate L3_L4_IVD_rotjnt_r2: motion_type=rotational default_value=0 initial_value=0 range=(-99999.9 99999.9)
            clamped=false
        SpatialTransform: axes_held_at_zero=(translation1 translation2 translation3)
          TransformAxis rotation1: coordinates=L3_L4_IVDjnt_r3 axis=(0 0 1) LinearFunction(coefficients=1 0)
          TransformAxis rotation2: coordinates=L3_L4_IVD_bendjnt_r1 axis=(1 0 0) LinearFunction(coefficients=1 0)
          TransformAxis rotation3: coordinates=L3_L4_IVD_rotjnt_r2 axis=(0 1 0) LinearFunction(coefficients=1 0)
    Body lumbar2: mass=1.689 mass_center=(0.02524622 0.02021242 0) inertia_xx=0.01091 inertia_yy=0.01682
        inertia_zz=0.00591 meshes=lumbar2.vtp
      CustomJoint L2_L3_IVD_jnt: parent_body=lumbar3 location_in_parent=(-0.008 0.0312 0) location=(-0.0013 -0.0039 0)
        Coordinate L2_L3_IVDjnt_r3: motion_type=rotational default_value=0 initial_value=0 range=(-99999.9 99999.9)
            clamped=false
        Coordinate L2_L3_IVD_bendjnt_r1: motion_type=rotational default_value=0 initial_value=0
            range=(-99999.9 99999.9) clamped=false
        Coordinate L2_L3_IVD_rotjnt_r2: motion_type=rotational default_value=0 initial_value=0 range=(-99999.9 99999.9)
            clamped=false
        SpatialTransform: axes_held_at_zero=(translation1 translation2 translation3)
          TransformAxis rotation1: coordinates=L2_L3_IVDjnt_r3 axis=(0 0 1) LinearFunction(coefficients=1 0)
          TransformAxis rotation2: coordinates=L2_L3_IVD_bendjnt_r1 axis=(1 0 0) LinearFunction(coefficients=1 0)
          TransformAxis rotation3: coordinates=L2_L3_IVD_rotjnt_r2 axis=(0 1 0) LinearFunction(coefficients=1 0)
    Body lumbar1: mass=1.677 mass_center=(0.03274 0.01940727 0.00132891) inertia_xx=0.01113 inertia_yy=0.01753
        inertia_zz=0.0064 meshes=lumbar1.vtp
      CustomJoint L1_L2_IVD_jnt: parent_body=lumbar2 location_in_parent=(-0.01 0.025 0) location=(0.0014 -0.0038 0)
        Coordinate L1_L2_IVDjnt_r3: motion_type=rotational default_value=0 initial_value=0 range=(-99999.9 99999.9)
            clamped=false
        Coordinate L1_L2_IVD_bendjnt_r1: motion_type=rotational default_value=0 initial_value=0
            range=(-99999.9 99999.9) clamped=false
        Coordinate L1_L2_IVD_rotjnt_r2: motion_type=rotational default_value=0 initial_value=0 range=(-99999.9 99999.9)
            clamped=false
        SpatialTransform: axes_held_at_zero=(translation1 translation2 translation3)
          TransformAxis rotation1: coordinates=L1_L2_IVDjnt_r3 axis=(0 0 1) LinearFunction(coefficients=0.85 0)
          TransformAxis rotation2: coordinates=L1_L2_IVD_bendjnt_r1 axis=(1 0 0) LinearFunction(coefficients=1 0)
          TransformAxis rotation3: coordinates=L1_L2_IVD_rotjnt_r2 axis=(0 1 0) LinearFunction(coefficients=1 0)
    Body torso: mass=18.619 mass_center=(0.02244 0.20665 0) inertia_xx=0.165 inertia_yy=0.15 inertia_zz=0.125
        meshes=(thoracic12_s.vtp thoracic11_s.vtp thoracic10_s.vtp thoracic9_s.vtp thoracic8_s.vtp thoracic7_s.vtp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)
      CustomJoint Torsojnt: parent_body=lumbar1 location_in_parent=(0.0025 -0.089 0) location=(0 0 0)
        Coordinate Torso_Rot: motion_type=rotational default_value=0 initial_value=0 range=(-1.1 1.1) clamped=false
        SpatialTransform: axes_held_at_zero=(rotation2 rotation3 translation1 translation2 translation3)
          TransformAxis rotation1: coordinates=Torso_Rot axis=(0 1 0) LinearFunction(coefficients=1 0)
      WrapCylinder Cylinder: translation=(-0.21 0.04 0) quadrant=all radius=0.17 length=0.26
      WrapEllipsoid Chest_r: xyz_body_rotation=(0 -0.4 0.2) translation=(0.008 0.21 0.01) quadrant=z
          dimensions=(0.073 0.16 0.13)
      WrapEllipsoid Chest_l: xyz_body_rotation=(0 0.4 0.2) translation=(0.008 0.21 -0.01) quadrant=-z
          dimensions=(0.073 0.16 0.13)
    ObjectGroup Lumbar_Vertebrae: members=(lumbar1 lumbar2 lumbar3 lumbar4 lumbar5)
  ConstraintSet:
    CoordinateCouplerConstraint LB_wrapjnt_r3_con: independent_coordinate_names=flex_extension
        dependent_coordinate_name=LB_wrapjnt_r3 scale_factor=1
        coupled_coordinates_function=PiecewiseLinearFunction(x=0 1, y=0 0.6)
    CoordinateCouplerConstraint LB_wrapjnt_t1_con: independent_coordinate_names=flex_extension
        dependent_coordinate_name=LB_wrapjnt_t1 scale_factor=1
      coupled_coordinates_function: PiecewiseLinearFunction: x=(0 0.4537856) y=(0 0.015)
    CoordinateCouplerConstraint LB_wrapjnt_t2_con: independent_coordinate_names=flex_extension
        dependent_coordinate_name=LB_wrapjnt_t2 scale_factor=1
      coupled_coordinates_function: PiecewiseLinearFunction: x=(0 0.4537856) y=(0 0.005)
    CoordinateCouplerConstraint Abs_r3_con: independent_coordinate_names=flex_extension
        dependent_coordinate_name=Abs_r3 scale_factor=1
      coupled_coordinates_function: PiecewiseLinearFunction: x=(-1.22173 0) y=(-0.785398 0)
    CoordinateCouplerConstraint L4_L5_IVDjnt_r3_con: independent_coordinate_names=flex_extension
        dependent_coordinate_name=L4_L5_IVDjnt_r3 scale_factor=1
        coupled_coordinates_function=LinearFunction(coefficients=0.144 0)
    CoordinateCouplerConstraint L4_L5_IVD_rotjnt_r2_con: independent_coordinate_names=axial_rotation
        dependent_coordinate_name=L4_L5_IVD_rotjnt_r2 scale_factor=1
      coupled_coordinates_function: PiecewiseLinearFunction f452: x=(-0.7853982 0 0.7853982)
          y=(-0.03316126 0 0.03316126)
    CoordinateCouplerConstraint L4_L5_IVD_bendjnt_r1_con: independent_coordinate_names=lat_bending
        dependent_coordinate_name=L4_L5_IVD_bendjnt_r1 scale_factor=1
      coupled_coordinates_function: PiecewiseLinearFunction f61: x=(-1.018749 1.018749) y=(-0.1844813 0.1844813)
    CoordinateCouplerConstraint L3_L4_IVDjnt_r3_con: independent_coordinate_names=flex_extension
        dependent_coordinate_name=L3_L4_IVDjnt_r3 scale_factor=1
        coupled_coordinates_function=LinearFunction(coefficients=0.2047454 0)
    CoordinateCouplerConstraint L3_L4_IVD_rotjnt_r2_con: independent_coordinate_names=axial_rotation
        dependent_coordinate_name=L3_L4_IVD_rotjnt_r2 scale_factor=1
      coupled_coordinates_function: PiecewiseLinearFunction f232: x=(-0.7853982 0 0.7853982)
          y=(-0.03316126 0 0.03316126)
    CoordinateCouplerConstraint L3_L4_IVD_bendjnt_r1_con: independent_coordinate_names=lat_bending
        dependent_coordinate_name=L3_L4_IVD_bendjnt_r1 scale_factor=1
      coupled_coordinates_function: PiecewiseLinearFunction f51: x=(-1.018749 1.018749) y=(-0.2499311 0.2499311)
    CoordinateCouplerConstraint L2_L3_IVDjnt_r3_con: independent_coordinate_names=flex_extension
        dependent_coordinate_name=L2_L3_IVDjnt_r3 scale_factor=1
        coupled_coordinates_function=LinearFunction(coefficients=0.2466182 0)
    CoordinateCouplerConstraint L2_L3_IVD_rotjnt_r2_con: independent_coordinate_names=axial_rotation
        dependent_coordinate_name=L2_L3_IVD_rotjnt_r2 scale_factor=1
      coupled_coordinates_function: PiecewiseLinearFunction f232: x=(-0.7853982 0 0.7853982)
          y=(-0.02617994 0 0.02617994)
    CoordinateCouplerConstraint L2_L3_IVD_bendjnt_r1_con: independent_coordinate_names=lat_bending
        dependent_coordinate_name=L2_L3_IVD_bendjnt_r1 scale_factor=1
      coupled_coordinates_function: PiecewiseLinearFunction f41: x=(-1.018749 1.018749) y=(-0.2548181 0.2548181)
    CoordinateCouplerConstraint L1_L2_IVDjnt_r3_con: independent_coordinate_names=flex_extension
        dependent_coordinate_name=L1_L2_IVDjnt_r3 scale_factor=1
        coupled_coordinates_function=LinearFunction(coefficients=0.2941818 0)
    CoordinateCouplerConstraint L1_L2_IVD_rotjnt_r2_con: independent_coordinate_names=axial_rotation
        dependent_coordinate_name=L1_L2_IVD_rotjnt_r2 scale_factor=1
      coupled_coordinates_function: PiecewiseLinearFunction f32: x=(-0.7853982 0 0.7853982)
          y=(-0.02268928 0 0.02268928)
    CoordinateCouplerConstraint L1_L2_IVD_bendjnt_r1_con: independent_coordinate_names=lat_bending
        dependent_coordinate_name=L1_L2_IVD_bendjnt_r1 scale_factor=1
      coupled_coordinates_function: PiecewiseLinearFunction f31: x=(-1.018749 1.018749) y=(-0.1914626 0.1914626)
  MarkerSet:
    Marker L5S1: sacrum (-0.098 0.071 0)
    Marker L4-L5: lumbar5 (0.01 0.0296 0)
    Marker L3-L4: lumbar4 (0 0.032 0)
    Marker L2-L3: lumbar3 (-0.008 0.0312 0)
    Marker L1-L2: lumbar2 (-0.01 0.025 0)
    Marker L5: lumbar5 (0.01328 0.0183 0)
    Marker L4: lumbar4 (0.00716 0.02179527 0)
    Marker L3: lumbar3 (-0.00016091 0.02327394 0)
    Marker L2: lumbar2 (-0.00175378 0.02021242 0)
    Marker L1: lumbar1 (-0.00226 0.01940727 0.00132891)
    Marker L5-CM: lumbar5 (0.01728 0.0183 0)
    Marker L4-CM: lumbar4 (0.01816 0.02179527 0)
    Marker L3-CM: lumbar3 (0.017839 0.02327394 0)
    Marker L2-CM: lumbar2 (0.02524622 0.02021242 0)
    Marker L1-CM: lumbar1 (0.03274 0.01940727 0.00132891)
    Marker Trunk-CM: torso (0.02244 0.20665 0)
