# OpenSim document version 30000
Model M8_Caruthers_FullBodyModel2016_Scaled_Arms_Corrected:
  length_units: meters
  force_units: N
  gravity: 0 -9.80665 0
  credits:
    Elena J. Caruthers, Robert A. Siston,... Arnold, E.M., Ward, S.R., Lieber, R. L., and Delp, S.L.,... Nur Adila Faruk Senan, Miguel Christophy, Moe Curtrin ,... Katherine R. Saul, Wendy M. Murray, Craig M. Goehler, Melissa Daly, Meghan E. Vidt, Dustin L. Crouch,... Anita Vasavada, Jessica Jahn, Liying Zheng, Chiriac Marian
  publications:
    Arnold, EM, SR Ward, RL Lieber, and SL Delp. "A Model of the Lower Limb for Analysis of Human Movement." Annals of Biomedical Engineering. 38.2 (2010): 269-79. Print. Christophy, M, Senan N. A. Faruk, JC Lotz, and OM O'Reilly. "A Musculoskeletal Model for the Lumbar Spine." Biomechanics and Modeling in Mechanobiology. 11 (2012): 1-2. Print. Vasavada, AN, S Li, and SL Delp. "Influence of Muscle Morphometry and Moment Arms on the Moment-Generating Capacity of Human Neck Muscles." Spine. 23.4 (1998): 412-22. Print.
  defaults:
    Thelen2003Muscle default: min_control=0.01 max_control=1 optimal_force=1 max_isometric_force=0
        optimal_fiber_length=0 tendon_slack_length=0 pennation_angle_at_optimal=0 [radians] max_contraction_velocity=10
        activation_time_constant=0.01 deactivation_time_constant=0.04 FmaxTendonStrain=0.033 FmaxMuscleStrain=0.6
        KshapeActive=0.5 KshapePassive=4 Af=0.3 Flen=1.8
    Thelen2003Muscle default: min_control=0.01 max_control=1 optimal_force=1 max_isometric_force=0
        optimal_fiber_length=0 tendon_slack_length=0 pennation_angle_at_optimal=0 max_contraction_velocity=10
        activation_time_constant=0.01 deactivation_time_constant=0.04 FmaxTendonStrain=0.033 FmaxMuscleStrain=0.6
        KshapeActive=0.5 KshapePassive=4 Af=0.3 Flen=1.8
  BodySet:
    Body ground: mass=0 mass_center=(0 0 0) inertia_xx=0 inertia_yy=0 inertia_zz=0
    Body pelvis: mass=11.777 mass_center=(-0.0707 0 0) inertia_xx=0.1028 inertia_yy=0.0871 inertia_zz=0.0579
        meshes=(r_pelvis.vtp l_pelvis.vtp)
      CustomJoint ground_pelvis: parent_body=ground location_in_parent=(0 0 0) orientation_in_parent=(0 0 0.01331184)
          location=(-0.0755911 -0.07464621 0)
        Coordinate pelvis_tilt: motion_type=rotational default_value=0 range=(-1.570796 1.570796) clamped=true
        Coordinate pelvis_list: motion_type=rotational default_value=0 range=(-1.570796 1.570796) clamped=true
        Coordinate pelvis_rotation: motion_type=rotational default_value=0 range=(-1.570796 1.570796) clamped=true
        Coordinate pelvis_tx: motion_type=translational default_value=0 range=(-5 5) clamped=true
        Coordinate pelvis_ty: motion_type=translational default_value=0.93 range=(-1 2) clamped=true
        Coordinate pelvis_tz: motion_type=translational default_value=0 range=(-3 3) clamped=true
        SpatialTransform:
          TransformAxis rotation1: coordinates=pelvis_tilt axis=(0 0 1) LinearFunction(coefficients=1 0)
          TransformAxis rotation2: coordinates=pelvis_list axis=(1 0 0) LinearFunction(coefficients=1 0)
          TransformAxis rotation3: coordinates=pelvis_rotation axis=(0 1 0) LinearFunction(coefficients=1 0)
          TransformAxis translation1: coordinates=pelvis_tx axis=(1 0 0) LinearFunction(coefficients=1 0)
          TransformAxis translation2: coordinates=pelvis_ty axis=(0 1 0) LinearFunction(coefficients=1 0)
          TransformAxis translation3: coordinates=pelvis_tz axis=(0 0 1) LinearFunction(coefficients=1 0)
      WrapEllipsoid PS_at_brim_r: translation=(-0.0798 -0.0654 0.0656) quadrant=all dimensions=(0.052 0.0492 0.071)
      WrapEllipsoid IL_at_brim_r: translation=(-0.0685 -0.0557 0.0756) quadrant=all dimensions=(0.0549 0.0665 0.071)
      WrapEllipsoid Gmax_at_pelvis_r: xyz_body_rotation=(-0.637045 0.383623 -0.684867)
          translation=(-0.0795 -0.0825 0.0665) quadrant=all dimensions=(0.04 0.04 0.06)
      WrapEllipsoid PS_at_brim_l: translation=(-0.0798 -0.0654 -0.0656) quadrant=all dimensions=(0.052 0.0492 0.071)
      WrapEllipsoid IL_at_brim_l: translation=(-0.0685 -0.0557 -0.0756) quadrant=all dimensions=(0.0549 0.0665 0.071)
      WrapEllipsoid Gmax_at_pelvis_l: xyz_body_rotation=(0.637045 -0.383623 -0.684867)
          translation=(-0.0795 -0.0825 -0.0665) quadrant=all dimensions=(0.04 0.04 0.06)
    Body sacrum: mass=0 mass_center=(0 0 0) inertia_xx=0 inertia_yy=0 inertia_zz=0 meshes=sacrum.vtp
      CustomJoint gndsacrum: parent_body=pelvis location_in_parent=(0.0001226641 0.002599028 0)
          orientation_in_parent=(0 0 0.02712591) location=(0 0.04629955 0)
        Coordinate sacrum_tilt: motion_type=rotational default_value=0 range=(-0.05236 0.05236) clamped=true
        Coordinate sacrum_list: motion_type=rotational default_value=0 range=(-0.05236 0.05236) clamped=true
        Coordinate sacrum_rotation: motion_type=rotational default_value=0 range=(-0.05236 0.05236) clamped=true
        SpatialTransform: axes_held_at_zero=(translation1 translation2 translation3)
          TransformAxis rotation1: coordinates=sacrum_tilt axis=(0 0 1) LinearFunction(coefficients=1 0)
          TransformAxis rotation2: coordinates=sacrum_list axis=(1 0 0) LinearFunction(coefficients=1 0)
          TransformAxis rotation3: coordinates=sacrum_rotation axis=(0 1 0) LinearFunction(coefficients=1 0)
    Body femur_r: mass=9.3014 mass_center=(0 -0.17 0) inertia_xx=0.1339 inertia_yy=0.0351 inertia_zz=0.1412
        meshes=r_femur.vtp
      CustomJoint hip_r: parent_body=pelvis location_in_parent=(-0.056276 -0.07849 0.07726) location=(0 0 0)
        Coordinate hip_flexion_r: motion_type=rotational default_value=0 range=(-0.5235988 2.094395) clamped=true
        Coordinate hip_adduction_r: motion_type=rotational default_value=0 range=(-0.8726646 0.5235988) clamped=true
        Coordinate hip_rotation_r: motion_type=rotational default_value=0 range=(-0.6981317 0.6981317) clamped=true
        SpatialTransform: axes_held_at_zero=(translation1 translation2 translation3)
          TransformAxis rotation1: coordinates=hip_flexion_r axis=(0 0 1)
            SimmSpline: x=(-6.28319 6.28319) y=(-6.28319 6.28319)
          TransformAxis rotation2: coordinates=hip_adduction_r axis=(1 0 0)
            SimmSpline: x=(-6.28319 6.28319) y=(-6.28319 6.28319)
          TransformAxis rotation3: coordinates=hip_rotation_r axis=(0 1 0)
            SimmSpline: x=(-6.28319 6.28319) y=(-6.28319 6.28319)
      WrapEllipsoid Gastroc_at_condyles_r: xyz_body_rotation=(0.0589921 -0.0937242 0.0232129)
          translation=(0.0048 -0.4075 0.0003) quadrant=all dimensions=(0.03 0.025 0.05)
    Body femur_wlkr_r: mass=0 mass_center=(0 0 0) inertia_xx=0 inertia_yy=0 inertia_zz=0
      WeldJoint femur_coord_r: parent_body=femur_r location_in_parent=(-0.00809 -0.40796 -0.00275)
          orientation_in_parent=(-1.641568 1.446181 1.570796) location=(0 0 0)
    Body tibia_wlkr_r: mass=0 mass_center=(0 0 0) inertia_xx=0 inertia_yy=0 inertia_zz=0
      CustomJoint walker_knee_r: parent_body=femur_wlkr_r location_in_parent=(0 0 0) location=(0 0 0)
        Coordinate knee_angle_r: motion_type=rotational default_value=1.188e-5 range=(0 2.356193) clamped=true
        SpatialTransform: axes_held_at_zero=translation3
          TransformAxis rotation1: coordinates=knee_angle_r axis=(1 0 0) LinearFunction(coefficients=1 0)
          TransformAxis rotation2: coordinates=knee_angle_r axis=(0 0 1)
            SimmSpline: x=(0 0.174533 0.349066 0.523599 0.698132 0.872665 1.0472 1.22173 1.39626 1.5708 1.74533 1.91986 2.0944)
                y=(0 0.0126809 0.0226969 0.0296054 0.0332049 0.0335354 0.0308779 0.0257548 0.0189295 0.011407 0.00443314 -0.00050475 -0.0016782)
          TransformAxis rotation3: coordinates=knee_angle_r axis=(0 1 0)
            SimmSpline: x=(0 0.174533 0.349066 0.523599 0.698132 0.872665 1.0472 1.22173 1.39626 1.5708 1.74533 1.91986 2.0944)
                y=(0 0.059461 0.109399 0.150618 0.18392 0.210107 0.229983 0.24435 0.254012 0.25977 0.262428 0.262788 0.261654)
          TransformAxis translation1: coordinates=knee_angle_r axis=(0 1 0)
            MultiplierFunction: scale=1
              SimmSpline: x=(0 0.174533 0.349066 0.523599 0.698132 0.872665 1.0472 1.22173 1.39626 1.5708 1.74533 1.91986 2.0944)
                  y=(0 0.000479 0.000835 0.001086 0.001251 0.001346 0.001391 0.001403 0.0014 0.0014 0.001421 0.001481 0.001599)
          TransformAxis translation2: coordinates=knee_angle_r axis=(0 0 1)
            MultiplierFunction: scale=1
              SimmSpline: x=(0 0.174533 0.349066 0.523599 0.698132 0.872665 1.0472 1.22173 1.39626 1.5708 1.74533 1.91986 2.0944)
                  y=(0 0.000988 0.001899 0.002734 0.003492 0.004173 0.004777 0.005305 0.005756 0.00613 0.006427 0.006648 0.006792)
    Body tibia_r: mass=3.7075 mass_center=(0 -0.1867 0) inertia_xx=0.0504 inertia_yy=0.0051 inertia_zz=0.0511
        meshes=(r_tibialoan.vtp r_fibula.vtp)
      WeldJoint tibia_coord_r: parent_body=tibia_wlkr_r location_in_parent=(-0.001731 0.002389 0.008452)
          orientation_in_parent=(1.695412 -1.500024 1.570796) location=(0 0 0)
      WrapEllipsoid GR_at_condyles_r: xyz_body_rotation=(0 0 -0.18326) translation=(0 0 0) quadrant=all
          dimensions=(0.036 0.0635 0.0533)
      WrapEllipsoid SM_at_condyles_r: xyz_body_rotation=(0 0 -0.296706) translation=(0 0 0) quadrant=all
          dimensions=(0.0352 0.0602 0.0489)
      WrapEllipsoid ST_at_condyles_r: xyz_body_rotation=(0 0 -0.270526) translation=(0 0 0) quadrant=all
          dimensions=(0.0425 0.069 0.0572)
      WrapEllipsoid BFLH_at_gastroc_r: xyz_body_rotation=(0 0 0.270526) translation=(-0.0619 -0.05 0.0007) quadrant=y
          dimensions=(0.0335 0.02 0.0833)
      WrapCylinder GasLat_at_shank_r: xyz_body_rotation=(2.96723 -0.279725 -1.47812)
          translation=(-0.00740001 -0.074 -0.0033) quadrant=-y radius=0.055 length=0.1
      WrapCylinder GasMed_at_shank_r: xyz_body_rotation=(2.96723 0.0279725 -1.47812)
          translation=(-0.00740001 -0.074 -0.0033) quadrant=-y radius=0.055 length=0.1
    Body shaft_axis_r: mass=0 mass_center=(0 0 0) inertia_xx=0 inertia_yy=0 inertia_zz=0
      WeldJoint femoral_shaft_r: parent_body=femur_r location_in_parent=(-0.01527 -0.03442 0.03475)
          orientation_in_parent=(0.1117011 0 0.03665191) location=(0 0 0)
      WrapEllipsoid AB_at_femshaft_r: xyz_body_rotation=(0 0 0.139626) translation=(0.0268 -0.0843 0) quadrant=all
          dimensions=(0.0165 0.07 0.021)
      WrapEllipsoid AL_at_femshaft_r: xyz_body_rotation=(0 0 0.0174533) translation=(0.0386 -0.2064 0) quadrant=all
          dimensions=(0.0201 0.1 0.018)
      WrapEllipsoid AMprox_at_femshaft_r: xyz_body_rotation=(0 0 0.174533) translation=(0.0197 -0.0442 0) quadrant=all
          dimensions=(0.0211 0.07 0.032)
      WrapEllipsoid AMmid_at_femshaft_r: xyz_body_rotation=(0 0 0.0872665) translation=(0.0336 -0.1284 0) quadrant=all
          dimensions=(0.0214 0.12 0.031)
      WrapEllipsoid AMdist_at_femshaft_r: xyz_body_rotation=(0 0 0.139626) translation=(0.0376 -0.2293 0) quadrant=all
          dimensions=(0.0218 0.2 0.0215)
      WrapEllipsoid AMisch_at_condyles_r: xyz_body_rotation=(0 0 -0.471239) translation=(-0.026 -0.344 0) quadrant=all
          dimensions=(0.05 0.24 0.0402)
      WrapEllipsoid PECT_at_femshaft_r: xyz_body_rotation=(0 0 0.174533) translation=(0.021 -0.052 0) quadrant=all
          dimensions=(0.0166 0.05 0.0131)
      WrapCylinder KnExt_at_fem_r: xyz_body_rotation=(-0.172089 0.0570723 -0.92869) translation=(0.0053 -0.3701 0.0086)
          quadrant=all radius=0.025 length=0.1
    Body patella_r: mass=0.0862 mass_center=(0.0018 0.0264 0) inertia_xx=2.87e-6 inertia_yy=1.311e-5
        inertia_zz=1.311e-5 meshes=r_pat.vtp
      CustomJoint patellofemoral_r: parent_body=femur_r location_in_parent=(0 0 0) location=(0 0 0)
        Coordinate knee_angle_r_beta: motion_type=rotational default_value=1.188e-5 range=(-99999.9 99999.9)
            clamped=false
        SpatialTransform: axes_held_at_zero=(rotation2 rotation3 translation3)
          TransformAxis rotation1: coordinates=knee_angle_r_beta axis=(0 0 1)
            SimmSpline f11: x=(0 0.174533 0.349066 0.523599 0.698132 0.872665 1.0472 1.22173 1.39626 1.5708 1.74533 1.91986 2.0944)
                y=(0.00113686 -0.00629212 -0.105582 -0.253683 -0.414245 -0.579047 -0.747244 -0.91799 -1.09044 -1.26379 -1.43763 -1.61186 -1.78634)
          TransformAxis translation1: coordinates=knee_angle_r_beta axis=(1 0 0)
            MultiplierFunction: scale=1
              SimmSpline f9: x=(0 0.174533 0.349066 0.523599 0.698132 0.872665 1.0472 1.22173 1.39626 1.5708 1.74533 1.91986 2.0944)
                  y=(0.04435 0.040692 0.035581 0.029012 0.021473 0.013523 0.005483 -0.002412 -0.009959 -0.016903 -0.022926 -0.027739 -0.030815)
          TransformAxis translation2: coordinates=knee_angle_r_beta axis=(0 1 0)
            MultiplierFunction: scale=1
              SimmSpline f10: x=(0 0.174533 0.349066 0.523599 0.698132 0.872665 1.0472 1.22173 1.39626 1.5708 1.74533 1.91986 2.0944)
                  y=(-0.418712 -0.426965 -0.43422 -0.440152 -0.444617 -0.447495 -0.448724 -0.448337 -0.446353 -0.442826 -0.438035 -0.432448 -0.426632)
    Body talus_r: mass=0.1 mass_center=(0 0 0) inertia_xx=0.001 inertia_yy=0.001 inertia_zz=0.001 meshes=r_talus.vtp
      CustomJoint ankle_r: parent_body=tibia_r location_in_parent=(-0.01 -0.4 0) location=(0 0 0)
        Coordinate ankle_angle_r: motion_type=rotational default_value=0 range=(-0.6981317 0.5235988) clamped=true
        SpatialTransform: axes_held_at_zero=(rotation2 rotation3 translation1 translation2 translation3)
          TransformAxis rotation1: coordinates=ankle_angle_r axis=(-0.105014 -0.1740221 0.9791263)
            SimmSpline: x=(-6.28319 6.28319) y=(-6.28319 6.28319)
    Body calcn_r: mass=1.25 mass_center=(0.1 0.03 0) inertia_xx=0.0014 inertia_yy=0.0039 inertia_zz=0.0041
        meshes=r_foot.vtp
      CustomJoint subtalar_r: parent_body=talus_r location_in_parent=(-0.04877 -0.04195 0.00792) location=(0 0 0)
        Coordinate subtalar_angle_r: motion_type=rotational default_value=0 range=(-0.3490659 0.3490659) clamped=true
            locked=true
        SpatialTransform: axes_held_at_zero=(rotation2 rotation3 translation1 translation2 translation3)
          TransformAxis rotation1: coordinates=subtalar_angle_r axis=(0.78718 0.604747 -0.120949)
            SimmSpline: x=(-6.28319 6.28319) y=(-6.28319 6.28319)
    Body toes_r: mass=0.2166 mass_center=(0.0346 0.006 -0.0175) inertia_xx=0.0001 inertia_yy=0.0002 inertia_zz=0.001
        meshes=r_bofoot.vtp
      CustomJoint mtp_r: parent_body=calcn_r location_in_parent=(0.1788 -0.002 0.00108) location=(0 0 0)
        Coordinate mtp_angle_r: motion_type=rotational default_value=0 range=(-0.5235988 0.5235988) clamped=true
            locked=true
        SpatialTransform: axes_held_at_zero=(rotation2 rotation3 translation1 translation2 translation3)
          TransformAxis rotation1: coordinates=mtp_angle_r axis=(0.5809542 0 -0.8139363)
            SimmSpline: x=(-6.28319 6.28319) y=(-6.28319 6.28319)
    Body femur_l: mass=9.3014 mass_center=(0 -0.17 0) inertia_xx=0.1339 inertia_yy=0.0351 inertia_zz=0.1412
        meshes=l_femur.vtp
      CustomJoint hip_l: parent_body=pelvis location_in_parent=(-0.056276 -0.07849 -0.07726) location=(0 0 0)
        Coordinate hip_flexion_l: motion_type=rotational default_value=0 range=(-0.5235988 2.094395) clamped=true
        Coordinate hip_adduction_l: motion_type=rotational default_value=0 range=(-0.8726646 0.5235988) clamped=true
        Coordinate hip_rotation_l: motion_type=rotational default_value=0 range=(-0.6981317 0.6981317) clamped=true
        SpatialTransform: axes_held_at_zero=(translation1 translation2 translation3)
          TransformAxis rotation1: coordinates=hip_flexion_l axis=(0 0 1) LinearFunction(coefficients=1 0)
          TransformAxis rotation2: coordinates=hip_adduction_l axis=(1 0 0)
            SimmSpline: x=(-6.28319 6.28319) y=(6.28319 -6.28319)
          TransformAxis rotation3: coordinates=hip_rotation_l axis=(0 1 0)
            SimmSpline: x=(-6.28319 6.28319) y=(6.28319 -6.28319)
      WrapEllipsoid Gastroc_at_condyles_l: xyz_body_rotation=(-0.0589921 0.0937242 0.0232129)
          translation=(0.0048 -0.4075 -0.0003) quadrant=all dimensions=(0.03 0.025 0.05)
    Body femur_wlkr_l: mass=0 mass_center=(0 0 0) inertia_xx=0 inertia_yy=0 inertia_zz=0
      WeldJoint femur_coord_l: parent_body=femur_l location_in_parent=(-0.00809 -0.40796 0.00275)
          orientation_in_parent=(1.641568 -1.446181 1.570796) location=(0 0 0)
    Body tibia_wlkr_l: mass=0 mass_center=(0 0 0) inertia_xx=0 inertia_yy=0 inertia_zz=0
      CustomJoint walker_knee_l: parent_body=femur_wlkr_l location_in_parent=(0 0 0) location=(0 0 0)
        Coordinate knee_angle_l: motion_type=rotational default_value=1.061e-5 range=(0 2.356193) clamped=true
        SpatialTransform: axes_held_at_zero=translation3
          TransformAxis rotation1: coordinates=knee_angle_l axis=(1 0 0)
            SimmSpline: x=(-6.28319 6.28319) y=(6.28319 -6.28319)
          TransformAxis rotation2: coordinates=knee_angle_l axis=(0 0 1)
            SimmSpline: x=(0 0.174533 0.349066 0.523599 0.698132 0.872665 1.0472 1.22173 1.39626 1.5708 1.74533 1.91986 2.0944)
                y=(0 0.0126809 0.0226969 0.0296054 0.0332049 0.0335354 0.0308779 0.0257548 0.0189295 0.011407 0.00443314 -0.00050475 -0.0016782)
          TransformAxis rotation3: coordinates=knee_angle_l axis=(0 1 0)
            SimmSpline: x=(0 0.174533 0.349066 0.523599 0.698132 0.872665 1.0472 1.22173 1.39626 1.5708 1.74533 1.91986 2.0944)
                y=(0 -0.059461 -0.109399 -0.150618 -0.18392 -0.210107 -0.229983 -0.24435 -0.254012 -0.25977 -0.262428 -0.262788 -0.261654)
          TransformAxis translation1: coordinates=knee_angle_l axis=(0 1 0)
            MultiplierFunction: scale=1
              SimmSpline: x=(0 0.174533 0.349066 0.523599 0.698132 0.872665 1.0472 1.22173 1.39626 1.5708 1.74533 1.91986 2.0944)
                  y=(0 0.000479 0.000835 0.001086 0.001251 0.001346 0.001391 0.001403 0.0014 0.0014 0.001421 0.001481 0.001599)
          TransformAxis translation2: coordinates=knee_angle_l axis=(0 0 1)
            MultiplierFunction: scale=1
              SimmSpline: x=(0 0.174533 0.349066 0.523599 0.698132 0.872665 1.0472 1.22173 1.39626 1.5708 1.74533 1.91986 2.0944)
                  y=(0 -0.000988 -0.001899 -0.002734 -0.003492 -0.004173 -0.004777 -0.005305 -0.005756 -0.00613 -0.006427 -0.006648 -0.006792)
    Body tibia_l: mass=3.7075 mass_center=(0 -0.1867 0) inertia_xx=0.0504 inertia_yy=0.0051 inertia_zz=0.0511
        meshes=(l_tibialoan.vtp l_fibula.vtp)
      WeldJoint tibia_coord_l: parent_body=tibia_wlkr_l location_in_parent=(-0.001731 0.002389 -0.008452)
          orientation_in_parent=(-1.695412 1.500024 1.570796) location=(0 0 0)
      WrapEllipsoid GR_at_condyles_l: xyz_body_rotation=(0 0 -0.18326) translation=(0 0 0) quadrant=all
          dimensions=(0.036 0.0635 0.0533)
      WrapEllipsoid SM_at_condyles_l: xyz_body_rotation=(0 0 -0.296706) translation=(0 0 0) quadrant=all
          dimensions=(0.0352 0.0602 0.0489)
      WrapEllipsoid ST_at_condyles_l: xyz_body_rotation=(0 0 -0.270526) translation=(0 0 0) quadrant=all
          dimensions=(0.0425 0.069 0.0572)
      WrapEllipsoid BFLH_at_gastroc_l: xyz_body_rotation=(0 0 0.270526) translation=(-0.0619 -0.05 -0.0007) quadrant=y
          dimensions=(0.0335 0.02 0.0833)
      WrapCylinder GasLat_at_shank_l: xyz_body_rotation=(-2.96723 0.279725 -1.47812)
          translation=(-0.00740001 -0.074 0.0033) quadrant=-y radius=0.055 length=0.1
      WrapCylinder GasMed_at_shank_l: xyz_body_rotation=(-2.96723 -0.0279725 -1.47812)
          translation=(-0.00740001 -0.074 0.0033) quadrant=-y radius=0.055 length=0.1
    Body shaft_axis_l: mass=0 mass_center=(0 0 0) inertia_xx=0 inertia_yy=0 inertia_zz=0
      WeldJoint femoral_shaft_l: parent_body=femur_l location_in_parent=(-0.01527 -0.03442 -0.03475)
          orientation_in_parent=(-0.1117011 0 0.03665191) location=(0 0 0)
      WrapEllipsoid AB_at_femshaft_l: xyz_body_rotation=(0 0 0.139626) translation=(0.0268 -0.0843 0) quadrant=all
          dimensions=(0.0165 0.07 0.021)
      WrapEllipsoid AL_at_femshaft_l: xyz_body_rotation=(0 0 0.0174533) translation=(0.0386 -0.2064 0) quadrant=all
          dimensions=(0.0201 0.1 0.018)
      WrapEllipsoid AMprox_at_femshaft_l: xyz_body_rotation=(0 0 0.174533) translation=(0.0197 -0.0442 0) quadrant=all
          dimensions=(0.0211 0.07 0.032)
      WrapEllipsoid AMmid_at_femshaft_l: xyz_body_rotation=(0 0 0.0872665) translation=(0.0336 -0.1284 0) quadrant=all
          dimensions=(0.0214 0.12 0.031)
      WrapEllipsoid AMdist_at_femshaft_l: xyz_body_rotation=(0 0 0.139626) translation=(0.0376 -0.2293 0) quadrant=all
          dimensions=(0.0218 0.2 0.0215)
      WrapEllipsoid AMisch_at_condyles_l: xyz_body_rotation=(0 0 -0.471239) translation=(-0.026 -0.344 0) quadrant=all
          dimensions=(0.05 0.24 0.0402)
      WrapEllipsoid PECT_at_femshaft_l: xyz_body_rotation=(0 0 0.174533) translation=(0.021 -0.052 0) quadrant=all
          dimensions=(0.0166 0.05 0.0131)
      WrapCylinder KnExt_at_fem_l: xyz_body_rotation=(0.172089 -0.0570723 0.92869) translation=(0.0053 -0.3701 -0.0086)
          quadrant=all radius=0.025 length=0.1
    Body patella_l: mass=0.0862 mass_center=(0.0018 0.0264 0) inertia_xx=2.87e-6 inertia_yy=1.311e-5
        inertia_zz=1.311e-5 meshes=l_pat.vtp
      CustomJoint patellofemoral_l: parent_body=femur_l location_in_parent=(0 0 0) location=(0 0 0)
        Coordinate knee_angle_l_beta: motion_type=rotational default_value=1.061e-5 range=(-99999.9 99999.9)
            clamped=false
        SpatialTransform: axes_held_at_zero=(rotation2 rotation3 translation3)
          TransformAxis rotation1: coordinates=knee_angle_l_beta axis=(0 0 1)
            SimmSpline f25: x=(0 0.174533 0.349066 0.523599 0.698132 0.872665 1.0472 1.22173 1.39626 1.5708 1.74533 1.91986 2.0944)
                y=(0.00113686 -0.00629212 -0.105582 -0.253683 -0.414245 -0.579047 -0.747244 -0.91799 -1.09044 -1.26379 -1.43763 -1.61186 -1.78634)
          TransformAxis translation1: coordinates=knee_angle_l_beta axis=(1 0 0)
            MultiplierFunction: scale=1
              SimmSpline f23: x=(0 0.174533 0.349066 0.523599 0.698132 0.872665 1.0472 1.22173 1.39626 1.5708 1.74533 1.91986 2.0944)
                  y=(0.04435 0.040692 0.035581 0.029012 0.021473 0.013523 0.005483 -0.002412 -0.009959 -0.016903 -0.022926 -0.027739 -0.030815)
          TransformAxis translation2: coordinates=knee_angle_l_beta axis=(0 1 0)
            MultiplierFunction: scale=1
              SimmSpline f24: x=(0 0.174533 0.349066 0.523599 0.698132 0.872665 1.0472 1.22173 1.39626 1.5708 1.74533 1.91986 2.0944)
                  y=(-0.418712 -0.426965 -0.43422 -0.440152 -0.444617 -0.447495 -0.448724 -0.448337 -0.446353 -0.442826 -0.438035 -0.432448 -0.426632)
    Body talus_l: mass=0.1 mass_center=(0 0 0) inertia_xx=0.001 inertia_yy=0.001 inertia_zz=0.001 meshes=l_talus.vtp
      CustomJoint ankle_l: parent_body=tibia_l location_in_parent=(-0.01 -0.4 0) location=(0 0 0)
        Coordinate ankle_angle_l: motion_type=rotational default_value=0 range=(-0.6981317 0.5235988) clamped=true
        SpatialTransform: axes_held_at_zero=(rotation2 rotation3 translation1 translation2 translation3)
          TransformAxis rotation1: coordinates=ankle_angle_l axis=(-0.105014 -0.1740221 -0.9791263)
            SimmSpline: x=(-6.28319 6.28319) y=(6.28319 -6.28319)
    Body calcn_l: mass=1.25 mass_center=(0.1 0.03 0) inertia_xx=0.0014 inertia_yy=0.0039 inertia_zz=0.0041
        meshes=l_foot.vtp
      CustomJoint subtalar_l: parent_body=talus_l location_in_parent=(-0.04877 -0.04195 -0.00792) location=(0 0 0)
        Coordinate subtalar_angle_l: motion_type=rotational default_value=0 range=(-0.3490659 0.3490659) clamped=true
            locked=true
        SpatialTransform: axes_held_at_zero=(rotation2 rotation3 translation1 translation2 translation3)
          TransformAxis rotation1: coordinates=subtalar_angle_l axis=(0.78718 0.604747 0.120949)
            SimmSpline: x=(-6.28319 6.28319) y=(6.28319 -6.28319)
    Body toes_l: mass=0.2166 mass_center=(0.0346 0.006 0.0175) inertia_xx=0.0001 inertia_yy=0.0002 inertia_zz=0.001
        meshes=l_bofoot.vtp
      CustomJoint mtp_l: parent_body=calcn_l location_in_parent=(0.1788 -0.002 -0.00108) location=(0 0 0)
        Coordinate mtp_angle_l: motion_type=rotational default_value=0 range=(-0.5235988 0.5235988) clamped=true
            locked=true
        SpatialTransform: axes_held_at_zero=(rotation2 rotation3 translation1 translation2 translation3)
          TransformAxis rotation1: coordinates=mtp_angle_l axis=(0.5809542 0 0.8139363)
            SimmSpline: x=(-6.28319 6.28319) y=(6.28319 -6.28319)
    Body lumbar5: mass=1.808088 mass_center=(0.053744 0.02 0) inertia_xx=0.01208366 inertia_yy=0.01749603
        inertia_zz=0.005412369 meshes=lumbar5.vtp
      CustomJoint L5_S1_IVDjnt: parent_body=sacrum location_in_parent=(-0.09259909 0.0670871 0)
          orientation_in_parent=(0 0 -0.3385939) location=(0 0 0)
        Coordinate flex_extension: motion_type=rotational default_value=0 range=(-1.22173 0.4537856) clamped=false
        Coordinate lat_bending: motion_type=rotational default_value=0 range=(-0.4363323 0.4363323) clamped=false
        Coordinate axial_rotation: motion_type=rotational default_value=0 range=(-0.7853982 0.7853982) clamped=false
        SpatialTransform: axes_held_at_zero=(translation1 translation2 translation3)
          TransformAxis rotation1: coordinates=flex_extension axis=(0 0 1) LinearFunction(coefficients=0.125 0)
          TransformAxis rotation2: coordinates=lat_bending axis=(1 0 0) LinearFunction(coefficients=0.1356 0)
          TransformAxis rotation3: coordinates=axial_rotation axis=(0 1 0) LinearFunction(coefficients=0.03033 0)
    Body lumbar4: mass=1.808088 mass_center=(0.0170296 0.018 0) inertia_xx=0.01128673 inertia_yy=0.016513
        inertia_zz=0.005226269 meshes=lumbar4.vtp
      CustomJoint L4_L5_IVDjnt: parent_body=lumbar5 location_in_parent=(0.01 0.0296 0) location=(0.001 -0.0025 0)
        Coordinate L4_L5_FE: motion_type=rotational default_value=0.06534513 range=(-99999.9 99999.9) clamped=false
        Coordinate L4_L5_LB: motion_type=rotational default_value=0 range=(-99999.9 99999.9) clamped=false
        Coordinate L4_L5_AR: motion_type=rotational default_value=0 range=(-99999.9 99999.9) clamped=false
        SpatialTransform: axes_held_at_zero=(translation1 translation2 translation3)
          TransformAxis rotation1: coordinates=L4_L5_FE axis=(0 0 1) LinearFunction(coefficients=1 0)
          TransformAxis rotation2: coordinates=L4_L5_LB axis=(1 0 0) LinearFunction(coefficients=1 0)
          TransformAxis rotation3: coordinates=L4_L5_AR axis=(0 1 0) LinearFunction(coefficients=1 0)
    Body lumbar3: mass=1.732751 mass_center=(0.0136848 0.018 0) inertia_xx=0.01106055 inertia_yy=0.01668421
        inertia_zz=0.005717041 meshes=lumbar3.vtp
      CustomJoint L3_L4_IVDjnt: parent_body=lumbar4 location_in_parent=(0 0.032 0) location=(-0.0006 -0.0012 0)
        Coordinate L3_L4_FE: motion_type=rotational default_value=0.09291054 range=(-99999.9 99999.9) clamped=false
        Coordinate L3_L4_LB: motion_type=rotational default_value=0 range=(-99999.9 99999.9) clamped=false
        Coordinate L3_L4_AR: motion_type=rotational default_value=0 range=(-99999.9 99999.9) clamped=false
        SpatialTransform: axes_held_at_zero=(translation1 translation2 translation3)
          TransformAxis rotation1: coordinates=L3_L4_FE axis=(0 0 1) LinearFunction(coefficients=1 0)
          TransformAxis rotation2: coordinates=L3_L4_LB axis=(1 0 0) LinearFunction(coefficients=1 0)
          TransformAxis rotation3: coordinates=L3_L4_AR axis=(0 1 0) LinearFunction(coefficients=1 0)
    Body lumbar2: mass=1.958762 mass_center=(0.0245272 0.018 0) inertia_xx=0.01265251 inertia_yy=0.01950644
        inertia_zz=0.006853927 meshes=lumbar2.vtp
      CustomJoint L2_L3_IVDjnt: parent_body=lumbar3 location_in_parent=(-0.008 0.0312 0) location=(-0.0013 -0.0039 0)
        Coordinate L2_L3_FE: motion_type=rotational default_value=0.1119118 range=(-99999.9 99999.9) clamped=false
        Coordinate L2_L3_LB: motion_type=rotational default_value=0 range=(-99999.9 99999.9) clamped=false
        Coordinate L2_L3_AR: motion_type=rotational default_value=0 range=(-99999.9 99999.9) clamped=false
        SpatialTransform: axes_held_at_zero=(translation1 translation2 translation3)
          TransformAxis rotation1: coordinates=L2_L3_FE axis=(0 0 1) LinearFunction(coefficients=1 0)
          TransformAxis rotation2: coordinates=L2_L3_LB axis=(1 0 0) LinearFunction(coefficients=1 0)
          TransformAxis rotation3: coordinates=L2_L3_AR axis=(0 1 0) LinearFunction(coefficients=1 0)
    Body lumbar1: mass=1.958762 mass_center=(0.039 0.017 0) inertia_xx=0.01300001 inertia_yy=0.02047531
        inertia_zz=0.007475299 meshes=lumbar1.vtp
      CustomJoint L1_L2_IVDjnt: parent_body=lumbar2 location_in_parent=(-0.01 0.025 0) location=(0.0014 -0.0038 0)
        Coordinate L1_L2_FE: motion_type=rotational default_value=0.1334955 range=(-99999.9 99999.9) clamped=false
        Coordinate L1_L2_LB: motion_type=rotational default_value=0 range=(-99999.9 99999.9) clamped=false
        Coordinate L1_L2_AR: motion_type=rotational default_value=0 range=(-99999.9 99999.9) clamped=false
        SpatialTransform: axes_held_at_zero=(translation1 translation2 translation3)
          TransformAxis rotation1: coordinates=L1_L2_FE axis=(0 0 1) LinearFunction(coefficients=1 0)
          TransformAxis rotation2: coordinates=L1_L2_LB axis=(1 0 0) LinearFunction(coefficients=1 0)
          TransformAxis rotation3: coordinates=L1_L2_AR axis=(0 1 0) LinearFunction(coefficients=1 0)
    Body torso: mass=13.93735 mass_center=(0.0046 0.246 0) inertia_xx=0.1235116 inertia_yy=0.1122832
        inertia_zz=0.09356937
        meshes=(thoracic12_s.vtp thoracic11_s.vtp thoracic10_s.vtp thoracic9_s.vtp thoracic8_s.vtp thoracic7_s.vtp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)
      WeldJoint torsojnt: parent_body=lumbar1 location_in_parent=(0.0025 -0.089 0) location=(0 0 0)
      WrapEllipsoid Abdomen: translation=(0.08 0.02 0) quadrant=x dimensions=(0.01 0.08 0.05)
    Body thorax: mass=0 mass_center=(0 0 0) inertia_xx=0 inertia_yy=0 inertia_zz=0 meshes=thorax.vtp
      WeldJoint ribcagejt: parent_body=torso location_in_parent=(0.019 0.3588 0) location=(0 0 0)
      WrapEllipsoid Thorax: xyz_body_rotation=(0.0434587 -0.331962 0.189892) translation=(-0.0386 -0.1273 0.0709)
          quadrant=all dimensions=(0.1 0.135 0.08)
      WrapEllipsoid Thorax_l: xyz_body_rotation=(-0.0434587 0.331962 0.189892) translation=(-0.0386 -0.1273 -0.0709)
          quadrant=all dimensions=(0.1 0.135 0.08)
    Body clavicle: mass=0.156701 mass_center=(-0.0106572 0.00612029 0.0520258) inertia_xx=0.00024368
        inertia_yy=0.000256407 inertia_zz=4.46196e-5 inertia_xy=-1.90653e-5 inertia_xz=-7.02543e-5
        inertia_yz=5.39513e-5 meshes=clavicle.vtp
      CustomJoint sternoclavicular: parent_body=thorax location_in_parent=(0.006074846 0.006665592 0.02445786)
          location=(0 0 0)
        Coordinate sternoclavicular_r2: motion_type=rotational default_value=-0.1267109 range=(-99999.9 99999.9)
            clamped=false
        Coordinate sternoclavicular_r3: motion_type=rotational default_value=0.05366888 range=(-99999.9 99999.9)
            clamped=false
        SpatialTransform: axes_held_at_zero=(rotation3 translation1 translation2 translation3)
          TransformAxis rotation1: coordinates=sternoclavicular_r2 axis=(0.0153 0.9892987 -0.1451)
              LinearFunction(coefficients=1 0)
          TransformAxis rotation2: coordinates=sternoclavicular_r3 axis=(-0.9944725 0 -0.104997)
              LinearFunction(coefficients=1 0)
    Body clavphant: mass=0.000100449 mass_center=(0 0 0) inertia_xx=1.004493 inertia_yy=1.004493 inertia_zz=1.004493
      CustomJoint unrotscap: parent_body=clavicle location_in_parent=(-0.01376325 0.01927623 0.1301746)
          location=(0 0 0)
        Coordinate unrotscap_r3: motion_type=rotational default_value=-0.05366888 range=(-99999.9 99999.9)
            clamped=false
        Coordinate unrotscap_r2: motion_type=rotational default_value=0.1267109 range=(-99999.9 99999.9) clamped=false
        SpatialTransform: axes_held_at_zero=(rotation3 translation1 translation2 translation3)
          TransformAxis rotation1: coordinates=unrotscap_r3 axis=(-0.9944725 0 -0.104997)
              LinearFunction(coefficients=1 0)
          TransformAxis rotation2: coordinates=unrotscap_r2 axis=(0.0153 0.9892987 -0.1451)
              LinearFunction(coefficients=1 0)
    Body scapula: mass=0.7071231 mass_center=(-0.052531 -0.0336466 -0.0420044) inertia_xx=0.001248485
        inertia_yy=0.001155569 inertia_zz=0.001371234 inertia_xy=0.000451419 inertia_xz=0.000411059
        inertia_yz=0.000242183 meshes=scapula.vtp
      CustomJoint acromioclavicular: parent_body=clavphant location_in_parent=(0 0 0) location=(0 0 0)
        Coordinate acromioclavicular_r2: motion_type=rotational default_value=-0.02565634 range=(-99999.9 99999.9)
            clamped=false
        Coordinate acromioclavicular_r3: motion_type=rotational default_value=0.2073451 range=(-99999.9 99999.9)
            clamped=false
        Coordinate acromioclavicular_r1: motion_type=rotational default_value=0.09320058 range=(-99999.9 99999.9)
            clamped=false
        SpatialTransform: axes_held_at_zero=(translation1 translation2 translation3)
          TransformAxis rotation1: coordinates=acromioclavicular_r2 axis=(0.1570949 0.9472686 -0.2792909)
              LinearFunction(coefficients=1 0)
          TransformAxis rotation2: coordinates=acromioclavicular_r3 axis=(-0.754084 0.297594 0.585487)
              LinearFunction(coefficients=1 0)
          TransformAxis rotation3: coordinates=acromioclavicular_r1 axis=(0.6376998 0.1186 0.7610998)
              LinearFunction(coefficients=1 0)
      WrapEllipsoid Deltoid2: xyz_body_rotation=(3.13042 -1.54881 -1.31423)
          translation=(-0.00557061 -0.036305 0.00922032) quadrant=-y dimensions=(0.0316948 0.038418 0.0336158)
      WrapTorus Delt3: xyz_body_rotation=(0.620988 0.32882 -0.560774) translation=(-0.0934518 -0.0411073 -0.0355367)
          quadrant=all inner_radius=0.038418 outer_radius=0.057627
      WrapTorus INFSP: xyz_body_rotation=(0.0253073 0.58835 0.151844) translation=(-0.0538812 -0.019113 -0.010757)
          quadrant=all inner_radius=0.0076836 outer_radius=0.01824855
      WrapEllipsoid TMIN: xyz_body_rotation=(-2.09754 -0.280823 -1.76348)
          translation=(-0.0401468 -0.0498474 -0.0344802) quadrant=x dimensions=(0.0288135 0.0288135 0.0480225)
      WrapCylinder TRIlongglen: xyz_body_rotation=(1.37532 -0.294612 2.43596)
          translation=(-0.0344802 -0.0296779 -0.0126779) quadrant=x radius=0.00288135 length=0.0288135
    Body scapphant: mass=0.000100449 mass_center=(0 0 0) inertia_xx=1.004493 inertia_yy=1.004493 inertia_zz=1.004493
      CustomJoint unrothum: parent_body=scapula location_in_parent=(-0.009172298 -0.0326553 0.00864405)
          location=(0 0 0)
        Coordinate unrothum_r1: motion_type=rotational default_value=-0.09320058 range=(-99999.9 99999.9) clamped=false
        Coordinate unrothum_r3: motion_type=rotational default_value=-0.2073451 range=(-99999.9 99999.9) clamped=false
        Coordinate unrothum_r2: motion_type=rotational default_value=0.02565634 range=(-99999.9 99999.9) clamped=false
        SpatialTransform: axes_held_at_zero=(translation1 translation2 translation3)
          TransformAxis rotation1: coordinates=unrothum_r1 axis=(0.6376998 0.1186 0.7610998)
              LinearFunction(coefficients=1 0)
          TransformAxis rotation2: coordinates=unrothum_r3 axis=(-0.754084 0.297594 0.585487)
              LinearFunction(coefficients=1 0)
          TransformAxis rotation3: coordinates=unrothum_r2 axis=(0.1570949 0.9472686 -0.2792909)
              LinearFunction(coefficients=1 0)
    Body humphant: mass=0.000100449 mass_center=(0 0 0) inertia_xx=1.004493 inertia_yy=1.004493 inertia_zz=1.004493
      CustomJoint shoulder0: parent_body=scapphant location_in_parent=(0 0 0) location=(0 0 0)
        Coordinate elv_angle: motion_type=rotational default_value=0 range=(-1.570796 2.268928) clamped=false
        SpatialTransform: axes_held_at_zero=(rotation2 rotation3 translation1 translation2 translation3)
          TransformAxis rotation1: coordinates=elv_angle axis=(0.0048 0.9990892 0.04240001)
              LinearFunction(coefficients=1 0)
    Body humphant1: mass=0.000100449 mass_center=(0 0 0) inertia_xx=1.004493 inertia_yy=1.004493 inertia_zz=1.004493
      CustomJoint shoulder1: parent_body=humphant location_in_parent=(0 0 0) location=(0 0 0)
        Coordinate shoulder_elv: motion_type=rotational default_value=0.5235988 range=(0 3.141593) clamped=false
        Coordinate shoulder1_r2: motion_type=rotational default_value=0 range=(-99999.9 99999.9) clamped=false
        SpatialTransform: axes_held_at_zero=(rotation3 translation1 translation2 translation3)
          TransformAxis rotation1: coordinates=shoulder_elv axis=(-0.9982614 0.0023 0.05889802)
              LinearFunction(coefficients=1 0)
          TransformAxis rotation2: coordinates=shoulder1_r2 axis=(0.0048 0.9990892 0.04240001)
              LinearFunction(coefficients=1 0)
    Body humerus: mass=2.006546 mass_center=(0.0173496 -0.134598 -0.0122419) inertia_xx=0.0123328
        inertia_yy=0.002562794 inertia_zz=0.0126354 inertia_xy=-0.000348971 inertia_xz=-0.000233545
        inertia_yz=0.001234824 meshes=humerus.vtp
      CustomJoint shoulder2: parent_body=humphant1 location_in_parent=(0 0 0) location=(0 0 0)
        Coordinate shoulder_rot: motion_type=rotational default_value=0 range=(-1.570796 0.3490659) clamped=false
        SpatialTransform: axes_held_at_zero=(rotation2 rotation3 translation1 translation2 translation3)
          TransformAxis rotation1: coordinates=shoulder_rot axis=(0.0048 0.9990892 0.04240001)
              LinearFunction(coefficients=1 0)
      WrapEllipsoid DELT1hh: xyz_body_rotation=(0.0584685 1.00461 0.570374)
          translation=(-0.0133503 -0.0121977 -0.0251638) quadrant=z dimensions=(0.0288135 0.096045 0.0480225)
      WrapCylinder delt2hum: xyz_body_rotation=(1.55093 -0.0199582 0.0596618)
          translation=(0.00163277 -0.0920111 0.0010565) quadrant=all radius=0.01046891 length=0.115254
      WrapEllipsoid delt3hum: xyz_body_rotation=(1.72735 0.0759218 -2.74313)
          translation=(0.00182485 -0.0568586 0.0010565) quadrant=x dimensions=(0.0096045 0.0096045 0.0480225)
      WrapEllipsoid SUPSP: xyz_body_rotation=(0.0380482 0.00855211 -1.30673)
          translation=(0.00019209 0.00739546 0.00412993) quadrant=all dimensions=(0.019209 0.019209 0.019209)
      WrapEllipsoid INFSP_and_TMIN_hum_head: xyz_body_rotation=(-0.286583 -0.00907571 -0.0684169)
          translation=(-0.000288135 0.00249717 0.00364971) quadrant=all dimensions=(0.019209 0.0240113 0.019209)
      WrapEllipsoid SUBSCAP: xyz_body_rotation=(-0.924501 0.288852 0.381529)
          translation=(-0.00240113 0.000672315 -0.00432203) quadrant=all dimensions=(0.019209 0.0163276 0.0268926)
      WrapCylinder TMINhum: xyz_body_rotation=(1.75353 0.0692896 2.74628) translation=(-0.00134463 -0.0437005 0)
          quadrant=x radius=0.00672315 length=0.0672315
      WrapCylinder TMAJ_LAThum: xyz_body_rotation=(1.53641 -0.0637045 1.41424)
          translation=(0.000672315 -0.0425479 -0.00528248) quadrant=-x radius=0.00672315 length=0.038418
      WrapCylinder PEC12hum: xyz_body_rotation=(1.55928 -0.0774926 -0.925897)
          translation=(0.0019209 -0.0487909 -0.00163277) quadrant=x radius=0.00864405 length=0.0672315
      WrapSphere PEC23hh: translation=(-0.00825987 0.00201695 -0.00038418) quadrant=all radius=0.019209
      WrapEllipsoid PEC1hh: xyz_body_rotation=(-0.620465 -0.310494 0.363727)
          translation=(-0.00355367 0.000480225 -0.00240113) quadrant=-z dimensions=(0.0288135 0.019209 0.019209)
      WrapCylinder PEC3hum: xyz_body_rotation=(1.44094 -0.0561996 1.75196)
          translation=(0.000864405 -0.0529208 -0.00038418) quadrant=-x radius=0.0076836 length=0.096045
      WrapCylinder LAT_TMAJhh: xyz_body_rotation=(-0.305084 -0.018326 -0.686613)
          translation=(-0.0215141 0.00979659 0.00902823) quadrant=-y radius=0.00672315 length=0.04322025
      WrapSphere LAT_TMAJ2hh: xyz_body_rotation=(-0.127235 0.276111 0.0197222)
          translation=(-0.00153672 0.00883614 0.00499434) quadrant=-z radius=0.0288135
      WrapEllipsoid Elbow_BIC_BRD: xyz_body_rotation=(-0.128631 0.137532 0.0307178)
          translation=(0.00182485 -0.27757 -0.0134463) quadrant=x dimensions=(0.0144067 0.0144067 0.096045)
      WrapEllipsoid TRIlonghh: xyz_body_rotation=(3.00162 -0.853466 2.57419)
          translation=(-0.00749151 -0.00393785 -0.00134463) quadrant=z dimensions=(0.0336158 0.019209 0.019209)
      WrapCylinder TRI: xyz_body_rotation=(-0.14015 -0.00628319 0.154985) translation=(0.00268926 -0.280355 -0.0114294)
          quadrant=all radius=0.0153672 length=0.096045
      WrapEllipsoid ANC: xyz_body_rotation=(0.00750492 -0.196699 1.04929) translation=(0.01287 -0.274785 -0.00076836)
          quadrant=-x dimensions=(0.019209 0.019209 0.019209)
      WrapEllipsoid BIClong: xyz_body_rotation=(-2.00434 -1.00164 0.975465)
          translation=(0.00316948 0.00701129 0.000288135) quadrant=-y dimensions=(0.0240113 0.019209 0.019209)
      WrapSphere TMAJ_LAT_PEC_CORBhh: translation=(0.000672315 0 0.0057627) quadrant=all radius=0.0288135
      WrapSphere DELT_TMAJ_LAT_PEC_CORBhh: translation=(0.000672315 0 0.0057627) quadrant=all radius=0.0288135
      WrapCylinder CORBhum: xyz_body_rotation=(-1.60832 0.0959931 0.875283)
          translation=(0.00259322 -0.115446 -0.00566666) quadrant=x radius=0.0076836 length=0.096045
      WrapEllipsoid Elbow_PT_ECRL: xyz_body_rotation=(-0.161094 -0.110828 0.61453)
          translation=(0.00288135 -0.275841 -0.0066271) quadrant=x dimensions=(0.0172881 0.0240113 0.0336158)
    Body DELT2pt2a: mass=0.000100449 mass_center=(0 0 0) inertia_xx=1.00449e-5 inertia_yy=1.00449e-5
        inertia_zz=1.00449e-5
      CustomJoint con_DELT: parent_body=humerus location_in_parent=(0 0 0) location=(0 0 0)
        Coordinate con_DELT2tx: motion_type=translational default_value=-0.00281667 range=(-99999.9 99999.9)
            clamped=false
        Coordinate con_DELT2ty: motion_type=translational default_value=-0.01301667 range=(-99999.9 99999.9)
            clamped=false
        Coordinate con_DELT2tz: motion_type=translational default_value=-0.00094998 range=(-99999.9 99999.9)
            clamped=false
        SpatialTransform: axes_held_at_zero=(rotation1 rotation2 rotation3)
          TransformAxis translation1: coordinates=con_DELT2tx axis=(1 0 0) LinearFunction(coefficients=1 0)
          TransformAxis translation2: coordinates=con_DELT2ty axis=(0 1 0) LinearFunction(coefficients=1 0)
          TransformAxis translation3: coordinates=con_DELT2tz axis=(0 0 1) LinearFunction(coefficients=1 0)
    Body ulna: mass=1.110266 mass_center=(0.00933351 -0.0921562 0.0233255) inertia_xx=0.005437413
        inertia_yy=0.001158362 inertia_zz=0.004965823 inertia_xy=0.000318284 inertia_xz=-7.64922e-5
        inertia_yz=0.001096595 meshes=ulna.vtp
      CustomJoint elbow: parent_body=humerus location_in_parent=(0.005858745 -0.2789147 -0.01181354) location=(0 0 0)
        Coordinate elbow_flexion: motion_type=rotational default_value=0 range=(0 2.268928) clamped=false
        SpatialTransform: axes_held_at_zero=(rotation2 rotation3 translation1 translation2 translation3)
          TransformAxis rotation1: coordinates=elbow_flexion axis=(0.04940001 0.03660001 0.9981083)
              LinearFunction(coefficients=1 0)
      WrapCylinder PQ2: xyz_body_rotation=(1.39138 0.0689405 1.52245) translation=(-0.0010757 -0.200926 0.0411073)
          quadrant=all radius=0.00672315 length=0.096045
    Body radius: mass=0.2346396 mass_center=(0.032304 -0.174379 0.0149831) inertia_xx=0.000440521 inertia_yy=8.89881e-5
        inertia_zz=0.000404389 inertia_xy=3.02754e-5 inertia_xz=-4.25905e-6 inertia_yz=6.44684e-5 meshes=radius.vtp
      CustomJoint radioulnar: parent_body=ulna location_in_parent=(0.00038418 -0.01104806 0.0191994) location=(0 0 0)
        Coordinate pro_sup: motion_type=rotational default_value=-2e-8 range=(-1.570796 1.570796) clamped=false
        SpatialTransform: axes_held_at_zero=(rotation2 rotation3 translation1 translation2 translation3)
          TransformAxis rotation1: coordinates=pro_sup axis=(-0.01716099 0.9926656 -0.119668)
              LinearFunction(coefficients=1 0)
      WrapCylinder SUP: xyz_body_rotation=(1.44775 0.304036 -2.44102) translation=(0.00432203 -0.0419717 0.00566666)
          quadrant=-x radius=0.0076836 length=0.038418
      WrapTorus ECU: xyz_body_rotation=(-0.986635 -0.148877 0.222704) translation=(-0.0156553 -0.232141 0.0335197)
          quadrant=all inner_radius=0.0057627 outer_radius=0.00864405
      WrapCylinder PQ1: xyz_body_rotation=(-1.60762 -0.0127409 -2.69025) translation=(0.0269886 -0.190745 0.027661)
          quadrant=all radius=0.0096045 length=0.096045
    Body BICpt: mass=0.000100449 mass_center=(0 0 0) inertia_xx=1.00449e-5 inertia_yy=1.00449e-5 inertia_zz=1.00449e-5
      CustomJoint con_BIC: parent_body=radius location_in_parent=(0 0 0) location=(0 0 0)
        Coordinate con_BICtx: motion_type=translational default_value=0 range=(-99999.9 99999.9) clamped=false
        Coordinate con_BICty: motion_type=translational default_value=0 range=(-99999.9 99999.9) clamped=false
        Coordinate con_BICtz: motion_type=translational default_value=0 range=(-99999.9 99999.9) clamped=false
        SpatialTransform: axes_held_at_zero=(rotation1 rotation2 rotation3)
          TransformAxis translation1: coordinates=con_BICtx axis=(1 0 0) LinearFunction(coefficients=1 0)
          TransformAxis translation2: coordinates=con_BICty axis=(0 1 0) LinearFunction(coefficients=1 0)
          TransformAxis translation3: coordinates=con_BICtz axis=(0 0 1) LinearFunction(coefficients=1 0)
    Body proximal_row: mass=0.000100449 mass_center=(0 0 0) inertia_xx=1.00449e-5 inertia_yy=1.00449e-5
        inertia_zz=1.00449e-5 meshes=(lunate.vtp sdfastSCAPHOIDw.vtp sdfastPISIFORMw.vtp sdfastTRIQUETRALw.vtp)
      CustomJoint radiocarpal: parent_body=radius location_in_parent=(0.0172881 -0.2324289 0.02401125) location=(0 0 0)
        Coordinate deviation: motion_type=rotational default_value=0 range=(-0.1745329 0.4363323) clamped=false
        Coordinate flexion: motion_type=rotational default_value=0 range=(-1.22173 1.22173) clamped=false
        SpatialTransform: axes_held_at_zero=(rotation2 translation1 translation2 translation3)
          TransformAxis rotation1: coordinates=deviation axis=(-0.819064 -0.135611 -0.557444)
            SimmSpline: x=(-0.174533 0 0.436332) y=(-0.174533 0 0.436332)
          TransformAxis rotation3: coordinates=flexion axis=(0.9564267 -0.2522069 0.147104)
            SimmSpline: x=(-1.5708 1.5708) y=(-0.785398 0.785398)
      WrapEllipsoid Extensor_ellipse: xyz_body_rotation=(-0.250804 0.285536 0.232827)
          translation=(0.000672315 -0.0129661 0.00451412) quadrant=z dimensions=(0.0480225 0.019209 0.0124859)
      WrapTorus ECRL: xyz_body_rotation=(1.53833 0.234398 0.731118) translation=(0.021322 -0.00922032 0.0199774)
          quadrant=all inner_radius=0.0076836 outer_radius=0.0153672
      WrapTorus ECRB: xyz_body_rotation=(1.31266 -0.11781 -0.116239) translation=(0.0121017 -0.00912427 0.0178644)
          quadrant=all inner_radius=0.0076836 outer_radius=0.0096045
      WrapTorus FCR: xyz_body_rotation=(-1.55596 -0.15324 -0.100007) translation=(0.00307344 -0.00432203 -0.0182485)
          quadrant=all inner_radius=0.00096045 outer_radius=0.002401125
      WrapTorus FCU: xyz_body_rotation=(-1.57376 -0.0797616 0.39235) translation=(-0.0118135 -0.0119096 -0.0164237)
          quadrant=all inner_radius=0.00653106 outer_radius=0.0076836
      WrapEllipsoid PL: xyz_body_rotation=(-0.0315905 0.0996583 0.0633554)
          translation=(0.00547456 -0.0172881 -0.00393785) quadrant=-z dimensions=(0.0240113 0.0134463 0.0115254)
      WrapEllipsoid FDS: xyz_body_rotation=(0.00837758 -0.0816814 -0.0171042)
          translation=(0.00115254 -0.00547456 -0.000288135) quadrant=-z dimensions=(0.0240113 0.0124859 0.0115254)
      WrapEllipsoid FDP: xyz_body_rotation=(-1.46747 -0.194604 0.121824)
          translation=(-0.00211299 -0.0066271 0.00307344) quadrant=y dimensions=(0.0240113 0.0124859 0.0115254)
      WrapTorus EDCL: xyz_body_rotation=(2.36318 0.193033 -0.26913) translation=(-0.0122938 -0.012774 0.0142147)
          quadrant=all inner_radius=0.0076836 outer_radius=0.0115254
      WrapTorus EDCR: xyz_body_rotation=(1.98392 0.100531 0.523075) translation=(-0.00941241 -0.0131582 0.0159435)
          quadrant=all inner_radius=0.01008472 outer_radius=0.01056495
      WrapTorus EDCM: xyz_body_rotation=(1.99317 0.19792 0.368264) translation=(-0.000672315 -0.0112373 0.0183446)
          quadrant=all inner_radius=0.00864405 outer_radius=0.0115254
      WrapTorus EDCI: xyz_body_rotation=(1.69768 0.0897099 0.00767945) translation=(0.00864405 -0.0143107 0.0202655)
          quadrant=all inner_radius=0.00864405 outer_radius=0.0115254
      WrapEllipsoid EDM: xyz_body_rotation=(2.9627 0.159349 0.117984) translation=(-0.0160395 -0.00211299 0.00461016)
          quadrant=-z dimensions=(0.0172881 0.0134463 0.0076836)
      WrapEllipsoid FPL: xyz_body_rotation=(-0.16633 -0.082205 -0.0659735)
          translation=(0.0163276 -0.0240113 -0.00316948) quadrant=-z dimensions=(0.0153672 0.0096045 0.0096045)
    Body hand: mass=0.5845147 mass_center=(-0.00289398 -0.0408185 -0.00107767) inertia_xx=0.000110494
        inertia_yy=6.02696e-5 inertia_zz=0.000150674 inertia_xy=9.04044e-7 inertia_xz=-2.00899e-7 inertia_yz=1.20539e-5
        meshes=(sdfast_1seg_hand_fr_c_5mc.vtp sdfast_1seg_hand_fr_c_4mc.vtp sdfast_1seg_hand_fr_c_3mc.vtp sdfast_1seg_hand_fr_c_2mc.vtp sdfast_1seg_hand_fr_c_trapezium.vtp sdfast_1seg_hand_fr_c_trapezoid.vtp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)
      CustomJoint wrist_hand: parent_body=proximal_row location_in_parent=(0.003834116 -0.01445861 0.002234967)
          location=(0 0 0)
        Coordinate wrist_hand_r1: motion_type=rotational default_value=0 range=(-99999.9 99999.9) clamped=false
        Coordinate wrist_hand_r3: motion_type=rotational default_value=0 range=(-99999.9 99999.9) clamped=false
        SpatialTransform: axes_held_at_zero=(rotation3 translation1 translation2 translation3)
          TransformAxis rotation1: coordinates=wrist_hand_r1 axis=(0.8991357 -0.3490529 -0.2640399)
              LinearFunction(coefficients=1 0)
          TransformAxis rotation2: coordinates=wrist_hand_r3 axis=(0.9971185 0.01069999 -0.07510096)
              LinearFunction(coefficients=1 0)
      WrapCylinder _2rdmcp_FDS: xyz_body_rotation=(0.593936 1.50011 -2.16578)
          translation=(0.0174802 -0.0632937 0.00835592) quadrant=y radius=0.01248585 length=0.0096045
      WrapCylinder _2rdmcp_FDP: xyz_body_rotation=(0.593936 1.50011 -2.23559)
          translation=(0.0174802 -0.0632937 0.00835592) quadrant=y radius=0.01008472 length=0.0096045
      WrapCylinder _2rdmcp_ext: xyz_body_rotation=(0.593936 1.50011 -1.99125)
          translation=(0.0174802 -0.0632937 0.00835592) quadrant=-y radius=0.0096045 length=0.0096045
      WrapEllipsoid _2ndmcp: xyz_body_rotation=(1.48667 -1.29661 2.43072) translation=(0.0197853 -0.0653106 0.00422598)
          active=false quadrant=-x dimensions=(0.00480225 0.00480225 0.0288135)
      WrapCylinder _3rdmcp_FDS: xyz_body_rotation=(0.770388 1.32837 1.5708)
          translation=(0.000672315 -0.0629095 0.00883614) quadrant=-x radius=0.01248585 length=0.0096045
      WrapCylinder _3rdmcp_FDP: xyz_body_rotation=(0.770388 1.32837 1.5708)
          translation=(0.00441807 -0.0635818 0.00950846) quadrant=-x radius=0.01008472 length=0.0096045
      WrapCylinder _3rdmcp_ext: xyz_body_rotation=(0.770388 1.32837 1.46608)
          translation=(0.000672315 -0.0629095 0.00883614) quadrant=y radius=0.0096045 length=0.0096045
      WrapCylinder _4rdmcp_FDS: xyz_body_rotation=(0.858527 1.10165 -2.48535)
          translation=(-0.0133503 -0.0616609 0.00316948) quadrant=y radius=0.01248585 length=0.0096045
      WrapCylinder _4rdmcp_FDP: xyz_body_rotation=(0.858527 1.10165 -2.48535)
          translation=(-0.0133503 -0.0616609 0.00316948) quadrant=y radius=0.01008472 length=0.0096045
      WrapCylinder _4rdmcp_ext: xyz_body_rotation=(0.858527 1.10165 -3.09621)
          translation=(-0.0133503 -0.0616609 0.00316948) quadrant=x radius=0.0096045 length=0.0096045
      WrapCylinder _5rdmcp_FDS: xyz_body_rotation=(0.470541 0.975639 -2.12162)
          translation=(-0.0225706 -0.0538812 -0.00547456) quadrant=y radius=0.01248585 length=0.0115254
      WrapCylinder _5rdmcp_FDP: xyz_body_rotation=(0.470541 0.975639 -2.34852)
          translation=(-0.0225706 -0.0538812 -0.00547456) quadrant=y radius=0.01008472 length=0.0096045
      WrapCylinder _5rdmcp_ext: xyz_body_rotation=(0.470541 0.975639 -1.68529)
          translation=(-0.0225706 -0.0538812 -0.00547456) quadrant=-y radius=0.0096045 length=0.0115254
      WrapCylinder Secondpm_FDS: xyz_body_rotation=(-1.57813 1.24808 1.0259)
          translation=(0.0294858 -0.0887456 -0.021322) quadrant=y radius=0.007203375 length=0.0096045
      WrapCylinder Secondpm_FDP: xyz_body_rotation=(-1.57813 1.24808 1.0259)
          translation=(0.0294858 -0.0887456 -0.021322) quadrant=y radius=0.0076836 length=0.0096045
      WrapCylinder Secondpm_ext: xyz_body_rotation=(-1.57813 1.24808 1.0259)
          translation=(0.0294858 -0.0887456 -0.021322) quadrant=-y radius=0.005282475 length=0.0115254
      WrapCylinder Secondmd_flex: xyz_body_rotation=(-1.63171 1.34286 2.11639)
          translation=(0.0279491 -0.0788529 -0.0432203) quadrant=y radius=0.00480225 length=0.0096045
      WrapCylinder Secondmd_ext: xyz_body_rotation=(-1.63171 1.34286 2.11639)
          translation=(0.0279491 -0.0788529 -0.0432203) quadrant=-y radius=0.0019209 length=0.0096045
      WrapCylinder Secondpm: xyz_body_rotation=(2.2513 -1.37008 1.18159) translation=(0.0293898 -0.087497 -0.021418)
          active=false quadrant=all radius=0.0038418 length=0.0096045
      WrapCylinder Secondmd: xyz_body_rotation=(1.35525 -1.38387 -0.557109)
          translation=(0.0283333 -0.0782767 -0.0423558) active=false quadrant=x radius=0.00288135 length=0.0096045
      WrapCylinder MPthumb: xyz_body_rotation=(0.321315 0.11013 -0.834791)
          translation=(0.0386101 -0.0388982 -0.0260282) quadrant=all radius=0.008163825 length=0.019209
      WrapCylinder IPthumb: xyz_body_rotation=(0.332136 -0.026529 -0.257611)
          translation=(0.0380338 -0.0684801 -0.0350564) quadrant=-x radius=0.004322025 length=0.0096045
      WrapCylinder Thirdpm_FDS: xyz_body_rotation=(-0.407883 1.45246 -0.145386)
          translation=(0.0117175 -0.089706 -0.0228587) quadrant=y radius=0.007203375 length=0.0096045
      WrapCylinder Thirdpm_FDP: xyz_body_rotation=(-0.407883 1.45246 -0.145386)
          translation=(0.0117175 -0.089706 -0.0228587) quadrant=y radius=0.0076836 length=0.0096045
      WrapCylinder Thirdpm_ext: xyz_body_rotation=(-0.407883 1.45246 -0.145386)
          translation=(0.0117175 -0.089706 -0.0228587) quadrant=-y radius=0.005282475 length=0.0096045
      WrapCylinder Thirdmd_flex: xyz_body_rotation=(0.714189 1.28282 -0.203331)
          translation=(0.0182485 -0.0781806 -0.0474462) quadrant=y radius=0.00480225 length=0.0096045
      WrapCylinder Thirdmd_ext: xyz_body_rotation=(0.714189 1.28282 -0.203331)
          translation=(0.0182485 -0.0781806 -0.0474462) quadrant=-y radius=0.0019209 length=0.0096045
      WrapCylinder Fourthpm_FDS: xyz_body_rotation=(0.696212 0.976861 -1.21876)
          translation=(-0.00480225 -0.0836552 -0.027757) quadrant=y radius=0.007203375 length=0.0096045
      WrapCylinder Fourthpm_FDP: xyz_body_rotation=(0.696212 0.976861 -1.21876)
          translation=(-0.00480225 -0.0836552 -0.027757) quadrant=y radius=0.0076836 length=0.0096045
      WrapCylinder Fourthpm_ext: xyz_body_rotation=(0.696212 0.976861 -1.21876)
          translation=(-0.00480225 -0.0836552 -0.027757) quadrant=-y radius=0.005282475 length=0.0096045
      WrapCylinder Fourthmd_flex: xyz_body_rotation=(0.75311 0.925897 -0.167377)
          translation=(0.00902823 -0.074723 -0.0450451) quadrant=y radius=0.00480225 length=0.0096045
      WrapCylinder Fourthmd_ext: xyz_body_rotation=(0.75311 0.925897 -0.167377)
          translation=(0.00902823 -0.074723 -0.0450451) quadrant=-y radius=0.0019209 length=0.0096045
      WrapCylinder Fifthpm_FDS: xyz_body_rotation=(0.977035 0.825192 -1.51687)
          translation=(-0.0147909 -0.0752993 -0.0315988) quadrant=y radius=0.007203375 length=0.0096045
      WrapCylinder Fifthpm_FDP: xyz_body_rotation=(0.977035 0.825192 -1.79612)
          translation=(-0.0146949 -0.0754914 -0.0315988) quadrant=y radius=0.0076836 length=0.0096045
      WrapCylinder Fifthpm_ext: xyz_body_rotation=(0.977035 0.825192 -1.08053)
          translation=(-0.0145988 -0.0753953 -0.0315028) quadrant=-y radius=0.005282475 length=0.0096045
      WrapCylinder Fifthmd_flex: xyz_body_rotation=(0.979304 0.65031 -0.620814)
          translation=(0.000672315 -0.0711693 -0.0438926) quadrant=y radius=0.00480225 length=0.0096045
      WrapCylinder Fifthmd_ext: xyz_body_rotation=(0.979304 0.65031 -0.620814)
          translation=(0.000672315 -0.0711693 -0.0438926) quadrant=-y radius=0.0019209 length=0.0096045
    Body clavicle_l: mass=0.156701 mass_center=(-0.0106572 0.00612029 -0.0520258) inertia_xx=0.00024368
        inertia_yy=0.000256407 inertia_zz=4.46196e-5 inertia_xy=-1.90653e-5 inertia_xz=-7.02543e-5
        inertia_yz=5.39513e-5 meshes=lclavicle.vtp
      CustomJoint sternoclavicular: parent_body=thorax location_in_parent=(0.006074859 0.006665593 -0.02445791)
          location=(0 0 0)
        Coordinate sternoclavicular_r2_l: motion_type=rotational default_value=-0.1267109 range=(-99999.9 99999.9)
            clamped=false
        Coordinate sternoclavicular_r3_l: motion_type=rotational default_value=0.05366888 range=(-99999.9 99999.9)
            clamped=false
        SpatialTransform: axes_held_at_zero=(rotation3 translation1 translation2 translation3)
          TransformAxis rotation1: coordinates=sternoclavicular_r2_l axis=(0.0153 0.9892987 0.1451)
            SimmSpline: x=(-6.28319 6.28319) y=(6.28319 -6.28319)
          TransformAxis rotation2: coordinates=sternoclavicular_r3_l axis=(-0.9944725 0 0.104997)
            SimmSpline: x=(-6.28319 6.28319) y=(6.28319 -6.28319)
    Body clavphant_l: mass=0.000100449 mass_center=(0 0 0) inertia_xx=1.004493 inertia_yy=1.004493 inertia_zz=1.004493
      CustomJoint unrotsca_l: parent_body=clavicle_l location_in_parent=(-0.01376325 0.01927623 -0.1301746)
          location=(0 0 0)
        Coordinate unrotscap_r3_l: motion_type=rotational default_value=-0.05366888 range=(-99999.9 99999.9)
            clamped=false
        Coordinate unrotscap_r2_l: motion_type=rotational default_value=0.1267109 range=(-99999.9 99999.9)
            clamped=false
        SpatialTransform: axes_held_at_zero=(rotation3 translation1 translation2 translation3)
          TransformAxis rotation1: coordinates=unrotscap_r3_l axis=(-0.9944725 0 0.104997)
            SimmSpline: x=(-6.28319 6.28319) y=(6.28319 -6.28319)
          TransformAxis rotation2: coordinates=unrotscap_r2_l axis=(0.0153 0.9892987 0.1451)
            SimmSpline: x=(-6.28319 6.28319) y=(6.28319 -6.28319)
    Body scapula_l: mass=0.7071231 mass_center=(-0.052531 -0.0336466 0.0420044) inertia_xx=0.001248485
        inertia_yy=0.001155569 inertia_zz=0.001371234 inertia_xy=0.000451419 inertia_xz=0.000411059
        inertia_yz=0.000242183 meshes=lscapula.vtp
      CustomJoint acromioclavicular_l: parent_body=clavphant_l location_in_parent=(0 0 0) location=(0 0 0)
        Coordinate acromioclavicular_r2_l: motion_type=rotational default_value=-0.02565634 range=(-99999.9 99999.9)
            clamped=false
        Coordinate acromioclavicular_r3_l: motion_type=rotational default_value=0.2073451 range=(-99999.9 99999.9)
            clamped=false
        Coordinate acromioclavicular_r1_l: motion_type=rotational default_value=0.09320058 range=(-99999.9 99999.9)
            clamped=false
        SpatialTransform: axes_held_at_zero=(translation1 translation2 translation3)
          TransformAxis rotation1: coordinates=acromioclavicular_r2_l axis=(0.1570949 0.9472686 0.2792909)
            SimmSpline: x=(-6.28319 6.28319) y=(6.28319 -6.28319)
          TransformAxis rotation2: coordinates=acromioclavicular_r3_l axis=(-0.754084 0.297594 -0.585487)
            SimmSpline: x=(-6.28319 6.28319) y=(6.28319 -6.28319)
          TransformAxis rotation3: coordinates=acromioclavicular_r1_l axis=(0.6376998 0.1186 -0.7610998)
            SimmSpline: x=(-6.28319 6.28319) y=(6.28319 -6.28319)
      WrapEllipsoid Deltoid2_l: xyz_body_rotation=(-3.13042 1.54881 -1.31423)
          translation=(-0.00557061 -0.036305 -0.00922032) quadrant=-y dimensions=(0.0316948 0.038418 0.0336158)
      WrapTorus Delt3_l: xyz_body_rotation=(-0.620988 -0.32882 -0.560774) translation=(-0.0934518 -0.0411073 0.0355367)
          quadrant=all inner_radius=0.038418 outer_radius=0.057627
      WrapTorus INFSP_l: xyz_body_rotation=(-0.0253073 -0.58835 0.151844) translation=(-0.0538812 -0.019113 0.010757)
          quadrant=all inner_radius=0.0076836 outer_radius=0.01824855
      WrapEllipsoid TMIN_l: xyz_body_rotation=(2.09754 0.280823 -1.76348) translation=(-0.0401468 -0.0498474 0.0344802)
          quadrant=x dimensions=(0.0288135 0.0288135 0.0480225)
      WrapCylinder TRIlongglen_l: xyz_body_rotation=(-1.37532 0.294612 2.43596)
          translation=(-0.0344802 -0.0296779 0.0126779) quadrant=x radius=0.00288135 length=0.0288135
    Body scapphant_l: mass=0.000100449 mass_center=(0 0 0) inertia_xx=1.004493 inertia_yy=1.004493 inertia_zz=1.004493
      CustomJoint unrothum_l: parent_body=scapula_l location_in_parent=(-0.009172298 -0.0326553 -0.00864405)
          location=(0 0 0)
        Coordinate unrothum_r1_l: motion_type=rotational default_value=-0.09320058 range=(-99999.9 99999.9)
            clamped=false
        Coordinate unrothum_r3_l: motion_type=rotational default_value=-0.2073451 range=(-99999.9 99999.9)
            clamped=false
        Coordinate unrothum_r2_l: motion_type=rotational default_value=0.02565634 range=(-99999.9 99999.9)
            clamped=false
        SpatialTransform: axes_held_at_zero=(translation1 translation2 translation3)
          TransformAxis rotation1: coordinates=unrothum_r1_l axis=(0.6376998 0.1186 -0.7610998)
            SimmSpline: x=(-6.28319 6.28319) y=(6.28319 -6.28319)
          TransformAxis rotation2: coordinates=unrothum_r3_l axis=(-0.754084 0.297594 -0.585487)
            SimmSpline: x=(-6.28319 6.28319) y=(6.28319 -6.28319)
          TransformAxis rotation3: coordinates=unrothum_r2_l axis=(0.1570949 0.9472686 0.2792909)
            SimmSpline: x=(-6.28319 6.28319) y=(6.28319 -6.28319)
    Body humphant_l: mass=0.000100449 mass_center=(0 0 0) inertia_xx=1.004493 inertia_yy=1.004493 inertia_zz=1.004493
      CustomJoint shoulder0_l: parent_body=scapphant_l location_in_parent=(0 0 0) location=(0 0 0)
        Coordinate elv_angle_l: motion_type=rotational default_value=0 range=(-1.570796 2.268928) clamped=false
        SpatialTransform: axes_held_at_zero=(rotation2 rotation3 translation1 translation2 translation3)
          TransformAxis rotation1: coordinates=elv_angle_l axis=(0.0048 0.9990892 -0.04240001)
            SimmSpline: x=(-6.28319 6.28319) y=(6.28319 -6.28319)
    Body humphant1_l: mass=0.000100449 mass_center=(0 0 0) inertia_xx=1.004493 inertia_yy=1.004493 inertia_zz=1.004493
      CustomJoint shoulder1_l: parent_body=humphant_l location_in_parent=(0 0 0) location=(0 0 0)
        Coordinate shoulder_elv_l: motion_type=rotational default_value=0.5235988 range=(0 3.141593) clamped=false
        Coordinate shoulder1_r2_l: motion_type=rotational default_value=0 range=(-99999.9 99999.9) clamped=false
        SpatialTransform: axes_held_at_zero=(rotation3 translation1 translation2 translation3)
          TransformAxis rotation1: coordinates=shoulder_elv_l axis=(-0.9982614 0.0023 -0.05889802)
            SimmSpline: x=(-6.28319 6.28319) y=(6.28319 -6.28319)
          TransformAxis rotation2: coordinates=shoulder1_r2_l axis=(0.0048 0.9990892 -0.04240001)
            SimmSpline: x=(-6.28319 6.28319) y=(6.28319 -6.28319)
    Body humerus_l: mass=2.006546 mass_center=(0.0173496 -0.134598 0.0122419) inertia_xx=0.0123328
        inertia_yy=0.002562794 inertia_zz=0.0126354 inertia_xy=-0.000348971 inertia_xz=-0.000233545
        inertia_yz=0.001234824 meshes=lhumerus.vtp
      CustomJoint shoulder2_l: parent_body=humphant1_l location_in_parent=(0 0 0) location=(0 0 0)
        Coordinate shoulder_rot_l: motion_type=rotational default_value=0 range=(-1.570796 0.3490659) clamped=false
        SpatialTransform: axes_held_at_zero=(rotation2 rotation3 translation1 translation2 translation3)
          TransformAxis rotation1: coordinates=shoulder_rot_l axis=(0.0048 0.9990892 -0.04240001)
            SimmSpline: x=(-6.28319 6.28319) y=(6.28319 -6.28319)
      WrapEllipsoid DELT1hh_l: xyz_body_rotation=(-0.0584685 -1.00461 0.570374)
          translation=(-0.0133503 -0.0121977 0.0251638) quadrant=-z dimensions=(0.0288135 0.096045 0.0480225)
      WrapCylinder delt2hum_l: xyz_body_rotation=(-1.55093 0.0199582 0.0596618)
          translation=(0.00163277 -0.0920111 -0.00109491) quadrant=all radius=0.01046891 length=0.115254
      WrapEllipsoid delt3hum_l: xyz_body_rotation=(-1.72735 -0.0759218 -2.74313)
          translation=(0.00182485 -0.0568586 -0.0010565) quadrant=x dimensions=(0.0096045 0.0096045 0.0480225)
      WrapEllipsoid SUPSP_l: xyz_body_rotation=(-0.0380482 -0.00855211 -1.30673)
          translation=(0.00019209 0.00739546 -0.00412993) quadrant=all dimensions=(0.019209 0.019209 0.019209)
      WrapEllipsoid INFSP_and_TMIN_hum_head_l: xyz_body_rotation=(0.286583 0.00907571 -0.0684169)
          translation=(-0.000288135 0.00249717 -0.00364971) quadrant=all dimensions=(0.019209 0.0240113 0.019209)
      WrapEllipsoid SUBSCAP_l: xyz_body_rotation=(0.924501 -0.288852 0.381529)
          translation=(-0.00240113 0.000672315 0.00432203) quadrant=all dimensions=(0.019209 0.0163276 0.0268926)
      WrapCylinder TMINhum_l: xyz_body_rotation=(-1.75353 -0.0692896 2.74628) translation=(-0.00134463 -0.0437005 0)
          quadrant=x radius=0.00672315 length=0.0672315
      WrapCylinder TMAJ_LAThum_l: xyz_body_rotation=(-1.53641 0.0637045 1.41424)
          translation=(0.00672315 -0.0425479 0.00528248) quadrant=-x radius=0.00672315 length=0.038418
      WrapCylinder PEC12hum_l: xyz_body_rotation=(-1.55928 0.0774926 -0.925897)
          translation=(0.0019209 -0.0487909 0.00163277) quadrant=x radius=0.00864405 length=0.0672315
      WrapSphere PEC23hh_l: translation=(-0.00825987 0.00201695 0.00038418) quadrant=all radius=0.019209
      WrapEllipsoid PEC1hh_l: xyz_body_rotation=(0.620465 0.310494 0.363727)
          translation=(-0.00355367 0.000480225 0.00240113) quadrant=-z dimensions=(0.0288135 0.019209 0.019209)
      WrapCylinder PEC3hum_l: xyz_body_rotation=(-1.44094 0.0561996 1.75196)
          translation=(0.000864405 -0.0529208 0.00038418) quadrant=-x radius=0.0076836 length=0.096045
      WrapCylinder LAT_TMAJhh_l: xyz_body_rotation=(0.305084 0.018326 -0.686613)
          translation=(-0.0215141 0.00979659 -0.00902823) quadrant=-y radius=0.00672315 length=0.04322025
      WrapSphere LAT_TMAJ2hh_l: xyz_body_rotation=(0.127235 -0.276111 0.0197222)
          translation=(-0.00153672 0.00883614 -0.00499434) quadrant=-z radius=0.0288135
      WrapEllipsoid Elbow_BIC_BRD_l: xyz_body_rotation=(0.128631 -0.137532 0.0307178)
          translation=(0.00182485 -0.27757 0.0134463) quadrant=x dimensions=(0.0144067 0.0144067 0.096045)
      WrapEllipsoid TRIlonghh_l: xyz_body_rotation=(-3.00162 0.853466 2.57419)
          translation=(-0.00749151 -0.00393785 0.00134463) quadrant=z dimensions=(0.0336158 0.019209 0.019209)
      WrapCylinder TRI_l: xyz_body_rotation=(0.14015 0.00628319 0.154985) translation=(0.00268926 -0.280355 0.0114294)
          quadrant=all radius=0.0153672 length=0.096045
      WrapEllipsoid ANC_l: xyz_body_rotation=(-0.00750492 0.196699 1.04929) translation=(0.01287 -0.274785 0.00076836)
          quadrant=-x dimensions=(0.019209 0.019209 0.019209)
      WrapEllipsoid BIClong_l: xyz_body_rotation=(2.00434 1.00164 0.975465)
          translation=(0.00316948 0.00701129 -0.000288135) quadrant=y dimensions=(0.0240113 0.019209 0.019209)
      WrapSphere TMAJ_LAT_PEC_CORBhh_l: translation=(0.000672315 0 -0.0057627) quadrant=all radius=0.0288135
      WrapSphere DELT_TMAJ_LAT_PEC_CORBhh_l: translation=(0.000672315 0 -0.0057627) quadrant=all radius=0.0288135
      WrapCylinder CORBhum_l: xyz_body_rotation=(1.60832 -0.0959931 0.875283)
          translation=(0.00259322 -0.115446 0.00566666) quadrant=x radius=0.0076836 length=0.096045
      WrapEllipsoid Elbow_PT_ECRL_l: xyz_body_rotation=(0.161094 0.110828 0.61453)
          translation=(0.00288135 -0.275841 0.0066271) quadrant=x dimensions=(0.0172881 0.0240113 0.0336158)
    Body DELT2pt2a_l: mass=0.000100449 mass_center=(0 0 0) inertia_xx=1.00449e-5 inertia_yy=1.00449e-5
        inertia_zz=1.00449e-5
      CustomJoint con_DELT_l: parent_body=humerus_l location_in_parent=(0 0 0) location=(0 0 0)
        Coordinate con_DELT2tx_l: motion_type=translational default_value=-0.00281667 range=(-99999.9 99999.9)
            clamped=false
        Coordinate con_DELT2ty_l: motion_type=translational default_value=-0.01301667 range=(-99999.9 99999.9)
            clamped=false
        Coordinate con_DELT2tz_l: motion_type=translational default_value=-0.00094998 range=(-99999.9 99999.9)
            clamped=false
        SpatialTransform: axes_held_at_zero=(rotation1 rotation2 rotation3)
          TransformAxis translation1: coordinates=con_DELT2tx_l axis=(1 0 0) LinearFunction(coefficients=1 0)
          TransformAxis translation2: coordinates=con_DELT2ty_l axis=(0 1 0) LinearFunction(coefficients=1 0)
          TransformAxis translation3: coordinates=con_DELT2tz_l axis=(0 0 -1) LinearFunction(coefficients=1 0)
    Body ulna_l: mass=1.110266 mass_center=(0.00933351 -0.0921562 -0.0233255) inertia_xx=0.005437413
        inertia_yy=0.001158362 inertia_zz=0.004965823 inertia_xy=0.000318284 inertia_xz=-7.64922e-5
        inertia_yz=0.001096595 meshes=lulna.vtp
      CustomJoint elbow_l: parent_body=humerus_l location_in_parent=(0.005858745 -0.2789147 0.01181354)
          location=(0 0 0)
        Coordinate elbow_flexion_l: motion_type=rotational default_value=0 range=(0 2.268928) clamped=false
        SpatialTransform: axes_held_at_zero=(rotation2 rotation3 translation1 translation2 translation3)
          TransformAxis rotation1: coordinates=elbow_flexion_l axis=(0.04940001 0.03660001 0.9981083)
              LinearFunction(coefficients=1 0)
      WrapCylinder PQ2_l: xyz_body_rotation=(-1.39138 -0.0689405 1.52245) translation=(-0.0010757 -0.200926 -0.0411073)
          quadrant=all radius=0.00672315 length=0.096045
    Body radius_l: mass=0.2346396 mass_center=(0.032304 -0.174379 -0.0149831) inertia_xx=0.000440521
        inertia_yy=8.89881e-5 inertia_zz=0.000404389 inertia_xy=3.02754e-5 inertia_xz=-4.25905e-6 inertia_yz=6.44684e-5
        meshes=lradius.vtp
      CustomJoint radioulnar_l: parent_body=ulna_l location_in_parent=(0.00038418 -0.01104806 -0.0191994)
          location=(0 0 0)
        Coordinate pro_sup_l: motion_type=rotational default_value=-2e-8 range=(-1.570796 1.570796) clamped=false
        SpatialTransform: axes_held_at_zero=(rotation2 rotation3 translation1 translation2 translation3)
          TransformAxis rotation1: coordinates=pro_sup_l axis=(-0.01716099 0.9926656 0.119668)
            SimmSpline: x=(-6.28319 6.28319) y=(6.28319 -6.28319)
      WrapCylinder SUP_l: xyz_body_rotation=(-1.44775 -0.304036 -2.44102)
          translation=(0.00432203 -0.0419717 -0.00566666) quadrant=-x radius=0.0076836 length=0.038418
      WrapTorus ECU_l: xyz_body_rotation=(0.986635 0.148877 0.222704) translation=(-0.0156553 -0.232141 -0.0335197)
          quadrant=all inner_radius=0.0057627 outer_radius=0.00864405
      WrapCylinder PQ1_l: xyz_body_rotation=(1.60762 0.0127409 -2.69025) translation=(0.0269886 -0.190745 -0.027661)
          quadrant=all radius=0.0096045 length=0.096045
    Body radius_l: mass=0.2346396 mass_center=(0.032304 -0.174379 -0.0149831) inertia_xx=0.000440521
        inertia_yy=8.89881e-5 inertia_zz=0.000404389 inertia_xy=3.02754e-5 inertia_xz=-4.25905e-6 inertia_yz=6.44684e-5
      CustomJoint radioulnar_l: parent_body=ulna_l location_in_parent=(0.00038418 -0.01104806 -0.0191994)
          location=(0 0 0)
        Coordinate con_BICtx_l: motion_type=translational default_value=0 range=(-99999.9 99999.9) clamped=false
        Coordinate con_BICty_l: motion_type=translational default_value=0 range=(-99999.9 99999.9) clamped=false
        Coordinate con_BICtz_l: motion_type=translational default_value=0 range=(-99999.9 99999.9) clamped=false
        SpatialTransform: axes_held_at_zero=(rotation1 rotation2 rotation3)
          TransformAxis translation1: coordinates=con_BICtx_l axis=(1 0 0) LinearFunction(coefficients=1 0)
          TransformAxis translation2: coordinates=con_BICty_l axis=(0 1 0) LinearFunction(coefficients=1 0)
          TransformAxis translation3: coordinates=con_BICtz_l axis=(0 0 -1) LinearFunction(coefficients=1 0)
    Body proximal_row_l: mass=0.000100449 mass_center=(0 0 0) inertia_xx=1.00449e-5 inertia_yy=1.00449e-5
        inertia_zz=1.00449e-5 meshes=(llunate.vtp lsdfastSCAPHOIDw.vtp lsdfastPISIFORMw.vtp lsdfastTRIQUETRALw.vtp)
      CustomJoint radiocarpal_l: parent_body=radius_l location_in_parent=(0.0172881 -0.2324289 -0.02401125)
          location=(0 0 0)
        Coordinate deviation_l: motion_type=rotational default_value=0 range=(-0.1745329 0.4363323) clamped=false
        Coordinate flexion_l: motion_type=rotational default_value=0 range=(-1.22173 1.22173) clamped=false
        SpatialTransform: axes_held_at_zero=(rotation2 translation1 translation2 translation3)
          TransformAxis rotation1: coordinates=deviation_l axis=(0.819064 0.135611 0.557444)
            SimmSpline: x=(-0.174533 0 0.436332) y=(-0.174533 0 0.436332)
          TransformAxis rotation3: coordinates=flexion_l axis=(0.9564267 -0.2522069 -0.147104)
            SimmSpline: x=(-6.28319 6.28319) y=(6.28319 -6.28319)
      WrapEllipsoid Extensor_ellipse_l: xyz_body_rotation=(0.250804 -0.285536 0.232827)
          translation=(0.000672315 -0.0129661 -0.00451412) quadrant=z dimensions=(0.0480225 0.019209 0.0124859)
      WrapTorus ECRL_l: xyz_body_rotation=(-1.53833 -0.234398 0.731118) translation=(0.021322 -0.00922032 -0.0199774)
          quadrant=all inner_radius=0.0076836 outer_radius=0.0153672
      WrapTorus ECRB_l: xyz_body_rotation=(-1.31266 0.11781 -0.116239) translation=(0.0121017 -0.00912427 -0.0178644)
          quadrant=all inner_radius=0.0076836 outer_radius=0.0096045
      WrapTorus FCR_l: xyz_body_rotation=(1.55596 0.15324 -0.100007) translation=(0.00307344 -0.00432203 0.0182485)
          quadrant=all inner_radius=0.00096045 outer_radius=0.002401125
      WrapTorus FCU_l: xyz_body_rotation=(1.57376 0.0797616 0.39235) translation=(-0.0118135 -0.0119096 0.0164237)
          quadrant=all inner_radius=0.00653106 outer_radius=0.0076836
      WrapEllipsoid PL_l: xyz_body_rotation=(0.0315905 -0.0996583 0.0633554)
          translation=(0.00547456 -0.0172881 0.00393785) quadrant=-z dimensions=(0.0240113 0.0134463 0.0115254)
      WrapEllipsoid FDS_l: xyz_body_rotation=(-0.00837758 0.0816814 -0.0171042)
          translation=(0.00115254 -0.00547456 0.000288135) quadrant=-z dimensions=(0.0240113 0.0124859 0.0115254)
      WrapEllipsoid FDP_l: xyz_body_rotation=(1.46747 0.194604 0.121824)
          translation=(-0.00211299 -0.0066271 -0.00307344) quadrant=y dimensions=(0.0240113 0.0124859 0.0115254)
      WrapTorus EDCL_l: xyz_body_rotation=(-2.36318 -0.193033 -0.26913) translation=(-0.0122938 -0.012774 -0.0142147)
          quadrant=all inner_radius=0.0076836 outer_radius=0.0115254
      WrapTorus EDCR_l: xyz_body_rotation=(-1.98392 -0.100531 0.523075) translation=(-0.00941241 -0.0131582 -0.0159435)
          quadrant=all inner_radius=0.01008472 outer_radius=0.01056495
      WrapTorus EDCM_l: xyz_body_rotation=(-1.99317 -0.19792 0.368264) translation=(-0.000672315 -0.0112373 -0.0183446)
          quadrant=all inner_radius=0.00864405 outer_radius=0.0115254
      WrapTorus EDCI_l: xyz_body_rotation=(-1.69768 -0.0897099 0.00767945)
          translation=(0.00864405 -0.0143107 -0.0202655) quadrant=all inner_radius=0.00864405 outer_radius=0.0115254
      WrapEllipsoid EDM_l: xyz_body_rotation=(-2.9627 -0.159349 0.117984)
          translation=(-0.0160395 -0.00211299 -0.00461016) quadrant=-z dimensions=(0.0172881 0.0134463 0.0076836)
      WrapEllipsoid FPL_l: xyz_body_rotation=(0.16633 0.082205 -0.0659735)
          translation=(0.0163276 -0.0240113 0.00316948) quadrant=-z dimensions=(0.0153672 0.0096045 0.0096045)
    Body hand_l: mass=0.5845147 mass_center=(-0.00289398 -0.0408185 0.00107767) inertia_xx=0.000110494
        inertia_yy=6.02696e-5 inertia_zz=0.000150674 inertia_xy=9.04044e-7 inertia_xz=-2.00899e-7 inertia_yz=1.20539e-5
        meshes=(lsdfast_1seg_hand_fr_c_5mc.vtp lsdfast_1seg_hand_fr_c_4mc.vtp lsdfast_1seg_hand_fr_c_3mc.vtp lsdfast_1seg_hand_fr_c_2mc.vtp lsdfast_1seg_hand_fr_c_trapezium.vtp lsdfast_1seg_hand_fr_c_trapezoid.vtp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)
      CustomJoint wrist_hand_l: parent_body=proximal_row_l location_in_parent=(0.003834116 -0.01445861 -0.002234967)
          location=(0 0 0)
        Coordinate wrist_hand_r1_l: motion_type=rotational default_value=0 range=(-99999.9 99999.9) clamped=false
        Coordinate wrist_hand_r3_l: motion_type=rotational default_value=0 range=(-99999.9 99999.9) clamped=false
        SpatialTransform: axes_held_at_zero=(rotation3 translation1 translation2 translation3)
          TransformAxis rotation1: coordinates=wrist_hand_r1_l axis=(-0.8991357 0.3490529 -0.2640399)
              LinearFunction(coefficients=1 0)
          TransformAxis rotation2: coordinates=wrist_hand_r3_l axis=(-0.9971185 -0.01069999 -0.07510096)
              LinearFunction(coefficients=1 0)
      WrapCylinder _2rdmcp_FDS_l: xyz_body_rotation=(-0.593936 -1.50011 -2.16578)
          translation=(0.0174802 -0.0632937 -0.00835592) quadrant=y radius=0.01248585 length=0.0096045
      WrapCylinder _2rdmcp_FDP_l: xyz_body_rotation=(-0.593936 -1.50011 -2.23559)
          translation=(0.0174802 -0.0632937 -0.00835592) quadrant=y radius=0.01008472 length=0.0096045
      WrapCylinder _2rdmcp_ext_l: xyz_body_rotation=(-0.593936 -1.50011 -1.99125)
          translation=(0.0174802 -0.0632937 -0.00835592) quadrant=-y radius=0.0096045 length=0.0096045
      WrapEllipsoid _2ndmcp_l: xyz_body_rotation=(-1.48667 1.29661 2.43072)
          translation=(0.0197853 -0.0653106 -0.00422598) active=false quadrant=-x
          dimensions=(0.00480225 0.00480225 0.0288135)
      WrapCylinder _3rdmcp_FDS_l: xyz_body_rotation=(-0.770388 -1.32837 1.5708)
          translation=(0.000672315 -0.0629095 -0.00883614) quadrant=-x radius=0.01248585 length=0.0096045
      WrapCylinder _3rdmcp_FDP_l: xyz_body_rotation=(-0.770388 -1.32837 1.5708)
          translation=(0.00441807 -0.0635818 -0.00950846) quadrant=-x radius=0.01008472 length=0.0096045
      WrapCylinder _3rdmcp_ext_l: xyz_body_rotation=(-0.770388 -1.32837 1.46608)
          translation=(0.000672315 -0.0629095 -0.00883614) quadrant=y radius=0.0096045 length=0.0096045
      WrapCylinder _4rdmcp_FDS_l: xyz_body_rotation=(-0.858527 -1.10165 -2.48535)
          translation=(-0.0133503 -0.0616609 -0.00316948) quadrant=y radius=0.01248585 length=0.0096045
      WrapCylinder _4rdmcp_FDP_l: xyz_body_rotation=(-0.858527 -1.10165 -2.48535)
          translation=(-0.0133503 -0.0616609 -0.00316948) quadrant=y radius=0.01008472 length=0.0096045
      WrapCylinder _4rdmcp_ext_l: xyz_body_rotation=(-0.858527 -1.10165 -3.09621)
          translation=(-0.0133503 -0.0616609 -0.00316948) quadrant=x radius=0.0096045 length=0.0096045
      WrapCylinder _5rdmcp_FDS_l: xyz_body_rotation=(-0.470541 -0.975639 -2.12162)
          translation=(-0.0225706 -0.0538812 0.00547456) quadrant=y radius=0.01248585 length=0.0115254
      WrapCylinder _5rdmcp_FDP_l: xyz_body_rotation=(-0.470541 -0.975639 -2.34852)
          translation=(-0.0225706 -0.0538812 0.00547456) quadrant=y radius=0.01008472 length=0.0096045
      WrapCylinder _5rdmcp_ext_l: xyz_body_rotation=(-0.470541 -0.975639 -1.68529)
          translation=(-0.0225706 -0.0538812 0.00547456) quadrant=-y radius=0.0096045 length=0.0115254
      WrapCylinder Secondpm_FDS_l: xyz_body_rotation=(1.57813 -1.24808 1.0259)
          translation=(0.0294858 -0.0887456 0.021322) quadrant=y radius=0.007203375 length=0.0096045
      WrapCylinder Secondpm_FDP_l: xyz_body_rotation=(1.57813 -1.24808 1.0259)
          translation=(0.0294858 -0.0887456 0.021322) quadrant=y radius=0.0076836 length=0.0096045
      WrapCylinder Secondpm_ext_l: xyz_body_rotation=(1.57813 -1.24808 1.0259)
          translation=(0.0294858 -0.0887456 0.021322) quadrant=-y radius=0.005282475 length=0.0115254
      WrapCylinder Secondmd_flex_l: xyz_body_rotation=(1.63171 -1.34286 2.11639)
          translation=(0.0279491 -0.0788529 0.0432203) quadrant=y radius=0.00480225 length=0.0096045
      WrapCylinder Secondmd_ext_l: xyz_body_rotation=(1.63171 -1.34286 2.11639)
          translation=(0.0279491 -0.0788529 0.0432203) quadrant=-y radius=0.0019209 length=0.0096045
      WrapCylinder Secondpm_l: xyz_body_rotation=(-2.2513 1.37008 1.18159) translation=(0.0293898 -0.087497 0.021418)
          active=false quadrant=all radius=0.0038418 length=0.0096045
      WrapCylinder Secondmd_l: xyz_body_rotation=(-1.35525 1.38387 -0.557109)
          translation=(0.0283333 -0.0782767 0.0423558) active=false quadrant=x radius=0.00288135 length=0.0096045
      WrapCylinder MPthumb_l: xyz_body_rotation=(-0.321315 -0.11013 -0.834791)
          translation=(0.0386101 -0.0388982 0.0260282) quadrant=all radius=0.008163825 length=0.019209
      WrapCylinder IPthumb_l: xyz_body_rotation=(-0.332136 0.026529 -0.257611)
          translation=(0.0380338 -0.0684801 0.0350564) quadrant=-x radius=0.004322025 length=0.0096045
      WrapCylinder Thirdpm_FDS_l: xyz_body_rotation=(0.407883 -1.45246 -0.145386)
          translation=(0.0117175 -0.089706 0.0228587) quadrant=y radius=0.007203375 length=0.0096045
      WrapCylinder Thirdpm_FDP_l: xyz_body_rotation=(0.407883 -1.45246 -0.145386)
          translation=(0.0117175 -0.089706 0.0228587) quadrant=y radius=0.0076836 length=0.0096045
      WrapCylinder Thirdpm_ext_l: xyz_body_rotation=(0.407883 -1.45246 -0.145386)
          translation=(0.0117175 -0.089706 0.0228587) quadrant=-y radius=0.005282475 length=0.0096045
      WrapCylinder Thirdmd_flex_l: xyz_body_rotation=(-0.714189 -1.28282 -0.203331)
          translation=(0.0182485 -0.0781806 0.0474462) quadrant=y radius=0.00480225 length=0.0096045
      WrapCylinder Thirdmd_ext_l: xyz_body_rotation=(-0.714189 -1.28282 -0.203331)
          translation=(0.0182485 -0.0781806 0.0474462) quadrant=-y radius=0.0019209 length=0.0096045
      WrapCylinder Fourthpm_FDS_l: xyz_body_rotation=(-0.696212 -0.976861 -1.21876)
          translation=(-0.00480225 -0.0836552 0.027757) quadrant=y radius=0.007203375 length=0.0096045
      WrapCylinder Fourthpm_FDP_l: xyz_body_rotation=(-0.696212 -0.976861 -1.21876)
          translation=(-0.00480225 -0.0836552 0.027757) quadrant=y radius=0.0076836 length=0.0096045
      WrapCylinder Fourthpm_ext_l: xyz_body_rotation=(-0.696212 -0.976861 -1.21876)
          translation=(-0.00480225 -0.0836552 0.027757) quadrant=-y radius=0.005282475 length=0.0096045
      WrapCylinder Fourthmd_flex_l: xyz_body_rotation=(-0.75311 -0.925897 -0.167377)
          translation=(0.00902823 -0.074723 0.0450451) quadrant=y radius=0.00480225 length=0.0096045
      WrapCylinder Fourthmd_ext_l: xyz_body_rotation=(-0.75311 -0.925897 -0.167377)
          translation=(0.00902823 -0.074723 0.0450451) quadrant=-y radius=0.0019209 length=0.0096045
      WrapCylinder Fifthpm_FDS_l: xyz_body_rotation=(-0.977035 -0.825192 -1.51687)
          translation=(-0.0147909 -0.0752993 0.0315988) quadrant=y radius=0.007203375 length=0.0096045
      WrapCylinder Fifthpm_FDP_l: xyz_body_rotation=(-0.977035 -0.825192 -1.79612)
          translation=(-0.0146949 -0.0754914 0.0315988) quadrant=y radius=0.0076836 length=0.0096045
      WrapCylinder Fifthpm_ext_l: xyz_body_rotation=(-0.977035 -0.825192 -1.08053)
          translation=(-0.0145988 -0.0753953 0.0315028) quadrant=-y radius=0.005282475 length=0.0096045
      WrapCylinder Fifthmd_flex_l: xyz_body_rotation=(-0.979304 -0.65031 -0.620814)
          translation=(0.000672315 -0.0711693 0.0438926) quadrant=y radius=0.00480225 length=0.0096045
      WrapCylinder Fifthmd_ext_l: xyz_body_rotation=(-0.979304 -0.65031 -0.620814)
          translation=(0.000672315 -0.0711693 0.0438926) quadrant=-y radius=0.0019209 length=0.0096045
    Body auxt1: mass=0 mass_center=(0 0 0) inertia_xx=0 inertia_yy=0 inertia_zz=0
      CustomJoint auxt1jnt: parent_body=torso location_in_parent=(-0.023 0.3915 0) location=(0 0 0)
        Coordinate pitch2: motion_type=rotational default_value=0 range=(-0.5759587 0.837758) clamped=true
        Coordinate roll2: motion_type=rotational default_value=0 range=(-0.5759587 0.5759587) clamped=true
        Coordinate yaw2: motion_type=rotational default_value=0 range=(-0.4712389 0.4712389) clamped=true
        SpatialTransform: axes_held_at_zero=(translation1 translation2 translation3)
          TransformAxis rotation1: coordinates=pitch2 axis=(0 0 1)
            SimmSpline: x=(-1.74533 1.74533) y=(-0.172788 0.172788)
          TransformAxis rotation2: coordinates=roll2 axis=(1 0 0)
            SimmSpline: x=(-1.74533 1.74533) y=(-0.136136 0.136136)
          TransformAxis rotation3: coordinates=yaw2 axis=(0 1 0)
            SimmSpline: x=(-1.74533 1.74533) y=(-0.109956 0.109956)
    Body cerv7: mass=0.2209885 mass_center=(-0.0080114 0 0) inertia_xx=0.000220989 inertia_yy=0.000431932
        inertia_zz=0.000220989 meshes=rotatedcerv7.vtp
      WeldJoint cerv7jnt: parent_body=auxt1 location_in_parent=(-0.00668268 0.005524935 0) location=(0 0 0)
    Body aux7: mass=0 mass_center=(0 0 0) inertia_xx=0 inertia_yy=0 inertia_zz=0
      CustomJoint aux7jnt: parent_body=cerv7 location_in_parent=(0.01295111 0.01209526 0) location=(0 0 0)
        Coordinate aux7jnt_r3: motion_type=rotational default_value=0 range=(-99999.9 99999.9) clamped=false
        Coordinate aux7jnt_r1: motion_type=rotational default_value=0 range=(-99999.9 99999.9) clamped=false
        Coordinate aux7jnt_r2: motion_type=rotational default_value=0 range=(-99999.9 99999.9) clamped=false
        SpatialTransform: axes_held_at_zero=(translation1 translation2 translation3)
          TransformAxis rotation1: coordinates=aux7jnt_r3 axis=(0 0 1) LinearFunction(coefficients=1 0)
          TransformAxis rotation2: coordinates=aux7jnt_r1 axis=(1 0 0) LinearFunction(coefficients=1 0)
          TransformAxis rotation3: coordinates=aux7jnt_r2 axis=(0 1 0) LinearFunction(coefficients=1 0)
    Body cerv6: mass=0.2410784 mass_center=(-0.0081091 0 0) inertia_xx=0.000241078 inertia_yy=0.000472112
        inertia_zz=0.000241078 meshes=cerv6.vtp
      WeldJoint cerv6jnt: parent_body=aux7 location_in_parent=(-0.009202363 0.003971505 0) location=(0 0 0)
    Body aux6: mass=0 mass_center=(0 0 0) inertia_xx=0 inertia_yy=0 inertia_zz=0
      CustomJoint aux6jnt: parent_body=cerv6 location_in_parent=(0.00962345 0.00952575 0) location=(0 0 0)
        Coordinate aux6jnt_r3: motion_type=rotational default_value=0 range=(-99999.9 99999.9) clamped=false
        Coordinate aux6jnt_r1: motion_type=rotational default_value=0 range=(-99999.9 99999.9) clamped=false
        Coordinate aux6jnt_r2: motion_type=rotational default_value=0 range=(-99999.9 99999.9) clamped=false
        SpatialTransform: axes_held_at_zero=(translation1 translation2 translation3)
          TransformAxis rotation1: coordinates=aux6jnt_r3 axis=(0 0 1) LinearFunction(coefficients=1 0)
          TransformAxis rotation2: coordinates=aux6jnt_r1 axis=(1 0 0) LinearFunction(coefficients=1 0)
          TransformAxis rotation3: coordinates=aux6jnt_r2 axis=(0 1 0) LinearFunction(coefficients=1 0)
    Body cerv5: mass=0.2310335 mass_center=(-0.0079137 0 0) inertia_xx=0.000231033 inertia_yy=0.000452022
        inertia_zz=0.000231033 meshes=cerv5.vtp
      WeldJoint cerv5jnt: parent_body=aux6 location_in_parent=(-0.00553959 0.00796255 0) location=(0 0 0)
    Body aux5: mass=0 mass_center=(0 0 0) inertia_xx=0 inertia_yy=0 inertia_zz=0
      CustomJoint aux5jnt: parent_body=cerv5 location_in_parent=(0.00823611 0.00727865 0) location=(0 0 0)
        Coordinate aux5jnt_r3: motion_type=rotational default_value=0 range=(-99999.9 99999.9) clamped=false
        Coordinate aux5jnt_r1: motion_type=rotational default_value=0 range=(-99999.9 99999.9) clamped=false
        Coordinate aux5jnt_r2: motion_type=rotational default_value=0 range=(-99999.9 99999.9) clamped=false
        SpatialTransform: axes_held_at_zero=(translation1 translation2 translation3)
          TransformAxis rotation1: coordinates=aux5jnt_r3 axis=(0 0 1) LinearFunction(coefficients=1 0)
          TransformAxis rotation2: coordinates=aux5jnt_r1 axis=(1 0 0) LinearFunction(coefficients=1 0)
          TransformAxis rotation3: coordinates=aux5jnt_r2 axis=(0 1 0) LinearFunction(coefficients=1 0)
    Body cerv4: mass=0.2310335 mass_center=(-0.0077183 0 0) inertia_xx=0.000231033 inertia_yy=0.000441977
        inertia_zz=0.000231033 meshes=cerv4.vtp
      WeldJoint cerv4jnt: parent_body=aux5 location_in_parent=(-0.00490454 0.01145044 0) location=(0 0 0)
    Body aux4: mass=0 mass_center=(0 0 0) inertia_xx=0 inertia_yy=0 inertia_zz=0
      CustomJoint aux4jnt: parent_body=cerv4 location_in_parent=(0.00715164 0.00623326 0) location=(0 0 0)
        Coordinate aux4jnt_r3: motion_type=rotational default_value=0 range=(-99999.9 99999.9) clamped=false
        Coordinate aux4jnt_r1: motion_type=rotational default_value=0 range=(-99999.9 99999.9) clamped=false
        Coordinate aux4jnt_r2: motion_type=rotational default_value=0 range=(-99999.9 99999.9) clamped=false
        SpatialTransform: axes_held_at_zero=(translation1 translation2 translation3)
          TransformAxis rotation1: coordinates=aux4jnt_r3 axis=(0 0 1) LinearFunction(coefficients=1 0)
          TransformAxis rotation2: coordinates=aux4jnt_r1 axis=(1 0 0) LinearFunction(coefficients=1 0)
          TransformAxis rotation3: coordinates=aux4jnt_r2 axis=(0 1 0) LinearFunction(coefficients=1 0)
    Body cerv3: mass=0.2410784 mass_center=(-0.0076206 0 0) inertia_xx=0.000241078 inertia_yy=0.000462067
        inertia_zz=0.000241078 meshes=cerv3.vtp
      WeldJoint cerv3jnt: parent_body=aux4 location_in_parent=(-0.00460167 0.00881254 0) location=(0 0 0)
    Body aux3: mass=0 mass_center=(0 0 0) inertia_xx=0 inertia_yy=0 inertia_zz=0
      CustomJoint aux3jnt: parent_body=cerv3 location_in_parent=(0.00512925 0.00494362 0) location=(0 0 0)
        Coordinate aux3jnt_r3: motion_type=rotational default_value=0 range=(-99999.9 99999.9) clamped=false
        Coordinate aux3jnt_r1: motion_type=rotational default_value=0 range=(-99999.9 99999.9) clamped=false
        Coordinate aux3jnt_r2: motion_type=rotational default_value=0 range=(-99999.9 99999.9) clamped=false
        SpatialTransform: axes_held_at_zero=(translation1 translation2 translation3)
          TransformAxis rotation1: coordinates=aux3jnt_r3 axis=(0 0 1) LinearFunction(coefficients=1 0)
          TransformAxis rotation2: coordinates=aux3jnt_r1 axis=(1 0 0) LinearFunction(coefficients=1 0)
          TransformAxis rotation3: coordinates=aux3jnt_r2 axis=(0 1 0) LinearFunction(coefficients=1 0)
    Body cerv2: mass=0.2511233 mass_center=(-0.0075229 0 0) inertia_xx=0.000251123 inertia_yy=0.000482157
        inertia_zz=0.000251123 meshes=cerv2.vtp
      WeldJoint cerv2jnt: parent_body=aux3 location_in_parent=(-0.00530511 0.01097171 0) location=(0 0 0)
    Body aux2: mass=0 mass_center=(0 0 0) inertia_xx=0 inertia_yy=0 inertia_zz=0
      CustomJoint aux2jnt: parent_body=cerv2 location_in_parent=(0.00673153 0.02079056 0) location=(0 0 0)
        Coordinate pitch1: motion_type=rotational default_value=0 range=(-0.2792527 0.418879) clamped=true
        Coordinate roll1: motion_type=rotational default_value=0 range=(-0.1047198 0.1047198) clamped=true
        Coordinate yaw1: motion_type=rotational default_value=0 range=(-0.6632251 0.6632251) clamped=true
        SpatialTransform: axes_held_at_zero=(translation1 translation2 translation3)
          TransformAxis rotation1: coordinates=pitch1 axis=(0 0 1)
            SimmSpline: x=(-1.74533 1.74533) y=(-0.774926 0.774926)
          TransformAxis rotation2: coordinates=roll1 axis=(1 0 0)
            SimmSpline: x=(-1.74533 1.74533) y=(-0.872665 0.872665)
          TransformAxis rotation3: coordinates=yaw1 axis=(0 1 0)
            SimmSpline: x=(-1.74533 1.74533) y=(-1.5516 1.5516)
    Body cerv1: mass=0.2209885 mass_center=(-0.0075229 0 0) inertia_xx=0.000220989 inertia_yy=0.000421887
        inertia_zz=0.000220989 meshes=cerv1.vtp
      WeldJoint cerv1jnt: parent_body=aux2 location_in_parent=(-0.04147365 -0.00343904 0) location=(0 0 0)
    Body aux1: mass=0 mass_center=(0 0 0) inertia_xx=0 inertia_yy=0 inertia_zz=0
      CustomJoint aux1jnt: parent_body=cerv1 location_in_parent=(0.04235295 0.01457684 0) location=(0 0 0)
        Coordinate aux1jnt_r3: motion_type=rotational default_value=0 range=(-99999.9 99999.9) clamped=false
        Coordinate aux1jnt_r1: motion_type=rotational default_value=0 range=(-99999.9 99999.9) clamped=false
        Coordinate aux1jnt_r2: motion_type=rotational default_value=0 range=(-99999.9 99999.9) clamped=false
        SpatialTransform: axes_held_at_zero=(translation1 translation2 translation3)
          TransformAxis rotation1: coordinates=aux1jnt_r3 axis=(0 0 1) LinearFunction(coefficients=1 0)
          TransformAxis rotation2: coordinates=aux1jnt_r1 axis=(1 0 0) LinearFunction(coefficients=1 0)
          TransformAxis rotation3: coordinates=aux1jnt_r2 axis=(0 1 0) LinearFunction(coefficients=1 0)
    Body skull: mass=4.467484 mass_center=(0.0259322 0.0412994 0) inertia_xx=0.8041471 inertia_yy=0.987314
        inertia_zz=1.072196 meshes=skull.vtp
      WeldJoint skulljnt: parent_body=aux1 location_in_parent=(0 0 0) location=(0 0 0)
    Body jaw: mass=0 mass_center=(0 0 0) inertia_xx=0 inertia_yy=0 inertia_zz=0 meshes=jaw.vtp
      WeldJoint jawjnt: parent_body=skull location_in_parent=(0 0 0) location=(0 0 0)
  ConstraintSet:
    CoordinateCouplerConstraint patellofemoral_knee_angle_r_con: independent_coordinate_names=knee_angle_r
        dependent_coordinate_name=knee_angle_r_beta scale_factor=1
        coupled_coordinates_function=LinearFunction(coefficients=1 0)
    CoordinateCouplerConstraint patellofemoral_knee_angle_l_con: independent_coordinate_names=knee_angle_l
        dependent_coordinate_name=knee_angle_l_beta scale_factor=1
        coupled_coordinates_function=LinearFunction(coefficients=1 0)
    CoordinateCouplerConstraint L4_L5_FE_con: independent_coordinate_names=flex_extension
        dependent_coordinate_name=L4_L5_FE scale_factor=1
        coupled_coordinates_function=LinearFunction(coefficients=0.144 0)
    CoordinateCouplerConstraint L4_L5_AR_con: independent_coordinate_names=axial_rotation
        dependent_coordinate_name=L4_L5_AR scale_factor=1
        coupled_coordinates_function=LinearFunction(coefficients=0.0422222 0)
    CoordinateCouplerConstraint L4_L5_LB_con: independent_coordinate_names=lat_bending
        dependent_coordinate_name=L4_L5_LB scale_factor=1
        coupled_coordinates_function=LinearFunction(coefficients=0.181086 0)
    CoordinateCouplerConstraint L3_L4_FE_con: independent_coordinate_names=flex_extension
        dependent_coordinate_name=L3_L4_FE scale_factor=1
        coupled_coordinates_function=LinearFunction(coefficients=0.204745 0)
    CoordinateCouplerConstraint L3_L4_AR_con: independent_coordinate_names=axial_rotation
        dependent_coordinate_name=L3_L4_AR scale_factor=1
        coupled_coordinates_function=LinearFunction(coefficients=0.0422239 0)
    CoordinateCouplerConstraint L3_L4_LB_con: independent_coordinate_names=lat_bending
        dependent_coordinate_name=L3_L4_LB scale_factor=1
        coupled_coordinates_function=LinearFunction(coefficients=0.245332 0)
    CoordinateCouplerConstraint L2_L3_FE_con: independent_coordinate_names=flex_extension
        dependent_coordinate_name=L2_L3_FE scale_factor=1
        coupled_coordinates_function=LinearFunction(coefficients=0.246618 0)
    CoordinateCouplerConstraint L2_L3_AR_con: independent_coordinate_names=axial_rotation
        dependent_coordinate_name=L2_L3_AR scale_factor=1
        coupled_coordinates_function=LinearFunction(coefficients=0.0333333 0)
    CoordinateCouplerConstraint L2_L3_LB_con: independent_coordinate_names=lat_bending
        dependent_coordinate_name=L2_L3_LB scale_factor=1
        coupled_coordinates_function=LinearFunction(coefficients=0.250128 0)
    CoordinateCouplerConstraint L1_L2_FE_con: independent_coordinate_names=flex_extension
        dependent_coordinate_name=L1_L2_FE scale_factor=1
        coupled_coordinates_function=LinearFunction(coefficients=0.294182 0)
    CoordinateCouplerConstraint L1_L2_AR_con: independent_coordinate_names=axial_rotation
        dependent_coordinate_name=L1_L2_AR scale_factor=1
        coupled_coordinates_function=LinearFunction(coefficients=0.0288889 0)
    CoordinateCouplerConstraint L1_L2_LB_con: independent_coordinate_names=lat_bending
        dependent_coordinate_name=L1_L2_LB scale_factor=1
        coupled_coordinates_function=LinearFunction(coefficients=0.188 0)
    CoordinateCouplerConstraint sternoclavicular_r2_con: independent_coordinate_names=shoulder_elv
        dependent_coordinate_name=sternoclavicular_r2 scale_factor=1
      coupled_coordinates_function: SimmSpline: x=(0 2.61799) y=(0 -0.633555)
    CoordinateCouplerConstraint sternoclavicular_r3_con: independent_coordinate_names=shoulder_elv
        dependent_coordinate_name=sternoclavicular_r3 scale_factor=1
      coupled_coordinates_function: SimmSpline: x=(0 3.14159) y=(0 0.322013)
    CoordinateCouplerConstraint unrotscap_r2_con: independent_coordinate_names=shoulder_elv
        dependent_coordinate_name=unrotscap_r2 scale_factor=1
      coupled_coordinates_function: SimmSpline: x=(0 2.61799) y=(0 0.633555)
    CoordinateCouplerConstraint unrotscap_r3_con: independent_coordinate_names=shoulder_elv
        dependent_coordinate_name=unrotscap_r3 scale_factor=1
      coupled_coordinates_function: SimmSpline: x=(0 3.14159) y=(0 -0.322013)
    CoordinateCouplerConstraint acromioclavicular_r1_con: independent_coordinate_names=shoulder_elv
        dependent_coordinate_name=acromioclavicular_r1 scale_factor=1
      coupled_coordinates_function: SimmSpline: x=(0 2.61799) y=(0 0.466003)
    CoordinateCouplerConstraint acromioclavicular_r2_con: independent_coordinate_names=shoulder_elv
        dependent_coordinate_name=acromioclavicular_r2 scale_factor=1
      coupled_coordinates_function: SimmSpline: x=(0 2.61799) y=(0 -0.128282)
    CoordinateCouplerConstraint acromioclavicular_r3_con: independent_coordinate_names=shoulder_elv
        dependent_coordinate_name=acromioclavicular_r3 scale_factor=1
      coupled_coordinates_function: SimmSpline: x=(0 2.61799) y=(0 1.03673)
    CoordinateCouplerConstraint unrothum_r1_con: independent_coordinate_names=shoulder_elv
        dependent_coordinate_name=unrothum_r1 scale_factor=1
      coupled_coordinates_function: SimmSpline: x=(0 2.61799) y=(0 -0.466003)
    CoordinateCouplerConstraint unrothum_r2_con: independent_coordinate_names=shoulder_elv
        dependent_coordinate_name=unrothum_r2 scale_factor=1
      coupled_coordinates_function: SimmSpline: x=(0 2.61799) y=(0 0.128282)
    CoordinateCouplerConstraint unrothum_r3_con: independent_coordinate_names=shoulder_elv
        dependent_coordinate_name=unrothum_r3 scale_factor=1
      coupled_coordinates_function: SimmSpline: x=(0 2.61799) y=(0 -1.03673)
    CoordinateCouplerConstraint shoulder1_r2_con: independent_coordinate_names=elv_angle
        dependent_coordinate_name=shoulder1_r2 scale_factor=1
      coupled_coordinates_function: SimmSpline: x=(-1.5708 3.14159) y=(1.5708 -3.14159)
    CoordinateCouplerConstraint con_DELT2tx_con: independent_coordinate_names=shoulder_elv
        dependent_coordinate_name=con_DELT2tx scale_factor=1
      coupled_coordinates_function: SimmSpline: x=(0 3.14159) y=(0 -0.0169)
    CoordinateCouplerConstraint con_DELT2ty_con: independent_coordinate_names=shoulder_elv
        dependent_coordinate_name=con_DELT2ty scale_factor=1
      coupled_coordinates_function: SimmSpline: x=(0 3.14159) y=(0 -0.0781)
    CoordinateCouplerConstraint con_DELT2tz_con: independent_coordinate_names=shoulder_elv
        dependent_coordinate_name=con_DELT2tz scale_factor=1
      coupled_coordinates_function: SimmSpline: x=(0 1.22229 3.14159) y=(0 -0.005395 -0.0363)
    CoordinateCouplerConstraint con_BICtx_con: independent_coordinate_names=elbow_flexion
        dependent_coordinate_name=con_BICtx scale_factor=1
      coupled_coordinates_function: SimmSpline: x=(0 3.14159) y=(0 -0.0169)
    CoordinateCouplerConstraint con_BICty_con: independent_coordinate_names=elbow_flexion
        dependent_coordinate_name=con_BICty scale_factor=1
      coupled_coordinates_function: SimmSpline: x=(0 3.14159) y=(0 -0.0781)
    CoordinateCouplerConstraint con_BICtz_con: independent_coordinate_names=elbow_flexion
        dependent_coordinate_name=con_BICtz scale_factor=1
      coupled_coordinates_function: SimmSpline: x=(0 1.22229 3.14159) y=(0 -0.005395 -0.0363)
    CoordinateCouplerConstraint wrist_hand_r1_con: independent_coordinate_names=deviation
        dependent_coordinate_name=wrist_hand_r1 scale_factor=1
      coupled_coordinates_function: SimmSpline f18: x=(-0.174533 0 0.436332) y=(-0.261799 0 0.436332)
    CoordinateCouplerConstraint wrist_hand_r3_con: independent_coordinate_names=flexion
        dependent_coordinate_name=wrist_hand_r3 scale_factor=1
      coupled_coordinates_function: SimmSpline f19: x=(-1.22173 1.22173) y=(-0.610865 0.610865)
    CoordinateCouplerConstraint sternoclavicular_r2_con_l: independent_coordinate_names=shoulder_elv_l
        dependent_coordinate_name=sternoclavicular_r2_l scale_factor=1
      coupled_coordinates_function: SimmSpline: x=(0 2.61799) y=(0 -0.633555)
    CoordinateCouplerConstraint sternoclavicular_r3_con_l: independent_coordinate_names=shoulder_elv_l
        dependent_coordinate_name=sternoclavicular_r3_l scale_factor=1
      coupled_coordinates_function: SimmSpline: x=(0 3.14159) y=(0 0.322013)
    CoordinateCouplerConstraint unrotscap_r2_con_l: independent_coordinate_names=shoulder_elv_l
        dependent_coordinate_name=unrotscap_r2_l scale_factor=1
      coupled_coordinates_function: SimmSpline: x=(0 2.61799) y=(0 0.633555)
    CoordinateCouplerConstraint unrotscap_r3_con_l: independent_coordinate_names=shoulder_elv_l
        dependent_coordinate_name=unrotscap_r3_l scale_factor=1
      coupled_coordinates_function: SimmSpline: x=(0 3.14159) y=(0 -0.322013)
    CoordinateCouplerConstraint acromioclavicular_r1_con_l: independent_coordinate_names=shoulder_elv_l
        dependent_coordinate_name=acromioclavicular_r1_l scale_factor=1
      coupled_coordinates_function: SimmSpline: x=(0 2.61799) y=(0 0.466003)
    CoordinateCouplerConstraint acromioclavicular_r2_con_l: independent_coordinate_names=shoulder_elv_l
        dependent_coordinate_name=acromioclavicular_r2_l scale_factor=1
      coupled_coordinates_function: SimmSpline: x=(0 2.61799) y=(0 -0.128282)
    CoordinateCouplerConstraint acromioclavicular_r3_con_l: independent_coordinate_names=shoulder_elv_l
        dependent_coordinate_name=acromioclavicular_r3_l scale_factor=1
      coupled_coordinates_function: SimmSpline: x=(0 2.61799) y=(0 1.03673)
    CoordinateCouplerConstraint unrothum_r1_con_l: independent_coordinate_names=shoulder_elv_l
        dependent_coordinate_name=unrothum_r1_l scale_factor=1
      coupled_coordinates_function: SimmSpline: x=(0 2.61799) y=(0 -0.466003)
    CoordinateCouplerConstraint unrothum_r2_con_l: independent_coordinate_names=shoulder_elv_l
        dependent_coordinate_name=unrothum_r2_l scale_factor=1
      coupled_coordinates_function: SimmSpline: x=(0 2.61799) y=(0 0.128282)
    CoordinateCouplerConstraint unrothum_r3_con_l: independent_coordinate_names=shoulder_elv_l
        dependent_coordinate_name=unrothum_r3_l scale_factor=1
      coupled_coordinates_function: SimmSpline: x=(0 2.61799) y=(0 -1.03673)
    CoordinateCouplerConstraint shoulder1_r2_con_l: independent_coordinate_names=elv_angle_l
        dependent_coordinate_name=shoulder1_r2_l scale_factor=1
      coupled_coordinates_function: SimmSpline: x=(-1.5708 3.14159) y=(1.5708 -3.14159)
    CoordinateCouplerConstraint con_DELT2tx_con_l: independent_coordinate_names=shoulder_elv_l
        dependent_coordinate_name=con_DELT2tx_l scale_factor=1
      coupled_coordinates_function: SimmSpline: x=(0 3.14159) y=(0 -0.0169)
    CoordinateCouplerConstraint con_DELT2ty_con_l: independent_coordinate_names=shoulder_elv_l
        dependent_coordinate_name=con_DELT2ty_l scale_factor=1
      coupled_coordinates_function: SimmSpline: x=(0 3.14159) y=(0 -0.0781)
    CoordinateCouplerConstraint con_DELT2tz_con_l: independent_coordinate_names=shoulder_elv_l
        dependent_coordinate_name=con_DELT2tz_l scale_factor=1
      coupled_coordinates_function: SimmSpline: x=(0 1.22229 3.14159) y=(0 -0.005395 -0.0363)
    CoordinateCouplerConstraint con_BICtx_con_l: independent_coordinate_names=elbow_flexion_l
        dependent_coordinate_name=con_BICtx_l scale_factor=1
      coupled_coordinates_function: SimmSpline: x=(0 3.14159) y=(0 -0.0169)
    CoordinateCouplerConstraint con_BICty_con_l: independent_coordinate_names=elbow_flexion_l
        dependent_coordinate_name=con_BICty_l scale_factor=1
      coupled_coordinates_function: SimmSpline: x=(0 3.14159) y=(0 -0.0781)
    CoordinateCouplerConstraint con_BICtz_con_l: independent_coordinate_names=elbow_flexion_l
        dependent_coordinate_name=con_BICtz_l scale_factor=1
      coupled_coordinates_function: SimmSpline: x=(0 1.22229 3.14159) y=(0 -0.005395 -0.0363)
    CoordinateCouplerConstraint wrist_hand_r1_con_l: independent_coordinate_names=deviation_l
        dependent_coordinate_name=wrist_hand_r1_l scale_factor=1
      coupled_coordinates_function: SimmSpline f18: x=(-0.174533 0 0.436332) y=(-0.261799 0 0.436332)
    CoordinateCouplerConstraint wrist_hand_r3_con_l: independent_coordinate_names=flexion_l
        dependent_coordinate_name=wrist_hand_r3_l scale_factor=1
      coupled_coordinates_function: SimmSpline f19: x=(-1.22173 1.22173) y=(-0.610865 0.610865)
    CoordinateCouplerConstraint aux7jnt_r1_con: independent_coordinate_names=roll2 dependent_coordinate_name=aux7jnt_r1
      coupled_coordinates_function: SimmSpline: x=(-1.74533 1.74533) y=(-0.23911 0.23911)
    CoordinateCouplerConstraint aux7jnt_r2_con: independent_coordinate_names=yaw2 dependent_coordinate_name=aux7jnt_r2
      coupled_coordinates_function: SimmSpline: x=(-1.74533 1.74533) y=(-0.328122 0.328122)
    CoordinateCouplerConstraint aux7jnt_r3_con: independent_coordinate_names=pitch2
        dependent_coordinate_name=aux7jnt_r3
      coupled_coordinates_function: SimmSpline: x=(-1.74533 1.74533) y=(-0.326377 0.326377)
    CoordinateCouplerConstraint aux6jnt_r1_con: independent_coordinate_names=roll2 dependent_coordinate_name=aux6jnt_r1
      coupled_coordinates_function: SimmSpline: x=(-1.74533 1.74533) y=(-0.274017 0.274017)
    CoordinateCouplerConstraint aux6jnt_r2_con: independent_coordinate_names=yaw2 dependent_coordinate_name=aux6jnt_r2
      coupled_coordinates_function: SimmSpline: x=(-1.74533 1.74533) y=(-0.382227 0.382227)
    CoordinateCouplerConstraint aux6jnt_r3_con: independent_coordinate_names=pitch2
        dependent_coordinate_name=aux6jnt_r3
      coupled_coordinates_function: SimmSpline: x=(-1.74533 1.74533) y=(-0.383972 0.383972)
    CoordinateCouplerConstraint aux5jnt_r1_con: independent_coordinate_names=roll2 dependent_coordinate_name=aux5jnt_r1
      coupled_coordinates_function: SimmSpline: x=(-1.74533 1.74533) y=(-0.376991 0.376991)
    CoordinateCouplerConstraint aux5jnt_r2_con: independent_coordinate_names=yaw2 dependent_coordinate_name=aux5jnt_r2
      coupled_coordinates_function: SimmSpline: x=(-1.74533 1.74533) y=(-0.382227 0.382227)
    CoordinateCouplerConstraint aux5jnt_r3_con: independent_coordinate_names=pitch2
        dependent_coordinate_name=aux5jnt_r3
      coupled_coordinates_function: SimmSpline: x=(-1.74533 1.74533) y=(-0.383972 0.383972)
    CoordinateCouplerConstraint aux4jnt_r1_con: independent_coordinate_names=roll2 dependent_coordinate_name=aux4jnt_r1
      coupled_coordinates_function: SimmSpline: x=(-1.74533 1.74533) y=(-0.376991 0.376991)
    CoordinateCouplerConstraint aux4jnt_r2_con: independent_coordinate_names=yaw2 dependent_coordinate_name=aux4jnt_r2
      coupled_coordinates_function: SimmSpline: x=(-1.74533 1.74533) y=(-0.382227 0.382227)
    CoordinateCouplerConstraint aux4jnt_r3_con: independent_coordinate_names=pitch2
        dependent_coordinate_name=aux4jnt_r3
      coupled_coordinates_function: SimmSpline: x=(-1.74533 1.74533) y=(-0.287979 0.287979)
    CoordinateCouplerConstraint aux3jnt_r1_con: independent_coordinate_names=roll2 dependent_coordinate_name=aux3jnt_r1
      coupled_coordinates_function: SimmSpline: x=(-1.74533 1.74533) y=(-0.342085 0.342085)
    CoordinateCouplerConstraint aux3jnt_r2_con: independent_coordinate_names=yaw2 dependent_coordinate_name=aux3jnt_r2
      coupled_coordinates_function: SimmSpline: x=(-1.74533 1.74533) y=(-0.164061 0.164061)
    CoordinateCouplerConstraint aux3jnt_r3_con: independent_coordinate_names=pitch2
        dependent_coordinate_name=aux3jnt_r3
      coupled_coordinates_function: SimmSpline: x=(-1.74533 1.74533) y=(-0.191986 0.191986)
    CoordinateCouplerConstraint aux1jnt_r1_con: independent_coordinate_names=roll1 dependent_coordinate_name=aux1jnt_r1
      coupled_coordinates_function: SimmSpline: x=(-1.74533 1.74533) y=(-0.872665 0.872665)
    CoordinateCouplerConstraint aux1jnt_r2_con: independent_coordinate_names=yaw1 dependent_coordinate_name=aux1jnt_r2
      coupled_coordinates_function: SimmSpline: x=(-1.74533 1.74533) y=(-0.193732 0.193732)
    CoordinateCouplerConstraint aux1jnt_r3_con: independent_coordinate_names=pitch1
        dependent_coordinate_name=aux1jnt_r3
      coupled_coordinates_function: SimmSpline: x=(-1.74533 1.74533) y=(-0.970403 0.970403)
  ForceSet:
    Thelen2003Muscle addbrev_r: max_isometric_force=303.7 optimal_fiber_length=0.1031 tendon_slack_length=0.036
        pennation_angle_at_optimal=0.1064651 max_contraction_velocity=10
      PathPoint P1: pelvis (-0.0191 -0.094 0.0154)
      PathPoint P2: femur_r (-0.002 -0.118 0.0249)
      PathWrap: wrap_object=AB_at_femshaft_r method=hybrid
    Thelen2003Muscle addlong_r: max_isometric_force=399.5 optimal_fiber_length=0.1082 tendon_slack_length=0.13
        pennation_angle_at_optimal=0.1239184 max_contraction_velocity=10
      PathPoint P1: pelvis (-0.00758 -0.0889 0.01888)
      PathPoint P2: femur_r (0.01126 -0.23937 0.01583)
      PathWrap: wrap_object=AL_at_femshaft_r method=hybrid
    Thelen2003Muscle addmagDist_r: max_isometric_force=324.2 optimal_fiber_length=0.1772 tendon_slack_length=0.09
        pennation_angle_at_optimal=0.2408554 max_contraction_velocity=10
      PathPoint P1: pelvis (-0.07404 -0.12767 0.03982)
      PathPoint P2: femur_r (0.01125 -0.2625 0.0193)
      PathWrap: wrap_object=AMdist_at_femshaft_r method=hybrid
    Thelen2003Muscle addmagIsch_r: max_isometric_force=324.2 optimal_fiber_length=0.1562 tendon_slack_length=0.221
        pennation_angle_at_optimal=0.2076942 max_contraction_velocity=10
      PathPoint P1: pelvis (-0.08962 -0.12976 0.04171)
      PathPoint P2: femur_r (0.00481 -0.38797 -0.03273)
      PathWrap: wrap_object=AMisch_at_condyles_r method=hybrid
    Thelen2003Muscle addmagMid_r: max_isometric_force=324.2 optimal_fiber_length=0.1377 tendon_slack_length=0.048
        pennation_angle_at_optimal=0.2565634 max_contraction_velocity=10
      PathPoint P1: pelvis (-0.05266 -0.12075 0.02854)
      PathPoint P2: femur_r (0.00242 -0.1624 0.02922)
      PathWrap: wrap_object=AMmid_at_femshaft_r method=hybrid
    Thelen2003Muscle addmagProx_r: max_isometric_force=324.2 optimal_fiber_length=0.1056 tendon_slack_length=0.043
        pennation_angle_at_optimal=0.3874631 max_contraction_velocity=10
      PathPoint P1: pelvis (-0.03098 -0.10755 0.01365)
      PathPoint P2: femur_r (-0.01527 -0.07886 0.03202)
      PathWrap: wrap_object=AMprox_at_femshaft_r method=hybrid
    Thelen2003Muscle bflh_r: max_isometric_force=705.2 optimal_fiber_length=0.0976 tendon_slack_length=0.322
        pennation_angle_at_optimal=0.2024582 max_contraction_velocity=10
      PathPoint P1: pelvis (-0.104 -0.1191 0.0586)
      PathPoint P2: tibia_r (-0.0337 -0.035 0.0253)
      PathPoint P3: tibia_r (-0.0287 -0.0455 0.0303)
    Thelen2003Muscle bfsh_r: max_isometric_force=315.8 optimal_fiber_length=0.1103 tendon_slack_length=0.104
        pennation_angle_at_optimal=0.2146755 max_contraction_velocity=10
      PathPoint P1: femur_r (0.005 -0.2111 0.0234)
      PathPoint P2: tibia_r (-0.0301 -0.0419 0.0318)
      PathWrap: wrap_object=BFLH_at_gastroc_r method=hybrid
    Thelen2003Muscle edl_r: max_isometric_force=345.4 optimal_fiber_length=0.0693 tendon_slack_length=0.3673
        pennation_angle_at_optimal=0.1884956 max_contraction_velocity=10
      PathPoint P1: tibia_r (-0.016 -0.1157 0.0205)
      PathPoint P2: tibia_r (0.0164 -0.376 0.0112)
      PathPoint P3: calcn_r (0.0919 0.036 0.0008)
      PathPoint P4: calcn_r (0.1616 0.0055 0.013)
      PathPoint P5: toes_r (0.0003 0.0047 0.0153)
      PathPoint P6: toes_r (0.0443 -0.0004 0.025)
    Thelen2003Muscle ehl_r: max_isometric_force=165 optimal_fiber_length=0.0748 tendon_slack_length=0.3315
        pennation_angle_at_optimal=0.164061 max_contraction_velocity=10
      PathPoint P1: tibia_r (-0.014 -0.155 0.0189)
      PathPoint P2: tibia_r (0.0071 -0.2909 0.0164)
      PathPoint P3: tibia_r (0.02 -0.3693 -0.0028)
      PathPoint P4: calcn_r (0.097 0.0389 -0.0211)
      PathPoint P5: calcn_r (0.1293 0.0309 -0.0257)
      PathPoint P6: calcn_r (0.1734 0.0139 -0.028)
      PathPoint P7: toes_r (0.0298 0.0041 -0.0245)
      PathPoint P8: toes_r (0.0563 0.0034 -0.0186)
    Thelen2003Muscle fdl_r: max_isometric_force=274.4 optimal_fiber_length=0.0446 tendon_slack_length=0.3777
        pennation_angle_at_optimal=0.2373648 max_contraction_velocity=10
      PathPoint P1: tibia_r (-0.0023 -0.1832 -0.0018)
      PathPoint P2: tibia_r (-0.0176 -0.3645 -0.0124)
      PathPoint P3: calcn_r (0.0436 0.0315 -0.028)
      PathPoint P4: calcn_r (0.0708 0.0176 -0.0263)
      PathPoint P5: calcn_r (0.1658 -0.0081 0.0116)
      PathPoint P6: toes_r (-0.0019 -0.0078 0.0147)
      PathPoint P7: toes_r (0.0285 -0.0071 0.0215)
      PathPoint P8: toes_r (0.0441 -0.006 0.0242)
    Thelen2003Muscle fhl_r: max_isometric_force=436.8 optimal_fiber_length=0.0527 tendon_slack_length=0.356
        pennation_angle_at_optimal=0.2949606 max_contraction_velocity=10
      PathPoint P1: tibia_r (-0.031 -0.2163 0.02)
      PathPoint P2: tibia_r (-0.0242 -0.3671 -0.0076)
      PathPoint P3: calcn_r (0.0374 0.0276 -0.0241)
      PathPoint P4: calcn_r (0.1038 0.0068 -0.0256)
      PathPoint P5: calcn_r (0.1726 -0.0053 -0.0269)
      PathPoint P6: toes_r (0.0155 -0.0064 -0.0265)
      PathPoint P7: toes_r (0.0562 -0.0102 -0.0181)
    Thelen2003Muscle gaslat_r: max_isometric_force=606.4 optimal_fiber_length=0.0588 tendon_slack_length=0.382
        pennation_angle_at_optimal=0.2094395 max_contraction_velocity=10
      PathPoint P1: femur_r (-0.003 -0.3814 0.0277)
      PathPoint P2: calcn_r (0.0044 0.031 -0.0053)
      PathWrap: wrap_object=GasLat_at_shank_r method=hybrid
      PathWrap: wrap_object=Gastroc_at_condyles_r method=hybrid
    Thelen2003Muscle gasmed_r: max_isometric_force=1308 optimal_fiber_length=0.051 tendon_slack_length=0.4008
        pennation_angle_at_optimal=0.1727876 max_contraction_velocity=10
      PathPoint P1: femur_r (0.008 -0.3788 -0.0208)
      PathPoint P2: calcn_r (0.0044 0.031 -0.0053)
      PathWrap: wrap_object=GasMed_at_shank_r method=hybrid
      PathWrap: wrap_object=Gastroc_at_condyles_r method=hybrid
    Thelen2003Muscle gem_r: max_isometric_force=109 optimal_fiber_length=0.024 tendon_slack_length=0.039
        pennation_angle_at_optimal=0 max_contraction_velocity=10
      PathPoint P1: pelvis (-0.10357 -0.0764 0.06707)
      PathPoint P2: femur_r (-0.0142 -0.0033 0.0443)
    Thelen2003Muscle glmax1_r: max_isometric_force=546.1 optimal_fiber_length=0.1473 tendon_slack_length=0.05
        pennation_angle_at_optimal=0.3822271 max_contraction_velocity=10
      PathPoint P1: pelvis (-0.1231 0.0345 0.0563)
      PathPoint P2: pelvis (-0.1257 -0.0242 0.0779)
      PathPoint P3: femur_r (-0.0444 -0.0326 0.0302)
      PathPoint P4: femur_r (-0.0277 -0.0566 0.047)
      PathWrap: wrap_object=Gmax_at_pelvis_r method=hybrid
    Thelen2003Muscle glmax2_r: max_isometric_force=780.5 optimal_fiber_length=0.1569 tendon_slack_length=0.0733
        pennation_angle_at_optimal=0.3822271 max_contraction_velocity=10
      PathPoint P1: pelvis (-0.1317 0.0087 0.0462)
      PathPoint P2: pelvis (-0.1344 -0.0609 0.0813)
      PathPoint P3: femur_r (-0.045 -0.0584 0.0252)
      PathPoint P4: femur_r (-0.0156 -0.1016 0.0419)
      PathWrap: wrap_object=Gmax_at_pelvis_r method=hybrid
    Thelen2003Muscle glmax3_r: max_isometric_force=526.1 optimal_fiber_length=0.1665 tendon_slack_length=0.0702
        pennation_angle_at_optimal=0.3822271 max_contraction_velocity=10
      PathPoint P1: pelvis (-0.13 -0.0525 0.009)
      PathPoint P2: pelvis (-0.1273 -0.1263 0.0435)
      PathPoint P3: femur_r (-0.0281 -0.1125 0.0094)
      PathPoint P4: femur_r (-0.006 -0.1419 0.0411)
      PathWrap: wrap_object=Gmax_at_pelvis_r method=hybrid
    Thelen2003Muscle glmed1_r: max_isometric_force=881.1 optimal_fiber_length=0.0733 tendon_slack_length=0.0565
        pennation_angle_at_optimal=0.3577925 max_contraction_velocity=10
      PathPoint P1: pelvis (-0.0445 0.0245 0.1172)
      PathPoint P2: femur_r (-0.0218 -0.0117 0.0555)
    Thelen2003Muscle glmed2_r: max_isometric_force=616.5 optimal_fiber_length=0.0733 tendon_slack_length=0.066
        pennation_angle_at_optimal=0.3577925 max_contraction_velocity=10
      PathPoint P1: pelvis (-0.085 0.0316 0.0675)
      PathPoint P2: femur_r (-0.0258 -0.0058 0.0527)
    Thelen2003Muscle glmed3_r: max_isometric_force=702 optimal_fiber_length=0.0733 tendon_slack_length=0.046
        pennation_angle_at_optimal=0.3577925 max_contraction_velocity=10
      PathPoint P1: pelvis (-0.1152 -0.0073 0.0526)
      PathPoint P2: femur_r (-0.0309 -0.0047 0.0518)
    Thelen2003Muscle glmin1_r: max_isometric_force=180 optimal_fiber_length=0.068 tendon_slack_length=0.016
        pennation_angle_at_optimal=0.1745329 max_contraction_velocity=10
      PathPoint P1: pelvis (-0.0464 -0.0149 0.1042)
      PathPoint P2: femur_r (-0.0072 -0.0104 0.056)
    Thelen2003Muscle glmin2_r: max_isometric_force=190 optimal_fiber_length=0.056 tendon_slack_length=0.026
        pennation_angle_at_optimal=0 max_contraction_velocity=10
      PathPoint P1: pelvis (-0.0616 -0.0142 0.0971)
      PathPoint P2: femur_r (-0.0096 -0.0104 0.056)
    Thelen2003Muscle glmin3_r: max_isometric_force=215 optimal_fiber_length=0.038 tendon_slack_length=0.051
        pennation_angle_at_optimal=0.01745329 max_contraction_velocity=10
      PathPoint P1: pelvis (-0.0789 -0.0155 0.0798)
      PathPoint P2: femur_r (-0.0135 -0.0083 0.055)
    Thelen2003Muscle grac_r: max_isometric_force=137.3 optimal_fiber_length=0.2278 tendon_slack_length=0.166
        pennation_angle_at_optimal=0.143117 max_contraction_velocity=10
      PathPoint P1: pelvis (-0.04736 -0.12932 0.02456)
      PathPoint P2: tibia_r (-0.01842 -0.04755 -0.02961)
      PathPoint P3: tibia_r (0.00178 -0.06962 -0.01573)
      PathWrap: wrap_object=GR_at_condyles_r method=hybrid
    Thelen2003Muscle iliacus_r: max_isometric_force=621.9 optimal_fiber_length=0.1066 tendon_slack_length=0.094
        pennation_angle_at_optimal=0.2495821 max_contraction_velocity=10
      PathPoint P1: pelvis (-0.0605 0.0309 0.0843)
      PathPoint P2: pelvis (-0.0135 -0.0557 0.0756)
      PathPoint P3: femur_r (-0.0023 -0.0565 0.0139)
      PathPoint P4: femur_r (-0.0122 -0.0637 0.0196)
      PathWrap: wrap_object=IL_at_brim_r method=hybrid range=(2 3)
    Thelen2003Muscle patlig_r: max_isometric_force=1 optimal_fiber_length=0.05 tendon_slack_length=0.005
        pennation_angle_at_optimal=0 max_contraction_velocity=10
      PathPoint P1: tibia_r (0.0282 -0.0579 0.0057)
      PathPoint P2: patella_r (0.0021 0.0015 0.0001)
    Thelen2003Muscle pect_r: max_isometric_force=177 optimal_fiber_length=0.133 tendon_slack_length=0.001
        pennation_angle_at_optimal=0 max_contraction_velocity=10
      PathPoint P1: pelvis (-0.0232 -0.08325 0.04529)
      PathPoint P2: femur_r (-0.00797 -0.08518 0.02403)
      PathWrap: wrap_object=PECT_at_femshaft_r method=hybrid
    Thelen2003Muscle perbrev_r: max_isometric_force=305.9 optimal_fiber_length=0.0454 tendon_slack_length=0.1481
        pennation_angle_at_optimal=0.2007129 max_contraction_velocity=10
      PathPoint P1: tibia_r (-0.0243 -0.2532 0.0251)
      PathPoint P2: tibia_r (-0.0339 -0.3893 0.0249)
      PathPoint P3: tibia_r (-0.0285 -0.4004 0.0255)
      PathPoint P4: calcn_r (0.0471 0.027 0.0233)
      PathPoint P5: calcn_r (0.0677 0.0219 0.0343)
    Thelen2003Muscle perlong_r: max_isometric_force=653.3 optimal_fiber_length=0.0508 tendon_slack_length=0.333
        pennation_angle_at_optimal=0.2460914 max_contraction_velocity=10
      PathPoint P1: tibia_r (-0.02 -0.1373 0.0282)
      PathPoint P2: tibia_r (-0.0317 -0.39 0.0237)
      PathPoint P3: tibia_r (-0.0272 -0.4014 0.024)
      PathPoint P4: calcn_r (0.0438 0.023 0.0221)
      PathPoint P5: calcn_r (0.0681 0.0106 0.0284)
      PathPoint P6: calcn_r (0.0852 0.0069 0.0118)
      PathPoint P7: calcn_r (0.1203 0.0085 -0.0184)
    Thelen2003Muscle pertert_r: max_isometric_force=90 optimal_fiber_length=0.079 tendon_slack_length=0.1
        pennation_angle_at_optimal=0.2268928 max_contraction_velocity=10
      PathPoint P1: tibia_r (-0.0149 -0.2485 0.0222)
      PathPoint P2: tibia_r (0.0108 -0.382 0.0225)
      PathPoint P3: calcn_r (0.0857 0.0228 0.0299)
    Thelen2003Muscle piri_r: max_isometric_force=296 optimal_fiber_length=0.026 tendon_slack_length=0.115
        pennation_angle_at_optimal=0.1745329 max_contraction_velocity=10
      PathPoint P1: pelvis (-0.10181 -0.00653 0.01351)
      PathPoint P2: pelvis (-0.10202 -0.03066 0.06092)
      PathPoint P3: femur_r (-0.0148 -0.0036 0.0437)
    Thelen2003Muscle psoas_r: max_isometric_force=479.7 optimal_fiber_length=0.1169 tendon_slack_length=0.097
        pennation_angle_at_optimal=0.1867502 max_contraction_velocity=10
      PathPoint P1: pelvis (-0.0606 0.062 0.039)
      PathPoint P2: pelvis (-0.0205 -0.0654 0.0656)
      PathPoint P3: femur_r (-0.0132 -0.0467 0.0046)
      PathPoint P4: femur_r (-0.0235 -0.0524 0.0088)
      PathWrap: wrap_object=PS_at_brim_r method=hybrid range=(2 3)
    Thelen2003Muscle quadfem_r: max_isometric_force=254 optimal_fiber_length=0.054 tendon_slack_length=0.024
        pennation_angle_at_optimal=0 max_contraction_velocity=10
      PathPoint P1: pelvis (-0.11192 -0.11473 0.05166)
      PathPoint P2: femur_r (-0.03575 -0.03552 0.03612)
    Thelen2003Muscle recfem_r: max_isometric_force=848.8 optimal_fiber_length=0.0759 tendon_slack_length=0.346
        pennation_angle_at_optimal=0.2426008 max_contraction_velocity=10
      PathPoint P1: pelvis (-0.024 -0.0388 0.0933)
      PathPoint P2: patella_r (0.01 0.049 0.0007)
      PathPoint P3: patella_r (0.0121 0.0437 -0.001)
      PathWrap: wrap_object=KnExt_at_fem_r method=hybrid
    Thelen2003Muscle sart_r: max_isometric_force=113.5 optimal_fiber_length=0.403 tendon_slack_length=0.11
        pennation_angle_at_optimal=0.02268928 max_contraction_velocity=10
      PathPoint P1: pelvis (-0.0195 -0.0156 0.1056)
      PathPoint P2: femur_r (-0.003 -0.3568 -0.0421)
      PathPoint P3: tibia_r (-0.0251 -0.0401 -0.0365)
      PathPoint P4: tibia_r (-0.0159 -0.0599 -0.0264)
      PathPoint P5: tibia_r (0.0136 -0.081 -0.0026)
    Thelen2003Muscle semimem_r: max_isometric_force=1162.7 optimal_fiber_length=0.069 tendon_slack_length=0.348
        pennation_angle_at_optimal=0.2635447 max_contraction_velocity=10
      PathPoint P1: pelvis (-0.0987 -0.114 0.0614)
      PathPoint P2: tibia_r (-0.029 -0.0417 -0.0196)
      PathWrap: wrap_object=SM_at_condyles_r method=hybrid
    Thelen2003Muscle semiten_r: max_isometric_force=301.9 optimal_fiber_length=0.193 tendon_slack_length=0.245
        pennation_angle_at_optimal=0.2251475 max_contraction_velocity=10
      PathPoint P1: pelvis (-0.1038 -0.1253 0.0515)
      PathPoint P2: tibia_r (-0.0312 -0.0508 -0.0229)
      PathPoint P3: tibia_r (0.0019 -0.0773 -0.0117)
      PathWrap: wrap_object=ST_at_condyles_r method=hybrid
    Thelen2003Muscle soleus_r: max_isometric_force=3585.9 optimal_fiber_length=0.044 tendon_slack_length=0.2815
        pennation_angle_at_optimal=0.4939282 max_contraction_velocity=10
      PathPoint P1: tibia_r (-0.0076 -0.0916 0.0098)
      PathPoint P2: calcn_r (0.0044 0.031 -0.0053)
    Thelen2003Muscle tfl_r: max_isometric_force=155 optimal_fiber_length=0.095 tendon_slack_length=0.45
        pennation_angle_at_optimal=0.05235988 max_contraction_velocity=10
      PathPoint P1: pelvis (-0.0311 0.0214 0.1241)
      PathPoint P2: femur_r (0.0294 -0.0995 0.0597)
      PathPoint P3: femur_r (0.0107 -0.405 0.0324)
      PathPoint P4: tibia_r (0.0108 -0.041 0.0346)
    Thelen2003Muscle tibant_r: max_isometric_force=673.7 optimal_fiber_length=0.0683 tendon_slack_length=0.241
        pennation_angle_at_optimal=0.1675516 max_contraction_velocity=10
      PathPoint P1: tibia_r (0.0154 -0.1312 0.0162)
      PathPoint P2: tibia_r (0.0251 -0.1906 0.0128)
      PathPoint P3: tibia_r (0.0233 -0.3659 -0.0132)
      PathPoint P4: calcn_r (0.1166 0.0178 -0.0305)
    Thelen2003Muscle tibpost_r: max_isometric_force=905.6 optimal_fiber_length=0.0378 tendon_slack_length=0.2818
        pennation_angle_at_optimal=0.2391101 max_contraction_velocity=10
      PathPoint P1: tibia_r (-0.0041 -0.1304 0.0103)
      PathPoint P2: tibia_r (-0.0164 -0.3655 -0.0175)
      PathPoint P3: calcn_r (0.0417 0.0334 -0.0286)
      PathPoint P4: calcn_r (0.0772 0.0159 -0.0281)
    Thelen2003Muscle vasint_r: max_isometric_force=1024.2 optimal_fiber_length=0.0993 tendon_slack_length=0.106
        pennation_angle_at_optimal=0.07853982 max_contraction_velocity=10
      PathPoint P1: femur_r (0.029 -0.1924 0.031)
      PathPoint P2: femur_r (0.0335 -0.2084 0.0285)
      PathPoint P3: patella_r (0.0058 0.048 -0.0006)
      PathWrap: wrap_object=KnExt_at_fem_r method=hybrid
    Thelen2003Muscle vaslat_r: max_isometric_force=2255.4 optimal_fiber_length=0.0994 tendon_slack_length=0.13
        pennation_angle_at_optimal=0.3211406 max_contraction_velocity=10
      PathPoint P1: femur_r (0.0048 -0.1854 0.0349)
      PathPoint P2: femur_r (0.0269 -0.2591 0.0409)
      PathPoint P3: patella_r (0.0103 0.0423 0.0141)
      PathWrap: wrap_object=KnExt_at_fem_r method=hybrid
    Thelen2003Muscle vasmed_r: max_isometric_force=1443.7 optimal_fiber_length=0.0968 tendon_slack_length=0.112
        pennation_angle_at_optimal=0.5166175 max_contraction_velocity=10
      PathPoint P1: femur_r (0.014 -0.2099 0.0188)
      PathPoint P2: femur_r (0.0356 -0.2769 0.0009)
      PathPoint P3: patella_r (0.0063 0.0445 -0.017)
      PathWrap: wrap_object=KnExt_at_fem_r method=hybrid
    Thelen2003Muscle addbrev_l: max_isometric_force=303.7 optimal_fiber_length=0.1031 tendon_slack_length=0.036
        pennation_angle_at_optimal=0.1064651 max_contraction_velocity=10
      PathPoint P1: pelvis (-0.0191 -0.094 -0.0154)
      PathPoint P2: femur_l (-0.002 -0.118 -0.0249)
      PathWrap: wrap_object=AB_at_femshaft_l method=hybrid
    Thelen2003Muscle addlong_l: max_isometric_force=399.5 optimal_fiber_length=0.1082 tendon_slack_length=0.13
        pennation_angle_at_optimal=0.1239184 max_contraction_velocity=10
      PathPoint P1: pelvis (-0.00758 -0.0889 -0.01888)
      PathPoint P2: femur_l (0.01126 -0.23937 -0.01583)
      PathWrap: wrap_object=AL_at_femshaft_l method=hybrid
    Thelen2003Muscle addmagDist_l: max_isometric_force=324.2 optimal_fiber_length=0.1772 tendon_slack_length=0.09
        pennation_angle_at_optimal=0.2408554 max_contraction_velocity=10
      PathPoint P1: pelvis (-0.07404 -0.12767 -0.03982)
      PathPoint P2: femur_l (0.01125 -0.2625 -0.0193)
      PathWrap: wrap_object=AMdist_at_femshaft_l method=hybrid
    Thelen2003Muscle addmagIsch_l: max_isometric_force=324.2 optimal_fiber_length=0.1562 tendon_slack_length=0.221
        pennation_angle_at_optimal=0.2076942 max_contraction_velocity=10
      PathPoint P1: pelvis (-0.08962 -0.12976 -0.04171)
      PathPoint P2: femur_l (0.00481 -0.38797 0.03273)
      PathWrap: wrap_object=AMisch_at_condyles_l method=hybrid
    Thelen2003Muscle addmagMid_l: max_isometric_force=324.2 optimal_fiber_length=0.1377 tendon_slack_length=0.048
        pennation_angle_at_optimal=0.2565634 max_contraction_velocity=10
      PathPoint P1: pelvis (-0.05266 -0.12075 -0.02854)
      PathPoint P2: femur_l (0.00242 -0.1624 -0.02922)
      PathWrap: wrap_object=AMmid_at_femshaft_l method=hybrid
    Thelen2003Muscle addmagProx_l: max_isometric_force=324.2 optimal_fiber_length=0.1056 tendon_slack_length=0.043
        pennation_angle_at_optimal=0.3874631 max_contraction_velocity=10
      PathPoint P1: pelvis (-0.03098 -0.10755 -0.01365)
      PathPoint P2: femur_l (-0.01527 -0.07886 -0.03202)
      PathWrap: wrap_object=AMprox_at_femshaft_l method=hybrid
    Thelen2003Muscle bflh_l: max_isometric_force=705.2 optimal_fiber_length=0.0976 tendon_slack_length=0.322
        pennation_angle_at_optimal=0.2024582 max_contraction_velocity=10
      PathPoint P1: pelvis (-0.104 -0.1191 -0.0586)
      PathPoint P2: tibia_l (-0.0337 -0.035 -0.0253)
      PathPoint P3: tibia_l (-0.0287 -0.0455 -0.0303)
    Thelen2003Muscle bfsh_l: max_isometric_force=315.8 optimal_fiber_length=0.1103 tendon_slack_length=0.104
        pennation_angle_at_optimal=0.2146755 max_contraction_velocity=10
      PathPoint P1: femur_l (0.005 -0.2111 -0.0234)
      PathPoint P2: tibia_l (-0.0301 -0.0419 -0.0318)
      PathWrap: wrap_object=BFLH_at_gastroc_l method=hybrid
    Thelen2003Muscle edl_l: max_isometric_force=345.4 optimal_fiber_length=0.0693 tendon_slack_length=0.3673
        pennation_angle_at_optimal=0.1884956 max_contraction_velocity=10
      PathPoint P1: tibia_l (-0.016 -0.1157 -0.0205)
      PathPoint P2: tibia_l (0.0164 -0.376 -0.0112)
      PathPoint P3: calcn_l (0.0919 0.036 -0.0008)
      PathPoint P4: calcn_l (0.1616 0.0055 -0.013)
      PathPoint P5: toes_l (0.0003 0.0047 -0.0153)
      PathPoint P6: toes_l (0.0443 -0.0004 -0.025)
    Thelen2003Muscle ehl_l: max_isometric_force=165 optimal_fiber_length=0.0748 tendon_slack_length=0.3315
        pennation_angle_at_optimal=0.164061 max_contraction_velocity=10
      PathPoint P1: tibia_l (-0.014 -0.155 -0.0189)
      PathPoint P2: tibia_l (0.0071 -0.2909 -0.0164)
      PathPoint P3: tibia_l (0.02 -0.3693 0.0028)
      PathPoint P4: calcn_l (0.097 0.0389 0.0211)
      PathPoint P5: calcn_l (0.1293 0.0309 0.0257)
      PathPoint P6: calcn_l (0.1734 0.0139 0.028)
      PathPoint P7: toes_l (0.0298 0.0041 0.0245)
      PathPoint P8: toes_l (0.0563 0.0034 0.0186)
    Thelen2003Muscle fdl_l: max_isometric_force=274.4 optimal_fiber_length=0.0446 tendon_slack_length=0.3777
        pennation_angle_at_optimal=0.2373648 max_contraction_velocity=10
      PathPoint P1: tibia_l (-0.0023 -0.1832 0.0018)
      PathPoint P2: tibia_l (-0.0176 -0.3645 0.0124)
      PathPoint P3: calcn_l (0.0436 0.0315 0.028)
      PathPoint P4: calcn_l (0.0708 0.0176 0.0263)
      PathPoint P5: calcn_l (0.1658 -0.0081 -0.0116)
      PathPoint P6: toes_l (-0.0019 -0.0078 -0.0147)
      PathPoint P7: toes_l (0.0285 -0.0071 -0.0215)
      PathPoint P8: toes_l (0.0441 -0.006 -0.0242)
    Thelen2003Muscle fhl_l: max_isometric_force=436.8 optimal_fiber_length=0.0527 tendon_slack_length=0.356
        pennation_angle_at_optimal=0.2949606 max_contraction_velocity=10
      PathPoint P1: tibia_l (-0.031 -0.2163 -0.02)
      PathPoint P2: tibia_l (-0.0242 -0.3671 0.0076)
      PathPoint P3: calcn_l (0.0374 0.0276 0.0241)
      PathPoint P4: calcn_l (0.1038 0.0068 0.0256)
      PathPoint P5: calcn_l (0.1726 -0.0053 0.0269)
      PathPoint P6: toes_l (0.0155 -0.0064 0.0265)
      PathPoint P7: toes_l (0.0562 -0.0102 0.0181)
    Thelen2003Muscle gaslat_l: max_isometric_force=606.4 optimal_fiber_length=0.0588 tendon_slack_length=0.382
        pennation_angle_at_optimal=0.2094395 max_contraction_velocity=10
      PathPoint P1: femur_l (-0.003 -0.3814 -0.0277)
      PathPoint P2: calcn_l (0.0044 0.031 0.0053)
      PathWrap: wrap_object=GasLat_at_shank_l method=hybrid
      PathWrap: wrap_object=Gastroc_at_condyles_l method=hybrid
    Thelen2003Muscle gasmed_l: max_isometric_force=1308 optimal_fiber_length=0.051 tendon_slack_length=0.4008
        pennation_angle_at_optimal=0.1727876 max_contraction_velocity=10
      PathPoint P1: femur_l (0.008 -0.3788 0.0208)
      PathPoint P2: calcn_l (0.0044 0.031 0.0053)
      PathWrap: wrap_object=GasMed_at_shank_l method=hybrid
      PathWrap: wrap_object=Gastroc_at_condyles_l method=hybrid
    Thelen2003Muscle gem_l: max_isometric_force=109 optimal_fiber_length=0.024 tendon_slack_length=0.039
        pennation_angle_at_optimal=0 max_contraction_velocity=10
      PathPoint P1: pelvis (-0.10357 -0.0764 -0.06707)
      PathPoint P2: femur_l (-0.0142 -0.0033 -0.0443)
    Thelen2003Muscle glmax1_l: max_isometric_force=546.1 optimal_fiber_length=0.1473 tendon_slack_length=0.05
        pennation_angle_at_optimal=0.3822271 max_contraction_velocity=10
      PathPoint P1: pelvis (-0.1231 0.0345 -0.0563)
      PathPoint P2: pelvis (-0.1257 -0.0242 -0.0779)
      PathPoint P3: femur_l (-0.0444 -0.0326 -0.0302)
      PathPoint P4: femur_l (-0.0277 -0.0566 -0.047)
      PathWrap: wrap_object=Gmax_at_pelvis_l method=hybrid
    Thelen2003Muscle glmax2_l: max_isometric_force=780.5 optimal_fiber_length=0.1569 tendon_slack_length=0.0733
        pennation_angle_at_optimal=0.3822271 max_contraction_velocity=10
      PathPoint P1: pelvis (-0.1317 0.0087 -0.0462)
      PathPoint P2: pelvis (-0.1344 -0.0609 -0.0813)
      PathPoint P3: femur_l (-0.045 -0.0584 -0.0252)
      PathPoint P4: femur_l (-0.0156 -0.1016 -0.0419)
      PathWrap: wrap_object=Gmax_at_pelvis_l method=hybrid
    Thelen2003Muscle glmax3_l: max_isometric_force=526.1 optimal_fiber_length=0.1665 tendon_slack_length=0.0702
        pennation_angle_at_optimal=0.3822271 max_contraction_velocity=10
      PathPoint P1: pelvis (-0.13 -0.0525 -0.009)
      PathPoint P2: pelvis (-0.1273 -0.1263 -0.0435)
      PathPoint P3: femur_l (-0.0281 -0.1125 -0.0094)
      PathPoint P4: femur_l (-0.006 -0.1419 -0.0411)
      PathWrap: wrap_object=Gmax_at_pelvis_l method=hybrid
    Thelen2003Muscle glmed1_l: max_isometric_force=881.1 optimal_fiber_length=0.0733 tendon_slack_length=0.0565
        pennation_angle_at_optimal=0.3577925 max_contraction_velocity=10
      PathPoint P1: pelvis (-0.0445 0.0245 -0.1172)
      PathPoint P2: femur_l (-0.0218 -0.0117 -0.0555)
    Thelen2003Muscle glmed2_l: max_isometric_force=616.5 optimal_fiber_length=0.0733 tendon_slack_length=0.066
        pennation_angle_at_optimal=0.3577925 max_contraction_velocity=10
      PathPoint P1: pelvis (-0.085 0.0316 -0.0675)
      PathPoint P2: femur_l (-0.0258 -0.0058 -0.0527)
    Thelen2003Muscle glmed3_l: max_isometric_force=702 optimal_fiber_length=0.0733 tendon_slack_length=0.046
        pennation_angle_at_optimal=0.3577925 max_contraction_velocity=10
      PathPoint P1: pelvis (-0.1152 -0.0073 -0.0526)
      PathPoint P2: femur_l (-0.0309 -0.0047 -0.0518)
    Thelen2003Muscle glmin1_l: max_isometric_force=180 optimal_fiber_length=0.068 tendon_slack_length=0.016
        pennation_angle_at_optimal=0.1745329 max_contraction_velocity=10
      PathPoint P1: pelvis (-0.0464 -0.0149 -0.1042)
      PathPoint P2: femur_l (-0.0072 -0.0104 -0.056)
    Thelen2003Muscle glmin2_l: max_isometric_force=190 optimal_fiber_length=0.056 tendon_slack_length=0.026
        pennation_angle_at_optimal=0 max_contraction_velocity=10
      PathPoint P1: pelvis (-0.0616 -0.0142 -0.0971)
      PathPoint P2: femur_l (-0.0096 -0.0104 -0.056)
    Thelen2003Muscle glmin3_l: max_isometric_force=215 optimal_fiber_length=0.038 tendon_slack_length=0.051
        pennation_angle_at_optimal=0.01745329 max_contraction_velocity=10
      PathPoint P1: pelvis (-0.0789 -0.0155 -0.0798)
      PathPoint P2: femur_l (-0.0135 -0.0083 -0.055)
    Thelen2003Muscle grac_l: max_isometric_force=137.3 optimal_fiber_length=0.2278 tendon_slack_length=0.166
        pennation_angle_at_optimal=0.143117 max_contraction_velocity=10
      PathPoint P1: pelvis (-0.04736 -0.12932 -0.02456)
      PathPoint P2: tibia_l (-0.01842 -0.04755 0.02961)
      PathPoint P3: tibia_l (0.00178 -0.06962 0.01573)
      PathWrap: wrap_object=GR_at_condyles_l method=hybrid
    Thelen2003Muscle iliacus_l: max_isometric_force=621.9 optimal_fiber_length=0.1066 tendon_slack_length=0.094
        pennation_angle_at_optimal=0.2495821 max_contraction_velocity=10
      PathPoint P1: pelvis (-0.0605 0.0309 -0.0843)
      PathPoint P2: pelvis (-0.0135 -0.0557 -0.0756)
      PathPoint P3: femur_l (-0.0023 -0.0565 -0.0139)
      PathPoint P4: femur_l (-0.0122 -0.0637 -0.0196)
      PathWrap: wrap_object=IL_at_brim_l method=hybrid range=(2 3)
    Thelen2003Muscle patlig_l: max_isometric_force=1 optimal_fiber_length=0.05 tendon_slack_length=0.005
        pennation_angle_at_optimal=0 max_contraction_velocity=10
      PathPoint P1: tibia_l (0.0282 -0.0579 -0.0057)
      PathPoint P2: patella_l (0.0021 0.0015 -0.0001)
    Thelen2003Muscle pect_l: max_isometric_force=177 optimal_fiber_length=0.133 tendon_slack_length=0.001
        pennation_angle_at_optimal=0 max_contraction_velocity=10
      PathPoint P1: pelvis (-0.0232 -0.08325 -0.04529)
      PathPoint P2: femur_l (-0.00797 -0.08518 -0.02403)
      PathWrap: wrap_object=PECT_at_femshaft_l method=hybrid
    Thelen2003Muscle perbrev_l: max_isometric_force=305.9 optimal_fiber_length=0.0454 tendon_slack_length=0.1481
        pennation_angle_at_optimal=0.2007129 max_contraction_velocity=10
      PathPoint P1: tibia_l (-0.0243 -0.2532 -0.0251)
      PathPoint P2: tibia_l (-0.0339 -0.3893 -0.0249)
      PathPoint P3: tibia_l (-0.0285 -0.4004 -0.0255)
      PathPoint P4: calcn_l (0.0471 0.027 -0.0233)
      PathPoint P5: calcn_l (0.0677 0.0219 -0.0343)
    Thelen2003Muscle perlong_l: max_isometric_force=653.3 optimal_fiber_length=0.0508 tendon_slack_length=0.333
        pennation_angle_at_optimal=0.2460914 max_contraction_velocity=10
      PathPoint P1: tibia_l (-0.02 -0.1373 -0.0282)
      PathPoint P2: tibia_l (-0.0317 -0.39 -0.0237)
      PathPoint P3: tibia_l (-0.0272 -0.4014 -0.024)
      PathPoint P4: calcn_l (0.0438 0.023 -0.0221)
      PathPoint P5: calcn_l (0.0681 0.0106 -0.0284)
      PathPoint P6: calcn_l (0.0852 0.0069 -0.0118)
      PathPoint P7: calcn_l (0.1203 0.0085 0.0184)
    Thelen2003Muscle pertert_l: max_isometric_force=90 optimal_fiber_length=0.079 tendon_slack_length=0.1
        pennation_angle_at_optimal=0.2268928 max_contraction_velocity=10
      PathPoint P1: tibia_l (-0.0149 -0.2485 -0.0222)
      PathPoint P2: tibia_l (0.0108 -0.382 -0.0225)
      PathPoint P3: calcn_l (0.0857 0.0228 -0.0299)
    Thelen2003Muscle piri_l: max_isometric_force=296 optimal_fiber_length=0.026 tendon_slack_length=0.115
        pennation_angle_at_optimal=0.1745329 max_contraction_velocity=10
      PathPoint P1: pelvis (-0.10181 -0.00653 -0.01351)
      PathPoint P2: pelvis (-0.10202 -0.03066 -0.06092)
      PathPoint P3: femur_l (-0.0148 -0.0036 -0.0437)
    Thelen2003Muscle psoas_l: max_isometric_force=479.7 optimal_fiber_length=0.1169 tendon_slack_length=0.097
        pennation_angle_at_optimal=0.1867502 max_contraction_velocity=10
      PathPoint P1: pelvis (-0.0606 0.062 -0.039)
      PathPoint P2: pelvis (-0.0205 -0.0654 -0.0656)
      PathPoint P3: femur_l (-0.0132 -0.0467 -0.0046)
      PathPoint P4: femur_l (-0.0235 -0.0524 -0.0088)
      PathWrap: wrap_object=PS_at_brim_l method=hybrid range=(2 3)
    Thelen2003Muscle quadfem_l: max_isometric_force=254 optimal_fiber_length=0.054 tendon_slack_length=0.024
        pennation_angle_at_optimal=0 max_contraction_velocity=10
      PathPoint P1: pelvis (-0.11192 -0.11473 -0.05166)
      PathPoint P2: femur_l (-0.03575 -0.03552 -0.03612)
    Thelen2003Muscle recfem_l: max_isometric_force=848.8 optimal_fiber_length=0.0759 tendon_slack_length=0.346
        pennation_angle_at_optimal=0.2426008 max_contraction_velocity=10
      PathPoint P1: pelvis (-0.024 -0.0388 -0.0933)
      PathPoint P2: patella_l (0.01 0.049 -0.0007)
      PathPoint P3: patella_l (0.0121 0.0437 0.001)
      PathWrap: wrap_object=KnExt_at_fem_l method=hybrid
    Thelen2003Muscle sart_l: max_isometric_force=113.5 optimal_fiber_length=0.403 tendon_slack_length=0.11
        pennation_angle_at_optimal=0.02268928 max_contraction_velocity=10
      PathPoint P1: pelvis (-0.0195 -0.0156 -0.1056)
      PathPoint P2: femur_l (-0.003 -0.3568 0.0421)
      PathPoint P3: tibia_l (-0.0251 -0.0401 0.0365)
      PathPoint P4: tibia_l (-0.0159 -0.0599 0.0264)
      PathPoint P5: tibia_l (0.0136 -0.081 0.0026)
    Thelen2003Muscle semimem_l: max_isometric_force=1162.7 optimal_fiber_length=0.069 tendon_slack_length=0.348
        pennation_angle_at_optimal=0.2635447 max_contraction_velocity=10
      PathPoint P1: pelvis (-0.0987 -0.114 -0.0614)
      PathPoint P2: tibia_l (-0.029 -0.0417 0.0196)
      PathWrap: wrap_object=SM_at_condyles_l method=hybrid
    Thelen2003Muscle semiten_l: max_isometric_force=301.9 optimal_fiber_length=0.193 tendon_slack_length=0.245
        pennation_angle_at_optimal=0.2251475 max_contraction_velocity=10
      PathPoint P1: pelvis (-0.1038 -0.1253 -0.0515)
      PathPoint P2: tibia_l (-0.0312 -0.0508 0.0229)
      PathPoint P3: tibia_l (0.0019 -0.0773 0.0117)
      PathWrap: wrap_object=ST_at_condyles_l method=hybrid
    Thelen2003Muscle soleus_l: max_isometric_force=3585.9 optimal_fiber_length=0.044 tendon_slack_length=0.2815
        pennation_angle_at_optimal=0.4939282 max_contraction_velocity=10
      PathPoint P1: tibia_l (-0.0076 -0.0916 -0.0098)
      PathPoint P2: calcn_l (0.0044 0.031 0.0053)
    Thelen2003Muscle tfl_l: max_isometric_force=155 optimal_fiber_length=0.095 tendon_slack_length=0.45
        pennation_angle_at_optimal=0.05235988 max_contraction_velocity=10
      PathPoint P1: pelvis (-0.0311 0.0214 -0.1241)
      PathPoint P2: femur_l (0.0294 -0.0995 -0.0597)
      PathPoint P3: femur_l (0.0107 -0.405 -0.0324)
      PathPoint P4: tibia_l (0.0108 -0.041 -0.0346)
    Thelen2003Muscle tibant_l: max_isometric_force=673.7 optimal_fiber_length=0.0683 tendon_slack_length=0.241
        pennation_angle_at_optimal=0.1675516 max_contraction_velocity=10
      PathPoint P1: tibia_l (0.0154 -0.1312 -0.0162)
      PathPoint P2: tibia_l (0.0251 -0.1906 -0.0128)
      PathPoint P3: tibia_l (0.0233 -0.3659 0.0132)
      PathPoint P4: calcn_l (0.1166 0.0178 0.0305)
    Thelen2003Muscle tibpost_l: max_isometric_force=905.6 optimal_fiber_length=0.0378 tendon_slack_length=0.2818
        pennation_angle_at_optimal=0.2391101 max_contraction_velocity=10
      PathPoint P1: tibia_l (-0.0041 -0.1304 -0.0103)
      PathPoint P2: tibia_l (-0.0164 -0.3655 0.0175)
      PathPoint P3: calcn_l (0.0417 0.0334 0.0286)
      PathPoint P4: calcn_l (0.0772 0.0159 0.0281)
    Thelen2003Muscle vasint_l: max_isometric_force=1024.2 optimal_fiber_length=0.0993 tendon_slack_length=0.106
        pennation_angle_at_optimal=0.07853982 max_contraction_velocity=10
      PathPoint P1: femur_l (0.029 -0.1924 -0.031)
      PathPoint P2: femur_l (0.0335 -0.2084 -0.0285)
      PathPoint P3: patella_l (0.0058 0.048 0.0006)
      PathWrap: wrap_object=KnExt_at_fem_l method=hybrid
    Thelen2003Muscle vaslat_l: max_isometric_force=2255.4 optimal_fiber_length=0.0994 tendon_slack_length=0.13
        pennation_angle_at_optimal=0.3211406 max_contraction_velocity=10
      PathPoint P1: femur_l (0.0048 -0.1854 -0.0349)
      PathPoint P2: femur_l (0.0269 -0.2591 -0.0409)
      PathPoint P3: patella_l (0.0103 0.0423 -0.0141)
      PathWrap: wrap_object=KnExt_at_fem_l method=hybrid
    Thelen2003Muscle vasmed_l: max_isometric_force=1443.7 optimal_fiber_length=0.0968 tendon_slack_length=0.112
        pennation_angle_at_optimal=0.5166175 max_contraction_velocity=10
      PathPoint P1: femur_l (0.014 -0.2099 -0.0188)
      PathPoint P2: femur_l (0.0356 -0.2769 -0.0009)
      PathPoint P3: patella_l (0.0063 0.0445 0.017)
      PathWrap: wrap_object=KnExt_at_fem_l method=hybrid
    CoordinateLimitForce shoulder_elv_ligaments: coordinate=shoulder_elv upper_stiffness=100 [N*m/degree]
        upper_limit=150 [degrees] lower_stiffness=100 [N*m/degree] lower_limit=30 [degrees] damping=0
        transition=542.8423 [degrees]
    CoordinateLimitForce shoulder_elv_damping: coordinate=shoulder_elv upper_stiffness=1e-8 upper_limit=190
        lower_stiffness=1e-8 lower_limit=190 damping=0.001745 transition=1
    CoordinateLimitForce elv_angle_ligaments: coordinate=elv_angle upper_stiffness=100 upper_limit=100
        lower_stiffness=100 lower_limit=-60 damping=0 transition=545.4471
    CoordinateLimitForce elv_angle_damping: coordinate=elv_angle upper_stiffness=1e-8 upper_limit=190
        lower_stiffness=1e-8 lower_limit=190 damping=0.001745 transition=1
    CoordinateLimitForce shoulder_rot_ligaments: coordinate=shoulder_rot upper_stiffness=100 upper_limit=-10
        lower_stiffness=100 lower_limit=-60 damping=0 transition=485.466
    CoordinateLimitForce shoulder_rot_damping: coordinate=shoulder_rot upper_stiffness=1e-8 upper_limit=190
        lower_stiffness=1e-8 lower_limit=190 damping=0.001745 transition=1
    CoordinateLimitForce elbow_flexion_ligaments: coordinate=elbow_flexion upper_stiffness=0.3037 upper_limit=85
        lower_stiffness=100 lower_limit=14 damping=0 transition=139.5813
    CoordinateLimitForce elbow_flexion_damping: coordinate=elbow_flexion upper_stiffness=1e-8 upper_limit=190
        lower_stiffness=1e-8 lower_limit=190 damping=0.001745 transition=1
    CoordinateLimitForce pro_sup_ligaments: coordinate=pro_sup upper_stiffness=50 upper_limit=60 lower_stiffness=50
        lower_limit=-60 damping=0 transition=430.1186
    CoordinateLimitForce pro_sup_damping: coordinate=pro_sup upper_stiffness=1e-8 upper_limit=190 lower_stiffness=1e-8
        lower_limit=190 damping=0.001745 transition=1
    CoordinateLimitForce deviation_ligaments: coordinate=deviation upper_stiffness=52.5961 upper_limit=20
        lower_stiffness=487.176 lower_limit=-6 damping=0 transition=39.1586
    CoordinateLimitForce deviation_damping: coordinate=deviation upper_stiffness=1e-8 upper_limit=190
        lower_stiffness=1e-8 lower_limit=190 damping=0.001745 transition=1
    CoordinateLimitForce flexion_ligaments: coordinate=flexion upper_stiffness=200 upper_limit=60
        lower_stiffness=135.3232 lower_limit=-60 damping=0 transition=92.916
    CoordinateLimitForce flexion_damping: coordinate=flexion upper_stiffness=1e-8 upper_limit=190 lower_stiffness=1e-8
        lower_limit=190 damping=0.00043633 transition=1
    Thelen2003Muscle DELT1: min_control=0 max_control=1 optimal_force=1 max_isometric_force=1218.9
        optimal_fiber_length=0.0976 tendon_slack_length=0.097 pennation_angle_at_optimal=0.3839724
        max_contraction_velocity=0
      PathPoint P1: humerus (0.00860565 -0.114131 0.00561864)
      PathPoint P2: humerus (0.0155881 -0.105967 0.00395706)
      PathPoint P3: scapula (0.0417508 -0.0312338 0.000950846)
      PathPoint P4: clavicle (-0.0134463 0.0106226 0.0770379)
      PathWrap: wrap_object=delt2hum method=hybrid
      PathWrap: wrap_object=DELT1hh method=hybrid range=(2 3)
    Thelen2003Muscle DELT2: min_control=0 max_control=1 optimal_force=1 max_isometric_force=1103.5
        optimal_fiber_length=0.1078 tendon_slack_length=0.1095 pennation_angle_at_optimal=0.2617994
        max_contraction_velocity=0
      PathPoint P1: humerus (0.00442768 -0.130727 0.00537853)
      MovingPathPoint default: clavicle (0.02 0.00216056 0.183675) x_coordinate=shoulder_elv y_coordinate=shoulder_elv
          z_coordinate=shoulder_elv x_location=PiecewiseLinearFunction(x=0 2.1 3.14, y=0.02 0.02 0.015)
        y_location: PiecewiseLinearFunction: x=(0 1.507 3.14) y=(-0.01 0.025 0.055)
        z_location: SimmSpline: x=(0 1.507 3.14) y=(0.186 0.171 0.126)
      PathPoint P3: scapula (4.80226e-5 0.00282373 0.0214469)
      PathPoint P4: scapula (-0.0103537 -0.000326554 0.0059548)
      PathWrap: wrap_object=Deltoid2 method=hybrid
      PathWrap: wrap_object=delt2hum method=hybrid
      PathWrap: wrap_object=DELT_TMAJ_LAT_PEC_CORBhh method=hybrid
    Thelen2003Muscle DELT3: min_control=0 max_control=1 optimal_force=1 max_isometric_force=201.6
        optimal_fiber_length=0.1367 tendon_slack_length=0.038 pennation_angle_at_optimal=0.3141593
        max_contraction_velocity=0
      PathPoint P1: scapula (-0.0535326 0.00117175 -0.0241266)
      PathPoint P2: scapula (-0.069604 -0.0315508 0.0118424)
      PathPoint P3: humerus (0.00197853 -0.0730136 0.0100367)
      PathWrap: wrap_object=Delt3 method=hybrid range=(1 2)
      PathWrap: wrap_object=delt3hum method=hybrid
      PathWrap: wrap_object=DELT_TMAJ_LAT_PEC_CORBhh method=hybrid
    Thelen2003Muscle SUPSP: min_control=0 max_control=1 optimal_force=1 max_isometric_force=499.2
        optimal_fiber_length=0.0682 tendon_slack_length=0.0395 pennation_angle_at_optimal=0.1221731
        max_contraction_velocity=0
      PathPoint P1: humerus (0.00245876 0.0102096 0.0249045)
      PathPoint P2: scapula (-0.0184215 0.00121977 -0.0122073)
      PathPoint P3: scapula (-0.0422599 -0.014522 -0.0562345)
      PathWrap: wrap_object=SUPSP method=hybrid
    Thelen2003Muscle INFSP: min_control=0 max_control=1 optimal_force=1 max_isometric_force=1075.8
        optimal_fiber_length=0.0755 tendon_slack_length=0.0308 pennation_angle_at_optimal=0.3316126
        max_contraction_velocity=0
      PathPoint P1: humerus (-0.00851921 0.00464859 0.0235119)
      PathPoint P2: scapula (-0.0709006 -0.0525944 -0.0459192)
      PathWrap: wrap_object=INFSP method=hybrid
      PathWrap: wrap_object=INFSP_and_TMIN_hum_head method=hybrid
    Thelen2003Muscle SUBSC: min_control=0 max_control=1 optimal_force=1 max_isometric_force=1306.9
        optimal_fiber_length=0.0873 tendon_slack_length=0.033 pennation_angle_at_optimal=0.3490659
        max_contraction_velocity=0
      PathPoint P1: humerus (0.0134751 0.0080678 -0.0127836)
      PathPoint P2: scapula (-0.0175859 -0.0501644 -0.0235983)
      PathPoint P3: scapula (-0.0695944 -0.0378706 -0.0621893)
      PathWrap: wrap_object=SUBSCAP method=hybrid
    Thelen2003Muscle TMIN: min_control=0 max_control=1 optimal_force=1 max_isometric_force=269.5
        optimal_fiber_length=0.0741 tendon_slack_length=0.0713 pennation_angle_at_optimal=0.418879
        max_contraction_velocity=0
      PathPoint P1: humerus (-0.0010565 -0.0121401 0.0207073)
      PathPoint P2: scapula (-0.0909834 -0.0767496 -0.0454965)
      PathPoint P3: scapula (-0.0926164 -0.0779983 -0.0508847)
      PathWrap: wrap_object=TMIN method=hybrid range=(1 2)
      PathWrap: wrap_object=INFSP_and_TMIN_hum_head method=hybrid range=(1 2)
      PathWrap: wrap_object=TMINhum method=hybrid range=(1 2)
    Thelen2003Muscle TMAJ: min_control=0 max_control=1 optimal_force=1 max_isometric_force=144
        optimal_fiber_length=0.1624 tendon_slack_length=0.02 pennation_angle_at_optimal=0.2792527
        max_contraction_velocity=0
      PathPoint P1: humerus (0.00959297 -0.0520469 -0.00546496)
      PathPoint P2: scapula (-0.0985808 -0.099109 -0.0559847)
      PathPoint P3: scapula (-0.100742 -0.104641 -0.0683554)
      PathWrap: wrap_object=TMAJ_LAThum method=hybrid
      PathWrap: wrap_object=LAT_TMAJhh method=hybrid range=(1 2)
      PathWrap: wrap_object=LAT_TMAJ2hh method=hybrid
    Thelen2003Muscle PECM1: min_control=0 max_control=1 optimal_force=1 max_isometric_force=444.3
        optimal_fiber_length=0.1442 tendon_slack_length=0.0028 pennation_angle_at_optimal=0.296706
        max_contraction_velocity=0
      PathPoint P1: humerus (0.0112277 -0.0402525 0.00749153)
      MovingPathPoint default: humerus (0.0171333 -0.037 -0.00337) x_coordinate=shoulder_elv y_coordinate=shoulder_elv
          z_coordinate=shoulder_elv x_location=PiecewiseLinearFunction(x=0 3.14159, y=0.01615 0.02205)
          y_location=PiecewiseLinearFunction(x=0 3.14159, y=-0.04045 -0.01975)
          z_location=PiecewiseLinearFunction(x=0 3.14159, y=-0.00577 0.00863)
      MovingPathPoint default: thorax (0.00636333 -0.00732333 0.119273) x_coordinate=shoulder_elv
          y_coordinate=shoulder_elv z_coordinate=shoulder_elv
          x_location=PiecewiseLinearFunction(x=0 3.14159, y=0.00958 -0.00972)
          y_location=PiecewiseLinearFunction(x=0 3.14159, y=-0.01509 0.03151)
          z_location=PiecewiseLinearFunction(x=0 3.14159, y=0.12664 0.08244)
      PathPoint P2: clavicle (0.00308305 -0.000124859 0.0491079)
      PathWrap: wrap_object=Thorax method=hybrid
      PathWrap: wrap_object=PEC12hum method=hybrid range=(2 3)
      PathWrap: wrap_object=PEC1hh method=hybrid
    Thelen2003Muscle PECM2: min_control=0 max_control=1 optimal_force=1 max_isometric_force=658.3
        optimal_fiber_length=0.1385 tendon_slack_length=0.089 pennation_angle_at_optimal=0.4537856
        max_contraction_velocity=0
      PathPoint P1: humerus (0.0122362 -0.0411938 0.00753955)
      MovingPathPoint default: humerus (0.0155133 -0.04223 -0.00447) x_coordinate=shoulder_elv
          y_coordinate=shoulder_elv z_coordinate=shoulder_elv
          x_location=PiecewiseLinearFunction(x=0 3.14159, y=0.01453 0.02043)
          y_location=PiecewiseLinearFunction(x=0 3.14159, y=-0.04568 -0.02498)
          z_location=PiecewiseLinearFunction(x=0 3.14159, y=-0.00687 0.00753)
      MovingPathPoint default: thorax (0.0203967 -0.03445 0.123117) x_coordinate=shoulder_elv y_coordinate=shoulder_elv
          z_coordinate=shoulder_elv x_location=PiecewiseLinearFunction(x=0 3.14159, y=0.02018 0.02148)
          y_location=PiecewiseLinearFunction(x=0 3.14159, y=-0.04165 0.00155)
          z_location=PiecewiseLinearFunction(x=0 3.14159, y=0.1269 0.1042)
      PathPoint P4: thorax (0.0296876 -0.0376688 0.0932119)
      PathPoint P5: thorax (0.0265949 -0.0432011 0.0218119)
      PathWrap: wrap_object=Thorax method=hybrid
      PathWrap: wrap_object=PEC12hum method=hybrid range=(2 3)
      PathWrap: wrap_object=TMAJ_LAT_PEC_CORBhh method=hybrid
      PathWrap: wrap_object=PEC23hh method=hybrid
    Thelen2003Muscle PECM3: min_control=0 max_control=1 optimal_force=1 max_isometric_force=498.1
        optimal_fiber_length=0.1385 tendon_slack_length=0.132 pennation_angle_at_optimal=0.4363323
        max_contraction_velocity=0
      PathPoint P1: humerus (0.0121881 -0.0420198 0.00720339)
      MovingPathPoint default: humerus (0.0142392 -0.0496515 -0.00936368) x_coordinate=shoulder_elv
          y_coordinate=shoulder_elv z_coordinate=shoulder_elv
          y_location=PiecewiseLinearFunction(x=0 3.13149, y=-0.05157 -0.040096)
        x_location: SimmSpline: x=(0 0.747517 3.14159) y=(0.01243 0.014912 0.01833)
        z_location: SimmSpline: x=(0 0.623056 2.29124 3.12533) y=(-0.01807 -0.008102 0.000123 -0.000324)
      MovingPathPoint default: thorax (0.02984 -0.0697393 0.1151) x_coordinate=shoulder_elv y_coordinate=shoulder_elv
          z_coordinate=shoulder_elv x_location=PiecewiseLinearFunction(x=0 3.14159, y=0.02984 0.02984)
          z_location=PiecewiseLinearFunction(x=0 3.14159, y=0.1151 0.1151)
        y_location: SimmSpline: x=(0.0101016 1.59605 3.14159) y=(-0.070778 -0.059781 -0.0269)
      PathPoint P4: thorax (0.0504237 -0.0808412 0.0858164)
      PathPoint P5: thorax (0.0549763 -0.111931 0.0363723)
      PathWrap: wrap_object=Thorax method=hybrid
      PathWrap: wrap_object=PEC3hum method=hybrid range=(2 3)
      PathWrap: wrap_object=PEC23hh method=hybrid
    Thelen2003Muscle CORB: min_control=0 max_control=1 optimal_force=1 max_isometric_force=208.2
        optimal_fiber_length=0.0932 tendon_slack_length=0.097 pennation_angle_at_optimal=0.4712389
        max_contraction_velocity=0
      PathPoint P1: scapula (0.0120056 -0.0396379 -0.0254712)
      PathPoint P2: scapula (0.00463898 -0.0668282 -0.0150119)
      PathPoint P3: humerus (0.00713616 -0.144529 -0.00751073)
      PathWrap: wrap_object=CORBhum method=hybrid
      PathWrap: wrap_object=TMAJ_LAT_PEC_CORBhh method=hybrid
    Thelen2003Muscle TRIlong: min_control=0 max_control=1 optimal_force=1 max_isometric_force=771.8
        optimal_fiber_length=0.134 tendon_slack_length=0.143 pennation_angle_at_optimal=0.2094395
        max_contraction_velocity=0
      PathPoint P1: scapula (-0.0438446 -0.0391192 -0.0132254)
      PathPoint P2: humerus (-0.0260667 -0.109885 -0.0063774)
      PathPoint P3: humerus (-0.0305808 -0.217418 -0.0116887)
      PathPoint P4: humerus (-0.0167407 -0.256988 -0.0116023)
      PathPoint P5: ulna (-0.0210339 0.0100463 -0.000749153)
      PathWrap: wrap_object=TRI method=hybrid
      PathWrap: wrap_object=TRIlonghh method=hybrid
      PathWrap: wrap_object=TRIlongglen method=hybrid
    Thelen2003Muscle TRIlat: min_control=0 max_control=1 optimal_force=1 max_isometric_force=717.5
        optimal_fiber_length=0.1138 tendon_slack_length=0.098 pennation_angle_at_optimal=0.1570796
        max_contraction_velocity=0
      PathPoint P1: humerus (-0.0057531 -0.121459 0.00411073)
      PathPoint P2: humerus (-0.022513 -0.139534 0.00891299)
      PathPoint P3: humerus (-0.0305808 -0.217418 -0.0116887)
      PathPoint P4: humerus (-0.0167407 -0.256988 -0.0116023)
      PathPoint P5: ulna (-0.0210339 0.0100463 -0.000749153)
      PathWrap: wrap_object=TRI method=hybrid
    Thelen2003Muscle TRImed: min_control=0 max_control=1 optimal_force=1 max_isometric_force=717.5
        optimal_fiber_length=0.1138 tendon_slack_length=0.0908 pennation_angle_at_optimal=0.1570796
        max_contraction_velocity=0
      PathPoint P1: humerus (-0.00804859 -0.131534 -0.00870169)
      PathPoint P2: humerus (-0.0249814 -0.145403 -0.0103729)
      PathPoint P3: humerus (-0.0305808 -0.217418 -0.0116887)
      PathPoint P4: humerus (-0.0167407 -0.256988 -0.0116023)
      PathPoint P5: ulna (-0.0210339 0.0100463 -0.000749153)
      PathWrap: wrap_object=TRI method=hybrid
    Thelen2003Muscle ANC: min_control=0 max_control=1 optimal_force=1 max_isometric_force=283.2
        optimal_fiber_length=0.027 tendon_slack_length=0.018 pennation_angle_at_optimal=0 max_contraction_velocity=0
      PathPoint P1: humerus (-0.00714576 -0.272375 0.00943805)
      PathPoint P2: ulna (-0.0243186 -0.00119096 0.00576271)
      PathWrap: wrap_object=ANC method=hybrid
    Thelen2003Muscle SUP: min_control=0 max_control=1 optimal_force=1 max_isometric_force=379.6
        optimal_fiber_length=0.033 tendon_slack_length=0.028 pennation_angle_at_optimal=0 max_contraction_velocity=0
      PathPoint P1: radius (0.0095661 -0.0585492 0.000720339)
      PathPoint P2: radius (0.011535 -0.0496554 -0.00102768)
      PathPoint P3: ulna (-0.0130621 -0.0325017 0.0193339)
      PathWrap: wrap_object=SUP method=hybrid
    Thelen2003Muscle BIClong: min_control=0 max_control=1 optimal_force=1 max_isometric_force=525.1
        optimal_fiber_length=0.1157 tendon_slack_length=0.2783 pennation_angle_at_optimal=0 max_contraction_velocity=0
      PathPoint P1: scapula (-0.0299949 -0.0225994 -0.0125339)
      PathPoint P2: scapula (-0.0211182 -0.0125723 -0.00442767)
      PathPoint P3: humerus (0.0204672 0.0172209 0.00987345)
      PathPoint P4: humerus (0.0228395 -0.00490791 0.011535)
      PathPoint P5: humerus (0.0129181 -0.027152 0.00130621)
      PathPoint P6: humerus (0.0102576 -0.0743006 -0.00158475)
      PathPoint P7: humerus (0.0163565 -0.116455 0.000230508)
      PathPoint P8: humerus (0.0218983 -0.168463 -0.00605085)
      MovingPathPoint default: radius (0.00272316 -0.035 -0.0135667) x_coordinate=pro_sup y_coordinate=pro_sup
          z_coordinate=pro_sup
        x_location: SimmSpline: x=(-1.57561 1.57823) y=(-0.0055 0.01096)
        y_location: PiecewiseLinearFunction: x=(-1.57561 0 1.57561) y=(-0.0282 -0.035 -0.0392)
        z_location: SimmSpline: x=(-1.57561 0.0866167 1.57561) y=(-0.01 -0.01358 -0.01083)
      PathPoint P11: radius (-0.0019209 -0.0360169 -0.0019209)
      PathWrap: wrap_object=Elbow_BIC_BRD method=hybrid
      PathWrap: wrap_object=BIClong method=hybrid range=(2 5)
    Thelen2003Muscle BICshort: min_control=0 max_control=1 optimal_force=1 max_isometric_force=316.8
        optimal_fiber_length=0.1321 tendon_slack_length=0.2003 pennation_angle_at_optimal=0 max_contraction_velocity=0
      PathPoint P1: scapula (0.0121785 -0.0377554 -0.0252119)
      PathPoint P2: scapula (0.00089322 -0.0643887 -0.0153)
      PathPoint P3: humerus (0.0107282 -0.0727638 -0.0105746)
      PathPoint P4: humerus (0.0163565 -0.116455 -0.0103633)
      PathPoint P5: humerus (0.0218983 -0.168463 -0.00605085)
      MovingPathPoint P6: radius (0.00272316 -0.035 -0.0135667) x_coordinate=pro_sup y_coordinate=pro_sup
          z_coordinate=pro_sup
        x_location: SimmSpline: x=(-1.57561 1.57823) y=(-0.0055 0.01096)
        y_location: PiecewiseLinearFunction: x=(-1.57561 0 1.57561) y=(-0.0282 -0.035 -0.0392)
        z_location: SimmSpline: x=(-1.57561 0.0866167 1.57561) y=(-0.01 -0.01358 -0.01083)
      PathPoint P8: radius (-0.0019209 -0.0360169 -0.0019209)
      PathWrap: wrap_object=Elbow_BIC_BRD method=hybrid
    Thelen2003Muscle BRA: min_control=0 max_control=1 optimal_force=1 max_isometric_force=1177.37
        optimal_fiber_length=0.0858 tendon_slack_length=0.0535 pennation_angle_at_optimal=0 max_contraction_velocity=0
      PathPoint P1: humerus (0.00653107 -0.167023 -0.00345763)
      ConditionalPathPoint P2: humerus (0.018191 -0.274295 -0.010613) range=(0 0.813149) coordinate=elbow_flexion
      ConditionalPathPoint P3: ulna (0.00478305 -0.0140514 0.00122938) range=(0 0.813149) coordinate=elbow_flexion
      PathPoint P4: ulna (-0.00307345 -0.0229548 0.000864407)
    Thelen2003Muscle BRD: min_control=0 max_control=1 optimal_force=1 max_isometric_force=276
        optimal_fiber_length=0.1726 tendon_slack_length=0.133 pennation_angle_at_optimal=0 max_contraction_velocity=0
      PathPoint P1: humerus (-0.00941243 -0.191735 0.00214181)
      PathPoint P2: radius (0.0343554 -0.122381 0.0222345)
      PathPoint P3: radius (0.0402429 -0.21226 0.0215141)
      PathWrap: wrap_object=Elbow_BIC_BRD method=hybrid
    Thelen2003Muscle ECRL: min_control=0 max_control=1 optimal_force=1 max_isometric_force=337.3
        optimal_fiber_length=0.081 tendon_slack_length=0.244 pennation_angle_at_optimal=0 max_contraction_velocity=0
      PathPoint P1: humerus (-0.0070113 -0.250582 0.00874011)
      PathPoint P2: radius (0.0306864 -0.129306 0.026691)
      PathPoint P3: radius (0.040752 -0.227473 0.0347684)
      PathPoint P4: hand (0.016491 -0.0203808 0.00559943)
      PathWrap: wrap_object=Elbow_PT_ECRL method=hybrid
      PathWrap: wrap_object=ECRL method=hybrid
    Thelen2003Muscle ECRB: min_control=0 max_control=1 optimal_force=1 max_isometric_force=252.5
        optimal_fiber_length=0.0585 tendon_slack_length=0.2223 pennation_angle_at_optimal=0.1570796
        max_contraction_velocity=0
      PathPoint P1: humerus (0.0129565 -0.278992 0.0163085)
      PathPoint P2: radius (0.0279011 -0.125685 0.0229068)
      PathPoint P3: radius (0.0340864 -0.219031 0.037813)
      PathPoint P4: hand (0.00480226 -0.0109107 0.00816384)
      PathWrap: wrap_object=ECRB method=hybrid
    Thelen2003Muscle ECU: min_control=0 max_control=1 optimal_force=1 max_isometric_force=192.9
        optimal_fiber_length=0.0622 tendon_slack_length=0.2285 pennation_angle_at_optimal=0.0698132
        max_contraction_velocity=0
      PathPoint P1: humerus (0.000797175 -0.278099 0.0180565)
      PathPoint P2: ulna (-0.0133599 -0.0307441 0.0283045)
      PathPoint P3: ulna (-0.0163757 -0.0521333 0.0275458)
      PathPoint P4: ulna (-0.0172209 -0.0919439 0.0314836)
      PathPoint P5: radius (-0.013648 -0.217984 0.0334333)
      PathPoint P6: hand (-0.0216198 -0.0134559 -0.00122938)
      PathWrap: wrap_object=ECU method=hybrid
    Thelen2003Muscle FCR: min_control=0 max_control=1 optimal_force=1 max_isometric_force=407.9
        optimal_fiber_length=0.0628 tendon_slack_length=0.244 pennation_angle_at_optimal=0.0523599
        max_contraction_velocity=0
      PathPoint P1: humerus (0.00728023 -0.267063 -0.0355847)
      PathPoint P2: radius (0.0202655 -0.210752 0.00121977)
      PathPoint P3: hand (0.0107955 -0.0177107 -0.00401469)
      PathWrap: wrap_object=Elbow_PT_ECRL method=hybrid
      PathWrap: wrap_object=FCR method=hybrid
    Thelen2003Muscle FCU: min_control=0 max_control=1 optimal_force=1 max_isometric_force=479.8
        optimal_fiber_length=0.0509 tendon_slack_length=0.265 pennation_angle_at_optimal=0.2094395
        max_contraction_velocity=0
      PathPoint P1: humerus (0.00210339 -0.266429 -0.0372655)
      MovingPathPoint P2: radius (0.00949 -0.1841 0.0005) x_coordinate=pro_sup y_coordinate=pro_sup
          z_coordinate=pro_sup
        x_location: SimmSpline: x=(-1.5708 0 1.5708) y=(0.00279 0.00949 0.01869)
        y_location: SimmSpline: x=(-1.5708 0 1.5708) y=(-0.1838 -0.1841 -0.1821)
        z_location: SimmSpline: x=(-1.5708 0 1.5708) y=(0.0069 0.0005 0.0002)
      PathPoint P3: radius (0.0103921 -0.21444 0.00930678)
      PathPoint P4: hand (-0.0195548 -0.016952 -0.0072226)
      PathWrap: wrap_object=FCU method=hybrid
      PathWrap: wrap_object=Elbow_PT_ECRL method=hybrid
    Thelen2003Muscle PL: min_control=0 max_control=1 optimal_force=1 max_isometric_force=101
        optimal_fiber_length=0.0638 tendon_slack_length=0.2694 pennation_angle_at_optimal=0.06981317
        max_contraction_velocity=0
      PathPoint P1: humerus (0.00438927 -0.264307 -0.0371215)
      PathPoint P2: radius (0.024309 -0.229692 -0.00265085)
      PathPoint P3: hand (0.00880734 -0.0182294 -0.0168463)
      PathPoint P4: hand (0.00218023 -0.0297356 0.00473503)
      PathWrap: wrap_object=PL method=hybrid
      PathWrap: wrap_object=Elbow_PT_ECRL method=hybrid
    Thelen2003Muscle PT: min_control=0 max_control=1 optimal_force=1 max_isometric_force=557.2
        optimal_fiber_length=0.0492 tendon_slack_length=0.099 pennation_angle_at_optimal=0.1745329
        max_contraction_velocity=0
      PathPoint P1: humerus (0.00345763 -0.264989 -0.0350565)
      PathPoint P2: ulna (0.00812542 -0.032396 -0.0137537)
      MovingPathPoint P3: ulna (0.01219 -0.06516 -0.00219) x_coordinate=pro_sup y_coordinate=pro_sup
          z_coordinate=pro_sup
        x_location: PiecewiseLinearFunction: x=(-1.5708 1.5708) y=(0.01884 0.00554)
        y_location: SimmSpline: x=(-1.5708 1.5708) y=(-0.06086 -0.06946)
        z_location: SimmSpline: x=(-1.5708 1.5708) y=(0.00506 -0.00944)
      ConditionalPathPoint P4: radius (0.0226667 -0.0897062 0.00902825) range=(-1.5708 0.509636) coordinate=pro_sup
      PathPoint P5: radius (0.0243955 -0.104497 0.0190169)
      PathWrap: wrap_object=Elbow_PT_ECRL method=hybrid
    Thelen2003Muscle PQ: min_control=0 max_control=1 optimal_force=1 max_isometric_force=284.7
        optimal_fiber_length=0.0282 tendon_slack_length=0.005 pennation_angle_at_optimal=0.1745329
        max_contraction_velocity=0
      PathPoint P1: radius (0.0311667 -0.192071 0.0188441)
      PathPoint P2: ulna (0.00185367 -0.201426 0.0348836)
      PathWrap: wrap_object=PQ2 method=hybrid
      PathWrap: wrap_object=PQ1 method=hybrid
    Thelen2003Muscle FDSL: min_control=0 max_control=1 optimal_force=1 max_isometric_force=75.3
        optimal_fiber_length=0.0515 tendon_slack_length=0.3386 pennation_angle_at_optimal=0.08726646
        max_contraction_velocity=0
      PathPoint P1: humerus (0.0040435 -0.265066 -0.0371119)
      PathPoint P2: radius (0.0132254 -0.179777 0.00196893)
      PathPoint P3: hand (-0.00225706 -0.0133791 -0.0132158)
      PathPoint P4: hand (-0.019161 -0.0411169 -0.00712655)
      PathPoint P5: hand (-0.0196316 -0.0574446 -0.0180373)
      PathPoint P6: hand (-0.0164525 -0.0695847 -0.0264412)
      PathPoint P7: hand (-0.0111028 -0.0698345 -0.0351141)
      PathPoint P8: hand (-0.0101712 -0.0698345 -0.0364588)
      PathWrap: wrap_object=FDS method=hybrid
      PathWrap: wrap_object=Elbow_PT_ECRL method=hybrid
      PathWrap: wrap_object=_5rdmcp_FDS method=hybrid range=(4 5)
      PathWrap: wrap_object=Fifthpm_FDS method=hybrid range=(6 7)
    Thelen2003Muscle FDSR: min_control=0 max_control=1 optimal_force=1 max_isometric_force=171.2
        optimal_fiber_length=0.0736 tendon_slack_length=0.328 pennation_angle_at_optimal=0.06981317
        max_contraction_velocity=0
      PathPoint P1: humerus (0.00460057 -0.267774 -0.0358345)
      PathPoint P2: radius (0.0150887 -0.179278 0.00256441)
      PathPoint P3: hand (-0.000787571 -0.0129085 -0.0130525)
      PathPoint P4: hand (-0.00938362 -0.0497418 3.84181e-5)
      PathPoint P5: hand (-0.0127068 -0.0640621 -0.00979661)
      PathPoint P6: hand (-0.00756836 -0.0770955 -0.0240401)
      PathPoint P7: hand (-0.00287175 -0.0780367 -0.0326073)
      PathPoint P8: hand (0.00059548 -0.0777196 -0.0373807)
      PathWrap: wrap_object=FDS method=hybrid
      PathWrap: wrap_object=Elbow_PT_ECRL method=hybrid
      PathWrap: wrap_object=_4rdmcp_FDS method=hybrid range=(4 5)
      PathWrap: wrap_object=Fourthpm_FDS method=hybrid range=(6 7)
    Thelen2003Muscle FDSM: min_control=0 max_control=1 optimal_force=1 max_isometric_force=258.8
        optimal_fiber_length=0.0749 tendon_slack_length=0.295 pennation_angle_at_optimal=0.1221731
        max_contraction_velocity=0
      PathPoint P1: ulna (-0.00642542 -0.0260571 -0.00183446)
      PathPoint P2: radius (0.018239 -0.179662 0.00407232)
      PathPoint P3: hand (0.00653107 -0.0132254 -0.0134367)
      PathPoint P4: hand (0.00452373 -0.0320023 -0.0012678)
      PathPoint P5: hand (0.00520565 -0.0543616 0.000576271)
      PathPoint P6: hand (0.00533051 -0.0693831 -0.00324633)
      PathPoint P7: hand (0.0112085 -0.0846158 -0.0160395)
      PathPoint P8: hand (0.0124955 -0.0851921 -0.0285927)
      PathPoint P9: hand (0.0150599 -0.082378 -0.036161)
      PathWrap: wrap_object=FDS method=hybrid
      PathWrap: wrap_object=_3rdmcp_FDS method=hybrid range=(5 6)
      PathWrap: wrap_object=Thirdpm_FDS method=hybrid range=(7 8)
    Thelen2003Muscle FDSI: min_control=0 max_control=1 optimal_force=1 max_isometric_force=162.5
        optimal_fiber_length=0.0835 tendon_slack_length=0.275 pennation_angle_at_optimal=0.1047198
        max_contraction_velocity=10
      PathPoint P1: ulna (-0.00649266 -0.0270751 -0.00131582)
      PathPoint P2: radius (0.0206017 -0.178865 0.00530169)
      PathPoint P3: hand (0.00853842 -0.0131198 -0.0133215)
      PathPoint P4: hand (0.0101904 -0.0363723 0.000230508)
      PathPoint P5: hand (0.0171153 -0.0490599 0.00401469)
      PathPoint P6: hand (0.0177588 -0.0700842 -0.00360169)
      PathPoint P7: hand (0.0257209 -0.0836938 -0.0173266)
      PathPoint P8: hand (0.0256153 -0.0839435 -0.0257209)
      PathPoint P9: hand (0.025548 -0.0829158 -0.0278819)
      PathWrap: wrap_object=FDS method=hybrid
      PathWrap: wrap_object=_2rdmcp_FDS method=hybrid range=(5 6)
      PathWrap: wrap_object=Secondpm_FDS method=hybrid range=(7 8)
    Thelen2003Muscle FDPL: min_control=0 max_control=1 optimal_force=1 max_isometric_force=236.8
        optimal_fiber_length=0.0749 tendon_slack_length=0.2819 pennation_angle_at_optimal=0.1396263
        max_contraction_velocity=10
      PathPoint P1: ulna (-0.00603164 -0.0308689 0.00243955)
      PathPoint P2: radius (0.0135328 -0.177837 0.00826949)
      PathPoint P3: hand (-0.000845198 -0.00986384 -0.0114102)
      PathPoint P4: hand (-0.0178164 -0.0446226 -0.00704011)
      PathPoint P5: hand (-0.017365 -0.0561 -0.0149831)
      PathPoint P6: hand (-0.0137153 -0.0700073 -0.0257689)
      PathPoint P7: hand (-0.00883616 -0.0718706 -0.0353831)
      PathPoint P8: hand (-0.00299661 -0.0711215 -0.0400028)
      PathPoint P9: hand (0.00428362 -0.0677983 -0.0447282)
      PathWrap: wrap_object=FDP method=hybrid
      PathWrap: wrap_object=_5rdmcp_FDP method=hybrid range=(4 5)
      PathWrap: wrap_object=Fifthpm_FDP method=hybrid range=(6 7)
      PathWrap: wrap_object=Fifthmd_flex method=hybrid range=(8 9)
    Thelen2003Muscle FDPR: min_control=0 max_control=1 optimal_force=1 max_isometric_force=172.9
        optimal_fiber_length=0.0798 tendon_slack_length=0.2915 pennation_angle_at_optimal=0.1221731
        max_contraction_velocity=0
      PathPoint P1: ulna (-0.00482147 -0.0324056 0.00262203)
      PathPoint P2: radius (0.0151751 -0.178923 0.00771243)
      PathPoint P3: hand (0.00101808 -0.0113045 -0.0113718)
      PathPoint P4: hand (-0.00821186 -0.0532282 0.000845198)
      PathPoint P5: hand (-0.0103633 -0.0632746 -0.00784689)
      PathPoint P6: hand (-0.00525367 -0.0783153 -0.0216678)
      PathPoint P7: hand (-0.000537853 -0.0790452 -0.0323384)
      PathPoint P8: hand (0.00584915 -0.0752706 -0.040704)
      PathPoint P9: hand (0.0116311 -0.0708814 -0.0466588)
      PathWrap: wrap_object=FDP method=hybrid
      PathWrap: wrap_object=_4rdmcp_FDP method=hybrid range=(4 5)
      PathWrap: wrap_object=Fourthpm_FDP method=hybrid range=(6 7)
      PathWrap: wrap_object=Fourthmd_flex method=hybrid range=(8 9)
    Thelen2003Muscle FDPM: min_control=0 max_control=1 optimal_force=1 max_isometric_force=212.4
        optimal_fiber_length=0.0835 tendon_slack_length=0.303 pennation_angle_at_optimal=0.1047198
        max_contraction_velocity=0
      PathPoint P1: ulna (-0.00501356 -0.0319542 0.00201695)
      PathPoint P2: radius (0.0183062 -0.179067 0.00753955)
      PathPoint P3: hand (0.00321751 -0.0122938 -0.0109876)
      PathPoint P4: hand (0.00290056 -0.0331068 -0.00586836)
      PathPoint P5: hand (0.00242034 -0.0563113 0.00117175)
      PathPoint P6: hand (0.00273729 -0.0670876 -0.0012774)
      PathPoint P7: hand (0.0082887 -0.0843179 -0.0174322)
      PathPoint P8: hand (0.00962373 -0.0841932 -0.0284678)
      PathPoint P9: hand (0.0156842 -0.0783441 -0.042596)
      PathPoint P10: hand (0.018335 -0.0735994 -0.050222)
      PathWrap: wrap_object=FDP method=hybrid
      PathWrap: wrap_object=_3rdmcp_FDP method=hybrid range=(5 6)
      PathWrap: wrap_object=Thirdpm_FDP method=hybrid range=(7 8)
      PathWrap: wrap_object=Thirdmd_flex method=hybrid range=(9 10)
    Thelen2003Muscle FDPI: min_control=0 max_control=1 optimal_force=1 max_isometric_force=197.3
        optimal_fiber_length=0.0749 tendon_slack_length=0.3015 pennation_angle_at_optimal=0.1221731
        max_contraction_velocity=0
      PathPoint P1: ulna (-0.00621412 -0.030504 0.00268927)
      PathPoint P2: radius (0.0199774 -0.17826 0.00878814)
      PathPoint P3: hand (0.00860565 -0.0112181 -0.0116407)
      PathPoint P4: hand (0.0184599 -0.0532282 0.00420678)
      PathPoint P5: hand (0.0199102 -0.0674333 -0.00274689)
      PathPoint P6: hand (0.0278915 -0.0824836 -0.0171153)
      PathPoint P7: hand (0.0280836 -0.0832904 -0.0265949)
      PathPoint P8: hand (0.0279876 -0.0790932 -0.0382164)
      PathPoint P9: hand (0.0273441 -0.0746367 -0.0457751)
      PathWrap: wrap_object=FDP method=hybrid
      PathWrap: wrap_object=_2rdmcp_FDP method=hybrid range=(4 5)
      PathWrap: wrap_object=Secondpm_FDP method=hybrid range=(6 7)
      PathWrap: wrap_object=Secondmd_flex method=hybrid range=(8 9)
    Thelen2003Muscle EDCL: min_control=0 max_control=1 optimal_force=1 max_isometric_force=39.4
        optimal_fiber_length=0.065 tendon_slack_length=0.335 pennation_angle_at_optimal=0.03490659
        max_contraction_velocity=0
      PathPoint P1: humerus (-0.000384181 -0.276908 0.0179605)
      MovingPathPoint P2: radius (0.0013 -0.03888 0.01405) x_coordinate=pro_sup y_coordinate=pro_sup
          z_coordinate=pro_sup
        x_location: SimmSpline: x=(-1.5708 0 1.5708) y=(0.0121 0.0013 -0.0095)
        y_location: SimmSpline: x=(-1.5708 0 1.5708) y=(-0.04018 -0.03888 -0.03508)
        z_location: SimmSpline: x=(-1.5708 0 1.5708) y=(0.01055 0.01405 0.01316)
      PathPoint P3: radius (0.00953729 -0.214219 0.0347492)
      PathPoint P4: hand (-0.0236655 -0.0422791 0.00162316)
      PathPoint P5: hand (-0.0228684 -0.0454678 0.000739546)
      PathPoint P6: hand (-0.0230028 -0.0635147 -0.00961412)
      PathPoint P7: hand (-0.0172689 -0.0753667 -0.0260379)
      PathPoint P8: hand (-0.0113141 -0.0756548 -0.0362955)
      PathPoint P9: hand (-0.00144068 -0.0728599 -0.0440463)
      PathPoint P10: hand (0.00193051 -0.071909 -0.0460441)
      PathWrap: wrap_object=EDCL method=hybrid range=(3 4)
      PathWrap: wrap_object=_5rdmcp_ext method=hybrid range=(5 6)
      PathWrap: wrap_object=Fifthpm_ext method=hybrid range=(7 8)
      PathWrap: wrap_object=Fifthmd_ext method=hybrid range=(9 10)
    Thelen2003Muscle EDCR: min_control=0 max_control=1 optimal_force=1 max_isometric_force=109.2
        optimal_fiber_length=0.0626 tendon_slack_length=0.365 pennation_angle_at_optimal=0.05235988
        max_contraction_velocity=0
      PathPoint P1: humerus (-0.00149831 -0.277916 0.0171153)
      MovingPathPoint P2: radius (0.0026 -0.03991 0.01552) x_coordinate=pro_sup y_coordinate=pro_sup
          z_coordinate=pro_sup
        x_location: SimmSpline: x=(-1.5708 0 1.5708) y=(0.0134 0.0026 -0.0082)
        y_location: SimmSpline: x=(-1.5708 0 1.5708) y=(-0.04121 -0.03991 -0.03611)
        z_location: SimmSpline: x=(-1.5708 0 1.5708) y=(0.01202 0.01552 0.01463)
      PathPoint P3: radius (0.00847119 -0.214815 0.0411458)
      PathPoint P4: hand (-0.0150215 -0.0533051 0.00897062)
      PathPoint P5: hand (-0.0137056 -0.0558887 0.0111508)
      PathPoint P6: hand (-0.0151751 -0.0693062 -0.0040435)
      PathPoint P7: hand (-0.00792373 -0.0838955 -0.0217062)
      PathPoint P8: hand (-0.00261243 -0.0845774 -0.0327418)
      PathPoint P9: hand (0.00732825 -0.0770859 -0.0447379)
      PathPoint P10: hand (0.0102672 -0.0750017 -0.0474559)
      PathWrap: wrap_object=EDCR method=hybrid
      PathWrap: wrap_object=_4rdmcp_ext method=hybrid range=(5 6)
      PathWrap: wrap_object=Fourthpm_ext method=hybrid range=(7 8)
      PathWrap: wrap_object=Fourthmd_ext method=hybrid range=(9 10)
    Thelen2003Muscle EDCM: min_control=0 max_control=1 optimal_force=1 max_isometric_force=94.4
        optimal_fiber_length=0.0724 tendon_slack_length=0.365 pennation_angle_at_optimal=0.05235988
        max_contraction_velocity=0
      PathPoint P1: humerus (0.000489831 -0.278377 0.0187192)
      MovingPathPoint P2: radius (0.00316 -0.03948 0.01528) x_coordinate=pro_sup y_coordinate=pro_sup
          z_coordinate=pro_sup
        x_location: SimmSpline: x=(-1.5708 0 1.5708) y=(0.01396 0.00316 -0.00764)
        y_location: SimmSpline: x=(-1.5708 0 1.5708) y=(-0.04078 -0.03948 -0.03568)
        z_location: SimmSpline: x=(-1.5708 0 1.5708) y=(0.01178 0.01528 0.01439)
      PathPoint P3: radius (0.0138305 -0.214402 0.0405599)
      PathPoint P4: hand (0.000374576 -0.0506542 0.0143203)
      PathPoint P5: hand (-0.000835593 -0.0535356 0.0139458)
      PathPoint P6: hand (0.00178644 -0.0741277 0.0057339)
      PathPoint P7: hand (0.00967175 -0.0894469 -0.0170384)
      PathPoint P8: hand (0.0126876 -0.0918 -0.0293514)
      PathPoint P9: hand (0.0178356 -0.0818785 -0.0457079)
      PathPoint P10: hand (0.0197469 -0.0767689 -0.0512977)
      PathPoint P11: hand (0.0210819 -0.0739644 -0.0543904)
      PathWrap: wrap_object=EDCM method=hybrid range=(1 4)
      PathWrap: wrap_object=Thirdmd_ext method=hybrid range=(9 10)
      PathWrap: wrap_object=Thirdpm_ext method=hybrid range=(7 8)
      PathWrap: wrap_object=_3rdmcp_ext method=hybrid range=(5 6)
    Thelen2003Muscle EDCI: min_control=0 max_control=1 optimal_force=1 max_isometric_force=48.8
        optimal_fiber_length=0.07 tendon_slack_length=0.365 pennation_angle_at_optimal=0.05235988
        max_contraction_velocity=0
      PathPoint P1: humerus (0.000624294 -0.277551 0.0179508)
      MovingPathPoint P2: radius (0.00228 -0.03918 0.01483) x_coordinate=pro_sup y_coordinate=pro_sup
          z_coordinate=pro_sup
        x_location: SimmSpline: x=(-1.5708 0 1.5708) y=(0.01308 0.00228 -0.00852)
        y_location: SimmSpline: x=(-1.5708 0 1.5708) y=(-0.04048 -0.03918 -0.03538)
        z_location: SimmSpline: x=(-1.5708 0 1.5708) y=(0.01133 0.01483 0.01394)
      PathPoint P3: radius (0.0147237 -0.214315 0.0403006)
      PathPoint P4: hand (0.0148198 -0.0449492 0.0157418)
      PathPoint P5: hand (0.0182198 -0.054304 0.0138113)
      PathPoint P6: hand (0.0191514 -0.0737435 0.00570508)
      PathPoint P7: hand (0.0282853 -0.0879966 -0.0119576)
      PathPoint P8: hand (0.0299757 -0.0897925 -0.0279011)
      PathPoint P9: hand (0.0289384 -0.0815136 -0.0409921)
      PathPoint P10: hand (0.0281316 -0.0778254 -0.047696)
      PathWrap: wrap_object=EDCI method=hybrid range=(3 4)
      PathWrap: wrap_object=_2rdmcp_ext method=hybrid range=(5 6)
      PathWrap: wrap_object=Secondpm_ext method=hybrid range=(7 8)
      PathWrap: wrap_object=Secondmd_ext method=hybrid range=(9 10)
    Thelen2003Muscle EDM: min_control=0 max_control=1 optimal_force=1 max_isometric_force=72.4
        optimal_fiber_length=0.0675 tendon_slack_length=0.335 pennation_angle_at_optimal=0.05235988
        max_contraction_velocity=0
      PathPoint P1: humerus (0.000854802 -0.277753 0.0177395)
      PathPoint P2: ulna (-0.0093836 -0.0375249 0.0296206)
      PathPoint P3: ulna (-0.0072514 -0.0794006 0.0350181)
      PathPoint P4: radius (0.00436045 -0.217456 0.0353254)
      PathPoint P5: hand (-0.0197757 -0.00991186 0.00357288)
      PathPoint P6: hand (-0.0246164 -0.0453525 0.000220904)
      PathPoint P7: hand (-0.0244819 -0.062535 -0.0105458)
      PathPoint P8: hand (-0.0185655 -0.0750113 -0.0261051)
      PathPoint P9: hand (-0.0129277 -0.0757989 -0.0374)
      PathPoint P10: hand (-0.00207458 -0.0722356 -0.0440751)
      PathPoint P11: hand (0.0012678 -0.0705452 -0.0461305)
      PathWrap: wrap_object=EDM method=hybrid range=(4 5)
      PathWrap: wrap_object=Fifthmd_ext method=hybrid range=(10 11)
      PathWrap: wrap_object=Fifthpm_ext method=hybrid range=(8 9)
      PathWrap: wrap_object=_5rdmcp_ext method=hybrid range=(6 7)
    Thelen2003Muscle EIP: min_control=0 max_control=1 optimal_force=1 max_isometric_force=47.3
        optimal_fiber_length=0.0589 tendon_slack_length=0.21 pennation_angle_at_optimal=0.1047198
        max_contraction_velocity=0
      PathPoint P1: ulna (-0.00378418 -0.159934 0.0353638)
      PathPoint P2: ulna (0.00164237 -0.167781 0.0388887)
      PathPoint P3: radius (0.0103345 -0.21882 0.035191)
      PathPoint P4: hand (0.00372655 -0.0214565 0.0113718)
      PathPoint P5: hand (0.0162605 -0.0541695 0.0132254)
      PathPoint P6: hand (0.0166638 -0.073878 0.00558023)
      PathPoint P7: hand (0.0265565 -0.0894565 -0.0145124)
      PathPoint P8: hand (0.0276514 -0.0906379 -0.0271136)
      PathPoint P9: hand (0.027565 -0.0818688 -0.0412514)
      PathPoint P10: hand (0.0272192 -0.0747712 -0.0528345)
      PathWrap: wrap_object=Extensor_ellipse method=hybrid
      PathWrap: wrap_object=_2rdmcp_ext method=hybrid range=(5 6)
      PathWrap: wrap_object=Secondpm_ext method=hybrid range=(7 8)
      PathWrap: wrap_object=Secondmd_ext method=hybrid range=(9 10)
    Thelen2003Muscle EPL: min_control=0 max_control=1 optimal_force=1 max_isometric_force=88.3
        optimal_fiber_length=0.054 tendon_slack_length=0.2305 pennation_angle_at_optimal=0.1047198
        max_contraction_velocity=0
      PathPoint P1: ulna (-0.0135616 -0.0932215 0.0283525)
      PathPoint P2: radius (0.00119096 -0.131275 0.0218023)
      PathPoint P3: radius (0.0259514 -0.21007 0.0367661)
      PathPoint P4: radius (0.0324825 -0.218541 0.044248)
      PathPoint P5: radius (0.0406655 -0.228309 0.0400797)
      PathPoint P6: hand (0.0233198 0.000134463 0.00583955)
      PathPoint P7: hand (0.0224554 -0.00880734 -0.000374576)
      PathPoint P8: hand (0.0279011 -0.0137056 -0.00469661)
      PathPoint P9: hand (0.0423944 -0.0328186 -0.0174226)
      PathPoint P10: hand (0.0467452 -0.0446226 -0.0238864)
      PathPoint P11: hand (0.0456311 -0.0673277 -0.0362475)
      PathPoint P12: hand (0.0385237 -0.0726582 -0.0411362)
      PathWrap: wrap_object=MPthumb method=hybrid
    Thelen2003Muscle EPB: min_control=0 max_control=1 optimal_force=1 max_isometric_force=46
        optimal_fiber_length=0.0675 tendon_slack_length=0.1155 pennation_angle_at_optimal=0.122173
        max_contraction_velocity=0
      PathPoint P1: radius (0.0184791 -0.141138 0.020304)
      PathPoint P2: radius (0.0218599 -0.152299 0.025596)
      PathPoint P3: radius (0.0367949 -0.18942 0.0368237)
      PathPoint P4: radius (0.0502797 -0.226772 0.0259226)
      PathPoint P5: hand (0.0299949 0.00245876 -0.00314068)
      PathPoint P6: hand (0.0285446 -0.00762599 -0.0137921)
      PathPoint P7: hand (0.0424712 -0.0316949 -0.0232621)
      PathPoint P8: hand (0.0434893 -0.0459576 -0.0306)
      PathWrap: wrap_object=MPthumb method=hybrid
    Thelen2003Muscle FPL: min_control=0 max_control=1 optimal_force=1 max_isometric_force=201
        optimal_fiber_length=0.0552 tendon_slack_length=0.197 pennation_angle_at_optimal=0.1221731
        max_contraction_velocity=0
      PathPoint P1: radius (0.00932597 -0.0908395 0.0169904)
      PathPoint P2: radius (0.0159243 -0.129901 0.0183927)
      PathPoint P3: radius (0.0179508 -0.172228 0.0190938)
      PathPoint P4: radius (0.0364972 -0.222546 0.0151751)
      MovingPathPoint P5: hand (0.01869 0.00882 -0.01547) x_coordinate=flexion y_coordinate=flexion
          z_coordinate=flexion
        x_location: SimmSpline: x=(-1.22173 0 1.22173) y=(0.01869 0.01869 0.01549)
        y_location: SimmSpline: x=(-1.22173 0 1.22173) y=(0.00882 0.00882 -0.00078)
        z_location: SimmSpline: x=(-1.22173 0 1.22173) y=(-0.01547 -0.01547 -0.02087)
      PathPoint P6: hand (0.011948 -0.0211972 -0.0200638)
      PathPoint P7: hand (0.015761 -0.0251734 -0.0213316)
      PathPoint P8: hand (0.0235983 -0.0316373 -0.0214853)
      PathPoint P9: hand (0.027152 -0.052652 -0.0293418)
      PathPoint P10: hand (0.0337215 -0.0626119 -0.0360073)
      PathPoint P11: hand (0.0339328 -0.0735322 -0.0395514)
      PathWrap: wrap_object=FPL method=hybrid
      PathWrap: wrap_object=IPthumb method=hybrid range=(10 11)
      PathWrap: wrap_object=MPthumb method=hybrid
    Thelen2003Muscle APL: min_control=0 max_control=1 optimal_force=1 max_isometric_force=116.7
        optimal_fiber_length=0.0713 tendon_slack_length=0.1295 pennation_angle_at_optimal=0.1396263
        max_contraction_velocity=0
      PathPoint P1: radius (0.0110836 -0.091022 0.0161452)
      PathPoint P2: radius (0.0291017 -0.134175 0.0336831)
      PathPoint P3: radius (0.0383508 -0.154364 0.0326554)
      PathPoint P4: radius (0.0422311 -0.171393 0.0301006)
      PathPoint P5: radius (0.0528729 -0.221711 0.0227435)
      MovingPathPoint P6: hand (0.03385 0.00634 -0.00745) x_coordinate=flexion y_coordinate=flexion
          z_coordinate=flexion
        x_location: SimmSpline: x=(-1.22173 0 1.22173) y=(0.03385 0.03385 0.03135)
        y_location: SimmSpline: x=(-1.22173 0 1.22173) y=(0.00634 0.00634 0.00534)
        z_location: SimmSpline: x=(-1.22173 0 1.22173) y=(-0.00745 -0.00745 -0.01245)
      PathPoint P7: hand (0.0248469 0.00196893 -0.0158475)
      PathPoint P8: hand (0.0276418 -0.00647345 -0.0179605)
      PathPoint P9: hand (0.0295435 -0.015204 -0.0181045)
    Thelen2003Muscle DELT1_l: min_control=0 max_control=1 optimal_force=1 max_isometric_force=1218.9
        optimal_fiber_length=0.0976 tendon_slack_length=0.097 pennation_angle_at_optimal=0.3839724
        max_contraction_velocity=0
      PathPoint DELT1-P1_l: humerus_l (0.00860565 -0.114131 -0.00561864)
      PathPoint DELT1-P2_l: humerus_l (0.0155881 -0.105967 -0.00395706)
      PathPoint DELT1-P3_l: scapula_l (0.0417508 -0.0312338 -0.000950846)
      PathPoint DELT1-P4_l: clavicle_l (-0.0134463 0.0106226 -0.0770379)
      PathWrap: wrap_object=delt2hum_l method=hybrid
      PathWrap: wrap_object=DELT1hh_l method=hybrid range=(2 3)
    Thelen2003Muscle DELT2_l: min_control=0 max_control=1 optimal_force=1 max_isometric_force=1103.5
        optimal_fiber_length=0.1078 tendon_slack_length=0.1095 pennation_angle_at_optimal=0.2617994
        max_contraction_velocity=0
      PathPoint DELT2-P1_l: humerus_l (0.00442768 -0.130727 -0.00537853)
      MovingPathPoint default: clavicle_l (0.02 0.00216056 -0.183675) x_coordinate=shoulder_elv_l
          y_coordinate=shoulder_elv_l z_coordinate=shoulder_elv_l
          x_location=PiecewiseLinearFunction(x=0 2.1 3.14, y=0.02 0.02 0.015)
        y_location: PiecewiseLinearFunction: x=(0 1.507 3.14) y=(-0.01 0.025 0.055)
        z_location: SimmSpline: x=(0 1.507 3.14) y=(-0.186 -0.171 -0.126)
      PathPoint DELT2-P3_l: scapula_l (4.80226e-5 0.00282373 -0.0214469)
      PathPoint DELT2-P4_l: scapula_l (-0.0103537 -0.000326554 -0.0059548)
      PathWrap: wrap_object=Deltoid2_l method=hybrid
      PathWrap: wrap_object=delt2hum_l method=hybrid
      PathWrap: wrap_object=DELT_TMAJ_LAT_PEC_CORBhh_l method=hybrid
    Thelen2003Muscle DELT3_l: min_control=0 max_control=1 optimal_force=1 max_isometric_force=201.6
        optimal_fiber_length=0.1367 tendon_slack_length=0.038 pennation_angle_at_optimal=0.3141593
        max_contraction_velocity=0
      PathPoint DELT3-P1_l: scapula_l (-0.0535326 0.00117175 0.0241266)
      PathPoint DELT3-P2_l: scapula_l (-0.069604 -0.0315508 -0.0118424)
      PathPoint DELT3-P3_l: humerus_l (0.00197853 -0.0730136 -0.0100367)
      PathWrap: wrap_object=Delt3_l method=hybrid range=(1 2)
      PathWrap: wrap_object=delt3hum_l method=hybrid
      PathWrap: wrap_object=DELT_TMAJ_LAT_PEC_CORBhh_l method=hybrid
    Thelen2003Muscle SUPSP_l: min_control=0 max_control=1 optimal_force=1 max_isometric_force=499.2
        optimal_fiber_length=0.0682 tendon_slack_length=0.0395 pennation_angle_at_optimal=0.1221731
        max_contraction_velocity=0
      PathPoint SUPSP-P1_l: humerus_l (0.00245876 0.0102096 -0.0249045)
      PathPoint SUPSP-P2_l: scapula_l (-0.0184215 0.00121977 0.0122073)
      PathPoint SUPSP-P3_l: scapula_l (-0.0422599 -0.014522 0.0562345)
      PathWrap: wrap_object=SUPSP_l method=hybrid
    Thelen2003Muscle INFSP_l: min_control=0 max_control=1 optimal_force=1 max_isometric_force=1075.8
        optimal_fiber_length=0.0755 tendon_slack_length=0.0308 pennation_angle_at_optimal=0.3316126
        max_contraction_velocity=0
      PathPoint INFSP-P1_l: humerus_l (-0.00851921 0.00464859 -0.0235119)
      PathPoint INFSP-P2_l: scapula_l (-0.0709006 -0.0525944 0.0459192)
      PathWrap: wrap_object=INFSP_l method=hybrid
      PathWrap: wrap_object=INFSP_and_TMIN_hum_head_l method=hybrid
    Thelen2003Muscle SUBSC_l: min_control=0 max_control=1 optimal_force=1 max_isometric_force=1306.9
        optimal_fiber_length=0.0873 tendon_slack_length=0.033 pennation_angle_at_optimal=0.3490659
        max_contraction_velocity=0
      PathPoint SUBSC-P1_l: humerus_l (0.0134751 0.0080678 0.0127836)
      PathPoint SUBSC-P2_l: scapula_l (-0.0175859 -0.0501644 0.0235983)
      PathPoint SUBSC-P3_l: scapula_l (-0.0695944 -0.0378706 0.0621893)
      PathWrap: wrap_object=SUBSCAP_l method=hybrid
    Thelen2003Muscle TMIN_l: min_control=0 max_control=1 optimal_force=1 max_isometric_force=269.5
        optimal_fiber_length=0.0741 tendon_slack_length=0.0713 pennation_angle_at_optimal=0.418879
        max_contraction_velocity=0
      PathPoint TMIN-P1_l: humerus_l (-0.0010565 -0.0121401 -0.0207073)
      PathPoint TMIN-P2_l: scapula_l (-0.0909834 -0.0767496 0.0454965)
      PathPoint TMIN-P3_l: scapula_l (-0.0926164 -0.0779983 0.0508847)
      PathWrap: wrap_object=TMIN_l method=hybrid range=(1 2)
      PathWrap: wrap_object=INFSP_and_TMIN_hum_head_l method=hybrid range=(1 2)
      PathWrap: wrap_object=TMINhum_l method=hybrid range=(1 2)
    Thelen2003Muscle TMAJ_l: min_control=0 max_control=1 optimal_force=1 max_isometric_force=144
        optimal_fiber_length=0.1624 tendon_slack_length=0.02 pennation_angle_at_optimal=0.2792527
        max_contraction_velocity=0
      PathPoint TMAJ-P1_l: humerus_l (0.00959297 -0.0520469 0.00546496)
      PathPoint TMAJ-P2_l: scapula_l (-0.0985808 -0.099109 0.0559847)
      PathPoint TMAJ-P3_l: scapula_l (-0.100742 -0.104641 0.0683554)
      PathWrap: wrap_object=TMAJ_LAThum_l method=hybrid
      PathWrap: wrap_object=LAT_TMAJhh_l method=hybrid range=(1 2)
      PathWrap: wrap_object=LAT_TMAJ2hh_l method=hybrid
    Thelen2003Muscle PECM1_l: min_control=0 max_control=1 optimal_force=1 max_isometric_force=444.3
        optimal_fiber_length=0.1442 tendon_slack_length=0.0028 pennation_angle_at_optimal=0.296706
        max_contraction_velocity=0
      PathPoint PECM1-P1_l: humerus_l (0.0112277 -0.0402525 -0.00749153)
      MovingPathPoint default: humerus_l (0.0171333 -0.037 0.00337) x_coordinate=shoulder_elv_l
          y_coordinate=shoulder_elv_l z_coordinate=shoulder_elv_l
          x_location=PiecewiseLinearFunction(x=0 3.14159, y=0.01615 0.02205)
          y_location=PiecewiseLinearFunction(x=0 3.14159, y=-0.04045 -0.01975)
          z_location=PiecewiseLinearFunction(x=0 3.14159, y=0.00577 -0.00863)
      MovingPathPoint default: thorax (0.00636333 -0.00732333 -0.119273) x_coordinate=shoulder_elv_l
          y_coordinate=shoulder_elv_l z_coordinate=shoulder_elv_l
          x_location=PiecewiseLinearFunction(x=0 3.14159, y=0.00958 -0.00972)
          y_location=PiecewiseLinearFunction(x=0 3.14159, y=-0.01509 0.03151)
          z_location=PiecewiseLinearFunction(x=0 3.14159, y=-0.12664 -0.08244)
      PathPoint PECM1-P2_l: clavicle_l (0.00308305 -0.000124859 -0.0491079)
      PathWrap: wrap_object=Thorax method=hybrid
      PathWrap: wrap_object=PEC12hum_l method=hybrid range=(2 3)
      PathWrap: wrap_object=PEC1hh_l method=hybrid
    Thelen2003Muscle PECM2_l: min_control=0 max_control=1 optimal_force=1 max_isometric_force=658.3
        optimal_fiber_length=0.1385 tendon_slack_length=0.089 pennation_angle_at_optimal=0.4537856
        max_contraction_velocity=0
      PathPoint PECM2-P1_l: humerus_l (0.0122362 -0.0411938 -0.00753955)
      MovingPathPoint default: humerus_l (0.0155133 -0.04223 0.00447) x_coordinate=shoulder_elv_l
          y_coordinate=shoulder_elv_l z_coordinate=shoulder_elv_l
          x_location=PiecewiseLinearFunction(x=0 3.14159, y=0.01453 0.02043)
          y_location=PiecewiseLinearFunction(x=0 3.14159, y=-0.04568 -0.02498)
          z_location=PiecewiseLinearFunction(x=0 3.14159, y=0.00687 -0.00753)
      MovingPathPoint default: thorax (0.0203967 -0.03445 -0.123117) x_coordinate=shoulder_elv_l
          y_coordinate=shoulder_elv_l z_coordinate=shoulder_elv_l
          x_location=PiecewiseLinearFunction(x=0 3.14159, y=0.02018 0.02148)
          y_location=PiecewiseLinearFunction(x=0 3.14159, y=-0.04165 0.00155)
          z_location=PiecewiseLinearFunction(x=0 3.14159, y=-0.1269 -0.1042)
      PathPoint PECM2-P4_l: thorax (0.0296876 -0.0376688 -0.0932119)
      PathPoint PECM2-P5_l: thorax (0.0265949 -0.0432011 -0.0218119)
      PathWrap: wrap_object=Thorax method=hybrid
      PathWrap: wrap_object=PEC12hum_l method=hybrid range=(2 3)
      PathWrap: wrap_object=TMAJ_LAT_PEC_CORBhh_l method=hybrid
      PathWrap: wrap_object=PEC23hh_l method=hybrid
    Thelen2003Muscle PECM3_l: min_control=0 max_control=1 optimal_force=1 max_isometric_force=498.1
        optimal_fiber_length=0.1385 tendon_slack_length=0.132 pennation_angle_at_optimal=0.4363323
        max_contraction_velocity=0
      PathPoint PECM3-P1_l: humerus_l (0.0121881 -0.0420198 -0.00720339)
      MovingPathPoint default: humerus_l (0.0142392 -0.0496515 0.00936368) x_coordinate=shoulder_elv_l
          y_coordinate=shoulder_elv_l z_coordinate=shoulder_elv_l
          y_location=PiecewiseLinearFunction(x=0 3.13149, y=-0.05157 -0.040096)
        x_location: SimmSpline: x=(0 0.747517 3.14159) y=(0.01243 0.014912 0.01833)
        z_location: SimmSpline: x=(0 0.623056 2.29124 3.12533) y=(0.01807 0.008102 -0.000123 0.000324)
      MovingPathPoint default: thorax (0.02984 -0.0697393 -0.1151) x_coordinate=shoulder_elv_l
          y_coordinate=shoulder_elv_l z_coordinate=shoulder_elv_l
          x_location=PiecewiseLinearFunction(x=0 3.14159, y=0.02984 0.02984)
          z_location=PiecewiseLinearFunction(x=0 3.14159, y=-0.1151 -0.1151)
        y_location: SimmSpline: x=(0.0101016 1.59605 3.14159) y=(-0.070778 -0.059781 -0.0269)
      PathPoint PECM3-P4_l: thorax (0.0504237 -0.0808412 -0.0858164)
      PathPoint PECM3-P5_l: thorax (0.0549763 -0.111931 -0.0363723)
      PathWrap: wrap_object=Thorax method=hybrid
      PathWrap: wrap_object=PEC3hum_l method=hybrid range=(2 3)
      PathWrap: wrap_object=PEC23hh_l method=hybrid
    Thelen2003Muscle CORB_l: min_control=0 max_control=1 optimal_force=1 max_isometric_force=208.2
        optimal_fiber_length=0.0932 tendon_slack_length=0.097 pennation_angle_at_optimal=0.4712389
        max_contraction_velocity=0
      PathPoint CORB-P1_l: scapula_l (0.0120056 -0.0396379 0.0254712)
      PathPoint CORB-P2_l: scapula_l (0.00463898 -0.0668282 0.0150119)
      PathPoint CORB-P3_l: humerus_l (0.00713616 -0.144529 0.00751073)
      PathWrap: wrap_object=CORBhum_l method=hybrid
      PathWrap: wrap_object=TMAJ_LAT_PEC_CORBhh_l method=hybrid
    Thelen2003Muscle TRIlong_l: min_control=0 max_control=1 optimal_force=1 max_isometric_force=771.8
        optimal_fiber_length=0.134 tendon_slack_length=0.143 pennation_angle_at_optimal=0.2094395
        max_contraction_velocity=0
      PathPoint TRIlong-P1_l: scapula_l (-0.0438446 -0.0391192 0.0132254)
      PathPoint TRIlong-P2_l: humerus_l (-0.0260667 -0.109885 0.0063774)
      PathPoint TRIlong-P3_l: humerus_l (-0.0305808 -0.217418 0.0116887)
      PathPoint TRIlong-P4_l: humerus_l (-0.0167407 -0.256988 0.0116023)
      PathPoint TRIlong-P5_l: ulna_l (-0.0210339 0.0100463 0.000749153)
      PathWrap: wrap_object=TRI_l method=hybrid
      PathWrap: wrap_object=TRIlonghh_l method=hybrid
      PathWrap: wrap_object=TRIlongglen_l method=hybrid
    Thelen2003Muscle TRIlat_l: min_control=0 max_control=1 optimal_force=1 max_isometric_force=717.5
        optimal_fiber_length=0.1138 tendon_slack_length=0.098 pennation_angle_at_optimal=0.1570796
        max_contraction_velocity=0
      PathPoint TRIlat-P1_l: humerus_l (-0.0057531 -0.121459 -0.00411073)
      PathPoint TRIlat-P2_l: humerus_l (-0.022513 -0.139534 -0.00891299)
      PathPoint TRIlat-P3_l: humerus_l (-0.0305808 -0.217418 0.0116887)
      PathPoint TRIlat-P4_l: humerus_l (-0.0167407 -0.256988 0.0116023)
      PathPoint TRIlat-P5_l: ulna_l (-0.0210339 0.0100463 0.000749153)
      PathWrap: wrap_object=TRI_l method=hybrid
    Thelen2003Muscle TRImed_l: min_control=0 max_control=1 optimal_force=1 max_isometric_force=717.5
        optimal_fiber_length=0.1138 tendon_slack_length=0.0908 pennation_angle_at_optimal=0.1570796
        max_contraction_velocity=0
      PathPoint TRImed-P1_l: humerus_l (-0.00804859 -0.131534 0.00870169)
      PathPoint TRImed-P2_l: humerus_l (-0.0249814 -0.145403 0.0103729)
      PathPoint TRImed-P3_l: humerus_l (-0.0305808 -0.217418 0.0116887)
      PathPoint TRImed-P4_l: humerus_l (-0.0167407 -0.256988 0.0116023)
      PathPoint TRImed-P5_l: ulna_l (-0.0210339 0.0100463 0.000749153)
      PathWrap: wrap_object=TRI_l method=hybrid
    Thelen2003Muscle ANC_l: min_control=0 max_control=1 optimal_force=1 max_isometric_force=283.2
        optimal_fiber_length=0.027 tendon_slack_length=0.018 pennation_angle_at_optimal=0 max_contraction_velocity=0
      PathPoint ANC-P1_l: humerus_l (-0.00714576 -0.272375 -0.00943805)
      PathPoint ANC-P2_l: ulna_l (-0.0243186 -0.00119096 -0.00576271)
      PathWrap: wrap_object=ANC_l method=hybrid
    Thelen2003Muscle SUP_l: min_control=0 max_control=1 optimal_force=1 max_isometric_force=379.6
        optimal_fiber_length=0.033 tendon_slack_length=0.028 pennation_angle_at_optimal=0 max_contraction_velocity=0
      PathPoint SUP-P1_l: radius_l (0.0095661 -0.0585492 -0.000720339)
      PathPoint SUP-P2_l: radius_l (0.011535 -0.0496554 0.00102768)
      PathPoint SUP-P3_l: ulna_l (-0.0130621 -0.0325017 -0.0193339)
      PathWrap: wrap_object=SUP_l method=hybrid
    Thelen2003Muscle BIClong_l: min_control=0 max_control=1 optimal_force=1 max_isometric_force=525.1
        optimal_fiber_length=0.1157 tendon_slack_length=0.2783 pennation_angle_at_optimal=0 max_contraction_velocity=0
      PathPoint BIClong-P1_l: scapula_l (-0.0299949 -0.0225994 0.0125339)
      PathPoint BIClong-P2_l: scapula_l (-0.0211182 -0.0125723 0.00442767)
      PathPoint BIClong-P3_l: humerus_l (0.0204672 0.0172209 -0.00987345)
      PathPoint BIClong-P4_l: humerus_l (0.0228395 -0.00490791 -0.011535)
      PathPoint BIClong-P5_l: humerus_l (0.0129181 -0.027152 -0.00130621)
      PathPoint BIClong-P6_l: humerus_l (0.0102576 -0.0743006 0.00158475)
      PathPoint BIClong-P7_l: humerus_l (0.0163565 -0.116455 -0.000230508)
      PathPoint BIClong-P8_l: humerus_l (0.0218983 -0.168463 0.00605085)
      MovingPathPoint default: radius_l (0.00272316 -0.035 0.0135667) x_coordinate=pro_sup_l y_coordinate=pro_sup_l
          z_coordinate=pro_sup_l
        x_location: SimmSpline: x=(-1.57561 1.57823) y=(-0.0055 0.01096)
        y_location: PiecewiseLinearFunction: x=(-1.57561 0 1.57561) y=(-0.0282 -0.035 -0.0392)
        z_location: SimmSpline: x=(-1.57561 0.0866167 1.57561) y=(0.01 0.01358 0.01083)
      PathPoint BIClong-P11_l: radius_l (-0.0019209 -0.0360169 0.0019209)
      PathWrap: wrap_object=Elbow_BIC_BRD_l method=hybrid
      PathWrap: wrap_object=BIClong_l method=hybrid range=(2 5)
    Thelen2003Muscle BICshort_l: min_control=0 max_control=1 optimal_force=1 max_isometric_force=316.8
        optimal_fiber_length=0.1321 tendon_slack_length=0.2003 pennation_angle_at_optimal=0 max_contraction_velocity=0
      PathPoint BICshort-P1_l: scapula_l (0.0121785 -0.0377554 0.0252119)
      PathPoint BICshort-P2_l: scapula_l (0.00089322 -0.0643887 0.0153)
      PathPoint BICshort-P3_l: humerus_l (0.0107282 -0.0727638 0.0105746)
      PathPoint BICshort-P4_l: humerus_l (0.0163565 -0.116455 0.0103633)
      PathPoint BICshort-P5_l: humerus_l (0.0218983 -0.168463 0.00605085)
      MovingPathPoint BICshort-P6_l: radius_l (0.00272316 -0.035 0.0135667) x_coordinate=pro_sup_l
          y_coordinate=pro_sup_l z_coordinate=pro_sup_l
        x_location: SimmSpline: x=(-1.57561 1.57823) y=(-0.0055 0.01096)
        y_location: PiecewiseLinearFunction: x=(-1.57561 0 1.57561) y=(-0.0282 -0.035 -0.0392)
        z_location: SimmSpline: x=(-1.57561 0.0866167 1.57561) y=(0.01 0.01358 0.01083)
      PathPoint BICshort-P8_l: radius_l (-0.0019209 -0.0360169 0.0019209)
      PathWrap: wrap_object=Elbow_BIC_BRD_l method=hybrid
    Thelen2003Muscle BRA_l: min_control=0 max_control=1 optimal_force=1 max_isometric_force=1177.37
        optimal_fiber_length=0.0858 tendon_slack_length=0.0535 pennation_angle_at_optimal=0 max_contraction_velocity=0
      PathPoint BRA-P1_l: humerus_l (0.00653107 -0.167023 0.00345763)
      ConditionalPathPoint BRA-P2_l: humerus_l (0.018191 -0.274295 0.010613) range=(0 0.813149)
          coordinate=elbow_flexion_l
      ConditionalPathPoint BRA-P3_l: ulna_l (0.00478305 -0.0140514 -0.00122938) range=(0 0.813149)
          coordinate=elbow_flexion_l
      PathPoint BRA-P4_l: ulna_l (-0.00307345 -0.0229548 -0.000864407)
    Thelen2003Muscle BRD_l: min_control=0 max_control=1 optimal_force=1 max_isometric_force=276
        optimal_fiber_length=0.1726 tendon_slack_length=0.133 pennation_angle_at_optimal=0 max_contraction_velocity=0
      PathPoint BRD-P1_l: humerus_l (-0.00941243 -0.191735 -0.00214181)
      PathPoint BRD-P2_l: radius_l (0.0343554 -0.122381 -0.0222345)
      PathPoint BRD-P3_l: radius_l (0.0402429 -0.21226 -0.0215141)
      PathWrap: wrap_object=Elbow_BIC_BRD_l method=hybrid
    Thelen2003Muscle ECRL_l: min_control=0 max_control=1 optimal_force=1 max_isometric_force=337.3
        optimal_fiber_length=0.081 tendon_slack_length=0.244 pennation_angle_at_optimal=0 max_contraction_velocity=0
      PathPoint ECRL-P1_l: humerus_l (-0.0070113 -0.250582 -0.00874011)
      PathPoint ECRL-P2_l: radius_l (0.0306864 -0.129306 -0.026691)
      PathPoint ECRL-P3_l: radius_l (0.040752 -0.227473 -0.0347684)
      PathPoint ECRL-P4_l: hand_l (0.016491 -0.0203808 -0.00559943)
      PathWrap: wrap_object=Elbow_PT_ECRL_l method=hybrid
      PathWrap: wrap_object=ECRL_l method=hybrid
    Thelen2003Muscle ECRB_l: min_control=0 max_control=1 optimal_force=1 max_isometric_force=252.5
        optimal_fiber_length=0.0585 tendon_slack_length=0.2223 pennation_angle_at_optimal=0.1570796
        max_contraction_velocity=0
      PathPoint ECRB-P1_l: humerus_l (0.0129565 -0.278992 -0.0163085)
      PathPoint ECRB-P2_l: radius_l (0.0279011 -0.125685 -0.0229068)
      PathPoint ECRB-P3_l: radius_l (0.0340864 -0.219031 -0.037813)
      PathPoint ECRB-P4_l: hand_l (0.00480226 -0.0109107 -0.00816384)
      PathWrap: wrap_object=ECRB_l method=hybrid
    Thelen2003Muscle ECU_l: min_control=0 max_control=1 optimal_force=1 max_isometric_force=192.9
        optimal_fiber_length=0.0622 tendon_slack_length=0.2285 pennation_angle_at_optimal=0.0698132
        max_contraction_velocity=0
      PathPoint ECU-P1_l: humerus_l (0.000797175 -0.278099 -0.0180565)
      PathPoint ECU-P2_l: ulna_l (-0.0133599 -0.0307441 -0.0283045)
      PathPoint ECU-P3_l: ulna_l (-0.0163757 -0.0521333 -0.0275458)
      PathPoint ECU-P4_l: ulna_l (-0.0172209 -0.0919439 -0.0314836)
      PathPoint ECU-P5_l: radius_l (-0.013648 -0.217984 -0.0334333)
      PathPoint ECU-P6_l: hand_l (-0.0216198 -0.0134559 0.00122938)
      PathWrap: wrap_object=ECU_l method=hybrid
    Thelen2003Muscle FCR_l: min_control=0 max_control=1 optimal_force=1 max_isometric_force=407.9
        optimal_fiber_length=0.0628 tendon_slack_length=0.244 pennation_angle_at_optimal=0.0523599
        max_contraction_velocity=0
      PathPoint FCR-P1_l: humerus_l (0.00728023 -0.267063 0.0355847)
      PathPoint FCR-P2_l: radius_l (0.0202655 -0.210752 -0.00121977)
      PathPoint FCR-P3_l: hand_l (0.0107955 -0.0177107 0.00401469)
      PathWrap: wrap_object=Elbow_PT_ECRL_l method=hybrid
      PathWrap: wrap_object=FCR_l method=hybrid
    Thelen2003Muscle FCU_l: min_control=0 max_control=1 optimal_force=1 max_isometric_force=479.8
        optimal_fiber_length=0.0509 tendon_slack_length=0.265 pennation_angle_at_optimal=0.2094395
        max_contraction_velocity=0
      PathPoint FCU-P1_l: humerus_l (0.00210339 -0.266429 0.0372655)
      MovingPathPoint FCU-P2_l: radius_l (0.00949 -0.1841 -0.0005) x_coordinate=pro_sup_l y_coordinate=pro_sup_l
          z_coordinate=pro_sup_l
        x_location: SimmSpline: x=(-1.5708 0 1.5708) y=(0.00279 0.00949 0.01869)
        y_location: SimmSpline: x=(-1.5708 0 1.5708) y=(-0.1838 -0.1841 -0.1821)
        z_location: SimmSpline: x=(-1.5708 0 1.5708) y=(-0.0069 -0.0005 -0.0002)
      PathPoint FCU-P3_l: radius_l (0.0103921 -0.21444 -0.00930678)
      PathPoint FCU-P4_l: hand_l (-0.0195548 -0.016952 0.0072226)
      PathWrap: wrap_object=FCU_l method=hybrid
      PathWrap: wrap_object=Elbow_PT_ECRL_l method=hybrid
    Thelen2003Muscle PL_l: min_control=0 max_control=1 optimal_force=1 max_isometric_force=101
        optimal_fiber_length=0.0638 tendon_slack_length=0.2694 pennation_angle_at_optimal=0.06981317
        max_contraction_velocity=0
      PathPoint PL-P1_l: humerus_l (0.00438927 -0.264307 0.0371215)
      PathPoint PL-P2_l: radius_l (0.024309 -0.229692 0.00265085)
      PathPoint PL-P3_l: hand_l (0.00880734 -0.0182294 0.0168463)
      PathPoint PL-P4_l: hand_l (0.00218023 -0.0297356 -0.00473503)
      PathWrap: wrap_object=PL_l method=hybrid
      PathWrap: wrap_object=Elbow_PT_ECRL_l method=hybrid
    Thelen2003Muscle PT_l: min_control=0 max_control=1 optimal_force=1 max_isometric_force=557.2
        optimal_fiber_length=0.0492 tendon_slack_length=0.099 pennation_angle_at_optimal=0.1745329
        max_contraction_velocity=0
      PathPoint PT-P1_l: humerus_l (0.00345763 -0.264989 0.0350565)
      PathPoint PT-P2_l: ulna_l (0.00812542 -0.032396 0.0137537)
      MovingPathPoint PT-P3_l: ulna_l (0.01219 -0.06516 0.00219) x_coordinate=pro_sup_l y_coordinate=pro_sup_l
          z_coordinate=pro_sup_l
        x_location: PiecewiseLinearFunction: x=(-1.5708 1.5708) y=(0.01884 0.00554)
        y_location: SimmSpline: x=(-1.5708 1.5708) y=(-0.06086 -0.06946)
        z_location: SimmSpline: x=(-1.5708 1.5708) y=(-0.00506 0.00944)
      ConditionalPathPoint PT-P4_l: radius_l (0.0226667 -0.0897062 -0.00902825) range=(-1.5708 0.509636)
          coordinate=pro_sup_l
      PathPoint PT-P5_l: radius_l (0.0243955 -0.104497 -0.0190169)
      PathWrap: wrap_object=Elbow_PT_ECRL_l method=hybrid
    Thelen2003Muscle PQ_l: min_control=0 max_control=1 optimal_force=1 max_isometric_force=284.7
        optimal_fiber_length=0.0282 tendon_slack_length=0.005 pennation_angle_at_optimal=0.1745329
        max_contraction_velocity=0
      PathPoint PQ-P1_l: radius_l (0.0311667 -0.192071 -0.0188441)
      PathPoint PQ-P2_l: ulna_l (0.00185367 -0.201426 -0.0348836)
      PathWrap: wrap_object=PQ2_l method=hybrid
      PathWrap: wrap_object=PQ1_l method=hybrid
    Thelen2003Muscle FDSL_l: min_control=0 max_control=1 optimal_force=1 max_isometric_force=75.3
        optimal_fiber_length=0.0515 tendon_slack_length=0.3386 pennation_angle_at_optimal=0.08726646
        max_contraction_velocity=0
      PathPoint FDSL-P1_l: humerus_l (0.0040435 -0.265066 0.0371119)
      PathPoint FDSL-P2_l: radius_l (0.0132254 -0.179777 -0.00196893)
      PathPoint FDSL-P3_l: hand_l (-0.00225706 -0.0133791 0.0132158)
      PathPoint FDSL-P4_l: hand_l (-0.019161 -0.0411169 0.00712655)
      PathPoint FDSL-P5_l: hand_l (-0.0196316 -0.0574446 0.0180373)
      PathPoint FDSL-P6_l: hand_l (-0.0164525 -0.0695847 0.0264412)
      PathPoint FDSL-P7_l: hand_l (-0.0111028 -0.0698345 0.0351141)
      PathPoint FDSL-P8_l: hand_l (-0.0101712 -0.0698345 0.0364588)
      PathWrap: wrap_object=FDS_l method=hybrid
      PathWrap: wrap_object=Elbow_PT_ECRL_l method=hybrid
      PathWrap: wrap_object=_5rdmcp_FDS_l method=hybrid range=(4 5)
      PathWrap: wrap_object=Fifthpm_FDS_l method=hybrid range=(6 7)
    Thelen2003Muscle FDSR_l: min_control=0 max_control=1 optimal_force=1 max_isometric_force=171.2
        optimal_fiber_length=0.0736 tendon_slack_length=0.328 pennation_angle_at_optimal=0.06981317
        max_contraction_velocity=0
      PathPoint FDSR-P1_l: humerus_l (0.00460057 -0.267774 0.0358345)
      PathPoint FDSR-P2_l: radius_l (0.0150887 -0.179278 -0.00256441)
      PathPoint FDSR-P3_l: hand_l (-0.000787571 -0.0129085 0.0130525)
      PathPoint FDSR-P4_l: hand_l (-0.00938362 -0.0497418 -3.84181e-5)
      PathPoint FDSR-P5_l: hand_l (-0.0127068 -0.0640621 0.00979661)
      PathPoint FDSR-P6_l: hand_l (-0.00756836 -0.0770955 0.0240401)
      PathPoint FDSR-P7_l: hand_l (-0.00287175 -0.0780367 0.0326073)
      PathPoint FDSR-P8_l: hand_l (0.00059548 -0.0777196 0.0373807)
      PathWrap: wrap_object=FDS_l method=hybrid
      PathWrap: wrap_object=Elbow_PT_ECRL_l method=hybrid
      PathWrap: wrap_object=_4rdmcp_FDS_l method=hybrid range=(4 5)
      PathWrap: wrap_object=Fourthpm_FDS_l method=hybrid range=(6 7)
    Thelen2003Muscle FDSM_l: min_control=0 max_control=1 optimal_force=1 max_isometric_force=258.8
        optimal_fiber_length=0.0749 tendon_slack_length=0.295 pennation_angle_at_optimal=0.1221731
        max_contraction_velocity=0
      PathPoint FDSM-P1_l: ulna_l (-0.00642542 -0.0260571 0.00183446)
      PathPoint FDSM-P2_l: radius_l (0.018239 -0.179662 -0.00407232)
      PathPoint FDSM-P3_l: hand_l (0.00653107 -0.0132254 0.0134367)
      PathPoint FDSM-P4_l: hand_l (0.00452373 -0.0320023 0.0012678)
      PathPoint FDSM-P5_l: hand_l (0.00520565 -0.0543616 -0.000576271)
      PathPoint FDSM-P6_l: hand_l (0.00533051 -0.0693831 0.00324633)
      PathPoint FDSM-P7_l: hand_l (0.0112085 -0.0846158 0.0160395)
      PathPoint FDSM-P8_l: hand_l (0.0124955 -0.0851921 0.0285927)
      PathPoint FDSM-P9_l: hand_l (0.0150599 -0.082378 0.036161)
      PathWrap: wrap_object=FDS_l method=hybrid
      PathWrap: wrap_object=_3rdmcp_FDS_l method=hybrid range=(5 6)
      PathWrap: wrap_object=Thirdpm_FDS_l method=hybrid range=(7 8)
    Thelen2003Muscle FDSI_l: min_control=0 max_control=1 optimal_force=1 max_isometric_force=162.5
        optimal_fiber_length=0.0835 tendon_slack_length=0.275 pennation_angle_at_optimal=0.1047198
        max_contraction_velocity=10
      PathPoint FDSI-P1_l: ulna_l (-0.00649266 -0.0270751 0.00131582)
      PathPoint FDSI-P2_l: radius_l (0.0206017 -0.178865 -0.00530169)
      PathPoint FDSI-P3_l: hand_l (0.00853842 -0.0131198 0.0133215)
      PathPoint FDSI-P4_l: hand_l (0.0101904 -0.0363723 -0.000230508)
      PathPoint FDSI-P5_l: hand_l (0.0171153 -0.0490599 -0.00401469)
      PathPoint FDSI-P6_l: hand_l (0.0177588 -0.0700842 0.00360169)
      PathPoint FDSI-P7_l: hand_l (0.0257209 -0.0836938 0.0173266)
      PathPoint FDSI-P8_l: hand_l (0.0256153 -0.0839435 0.0257209)
      PathPoint FDSI-P9_l: hand_l (0.025548 -0.0829158 0.0278819)
      PathWrap: wrap_object=FDS_l method=hybrid
      PathWrap: wrap_object=_2rdmcp_FDS_l method=hybrid range=(5 6)
      PathWrap: wrap_object=Secondpm_FDS_l method=hybrid range=(7 8)
    Thelen2003Muscle FDPL_l: min_control=0 max_control=1 optimal_force=1 max_isometric_force=236.8
        optimal_fiber_length=0.0749 tendon_slack_length=0.2819 pennation_angle_at_optimal=0.1396263
        max_contraction_velocity=10
      PathPoint FDPL-P1_l: ulna_l (-0.00603164 -0.0308689 -0.00243955)
      PathPoint FDPL-P2_l: radius_l (0.0135328 -0.177837 -0.00826949)
      PathPoint FDPL-P3_l: hand_l (-0.000845198 -0.00986384 0.0114102)
      PathPoint FDPL-P4_l: hand_l (-0.0178164 -0.0446226 0.00704011)
      PathPoint FDPL-P5_l: hand_l (-0.017365 -0.0561 0.0149831)
      PathPoint FDPL-P6_l: hand_l (-0.0137153 -0.0700073 0.0257689)
      PathPoint FDPL-P7_l: hand_l (-0.00883616 -0.0718706 0.0353831)
      PathPoint FDPL-P8_l: hand_l (-0.00299661 -0.0711215 0.0400028)
      PathPoint FDPL-P9_l: hand_l (0.00428362 -0.0677983 0.0447282)
      PathWrap: wrap_object=FDP_l method=hybrid
      PathWrap: wrap_object=_5rdmcp_FDP_l method=hybrid range=(4 5)
      PathWrap: wrap_object=Fifthpm_FDP_l method=hybrid range=(6 7)
      PathWrap: wrap_object=Fifthmd_flex_l method=hybrid range=(8 9)
    Thelen2003Muscle FDPR_l: min_control=0 max_control=1 optimal_force=1 max_isometric_force=172.9
        optimal_fiber_length=0.0798 tendon_slack_length=0.2915 pennation_angle_at_optimal=0.1221731
        max_contraction_velocity=0
      PathPoint FDPR-P1_l: ulna_l (-0.00482147 -0.0324056 -0.00262203)
      PathPoint FDPR-P2_l: radius_l (0.0151751 -0.178923 -0.00771243)
      PathPoint FDPR-P3_l: hand_l (0.00101808 -0.0113045 0.0113718)
      PathPoint FDPR-P4_l: hand_l (-0.00821186 -0.0532282 -0.000845198)
      PathPoint FDPR-P5_l: hand_l (-0.0103633 -0.0632746 0.00784689)
      PathPoint FDPR-P6_l: hand_l (-0.00525367 -0.0783153 0.0216678)
      PathPoint FDPR-P7_l: hand_l (-0.000537853 -0.0790452 0.0323384)
      PathPoint FDPR-P8_l: hand_l (0.00584915 -0.0752706 0.040704)
      PathPoint FDPR-P9_l: hand_l (0.0116311 -0.0708814 0.0466588)
      PathWrap: wrap_object=FDP_l method=hybrid
      PathWrap: wrap_object=_4rdmcp_FDP_l method=hybrid range=(4 5)
      PathWrap: wrap_object=Fourthpm_FDP_l method=hybrid range=(6 7)
      PathWrap: wrap_object=Fourthmd_flex_l method=hybrid range=(8 9)
    Thelen2003Muscle FDPM_l: min_control=0 max_control=1 optimal_force=1 max_isometric_force=212.4
        optimal_fiber_length=0.0835 tendon_slack_length=0.303 pennation_angle_at_optimal=0.1047198
        max_contraction_velocity=0
      PathPoint FDPM-P1_l: ulna_l (-0.00501356 -0.0319542 -0.00201695)
      PathPoint FDPM-P2_l: radius_l (0.0183062 -0.179067 -0.00753955)
      PathPoint FDPM-P3_l: hand_l (0.00321751 -0.0122938 0.0109876)
      PathPoint FDPM-P4_l: hand_l (0.00290056 -0.0331068 0.00586836)
      PathPoint FDPM-P5_l: hand_l (0.00242034 -0.0563113 -0.00117175)
      PathPoint FDPM-P6_l: hand_l (0.00273729 -0.0670876 0.0012774)
      PathPoint FDPM-P7_l: hand_l (0.0082887 -0.0843179 0.0174322)
      PathPoint FDPM-P8_l: hand_l (0.00962373 -0.0841932 0.0284678)
      PathPoint FDPM-P9_l: hand_l (0.0156842 -0.0783441 0.042596)
      PathPoint FDPM-P10_l: hand_l (0.018335 -0.0735994 0.050222)
      PathWrap: wrap_object=FDP_l method=hybrid
      PathWrap: wrap_object=_3rdmcp_FDP_l method=hybrid range=(5 6)
      PathWrap: wrap_object=Thirdpm_FDP_l method=hybrid range=(7 8)
      PathWrap: wrap_object=Thirdmd_flex_l method=hybrid range=(9 10)
    Thelen2003Muscle FDPI_l: min_control=0 max_control=1 optimal_force=1 max_isometric_force=197.3
        optimal_fiber_length=0.0749 tendon_slack_length=0.3015 pennation_angle_at_optimal=0.1221731
        max_contraction_velocity=0
      PathPoint FDPI-P1_l: ulna_l (-0.00621412 -0.030504 -0.00268927)
      PathPoint FDPI-P2_l: radius_l (0.0199774 -0.17826 -0.00878814)
      PathPoint FDPI-P3_l: hand_l (0.00860565 -0.0112181 0.0116407)
      PathPoint FDPI-P4_l: hand_l (0.0184599 -0.0532282 -0.00420678)
      PathPoint FDPI-P5_l: hand_l (0.0199102 -0.0674333 0.00274689)
      PathPoint FDPI-P6_l: hand_l (0.0278915 -0.0824836 0.0171153)
      PathPoint FDPI-P7_l: hand_l (0.0280836 -0.0832904 0.0265949)
      PathPoint FDPI-P8_l: hand_l (0.0279876 -0.0790932 0.0382164)
      PathPoint FDPI-P9_l: hand_l (0.0273441 -0.0746367 0.0457751)
      PathWrap: wrap_object=FDP method=hybrid
      PathWrap: wrap_object=_2rdmcp_FDP method=hybrid range=(4 5)
      PathWrap: wrap_object=Secondpm_FDP method=hybrid range=(6 7)
      PathWrap: wrap_object=Secondmd_flex method=hybrid range=(8 9)
    Thelen2003Muscle EDCL_l: min_control=0 max_control=1 optimal_force=1 max_isometric_force=39.4
        optimal_fiber_length=0.065 tendon_slack_length=0.335 pennation_angle_at_optimal=0.03490659
        max_contraction_velocity=0
      PathPoint EDCL-P1_l: humerus_l (-0.000384181 -0.276908 -0.0179605)
      MovingPathPoint EDCL-P2_l: radius_l (0.0013 -0.03888 -0.01405) x_coordinate=pro_sup_l y_coordinate=pro_sup_l
          z_coordinate=pro_sup_l
        x_location: SimmSpline: x=(-1.5708 0 1.5708) y=(0.0121 0.0013 -0.0095)
        y_location: SimmSpline: x=(-1.5708 0 1.5708) y=(-0.04018 -0.03888 -0.03508)
        z_location: SimmSpline: x=(-1.5708 0 1.5708) y=(-0.01055 -0.01405 -0.01316)
      PathPoint EDCL-P3_l: radius_l (0.00953729 -0.214219 -0.0347492)
      PathPoint EDCL-P4_l: hand_l (-0.0236655 -0.0422791 -0.00162316)
      PathPoint EDCL-P5_l: hand_l (-0.0228684 -0.0454678 -0.000739546)
      PathPoint EDCL-P6_l: hand_l (-0.0230028 -0.0635147 0.00961412)
      PathPoint EDCL-P7_l: hand_l (-0.0172689 -0.0753667 0.0260379)
      PathPoint EDCL-P8_l: hand_l (-0.0113141 -0.0756548 0.0362955)
      PathPoint EDCL-P9_l: hand_l (-0.00144068 -0.0728599 0.0440463)
      PathPoint EDCL-P10_l: hand_l (0.00193051 -0.071909 0.0460441)
      PathWrap: wrap_object=EDCL_l method=hybrid range=(3 4)
      PathWrap: wrap_object=_5rdmcp_ext_l method=hybrid range=(5 6)
      PathWrap: wrap_object=Fifthpm_ext_l method=hybrid range=(7 8)
      PathWrap: wrap_object=Fifthmd_ext_l method=hybrid range=(9 10)
    Thelen2003Muscle EDCR_l: min_control=0 max_control=1 optimal_force=1 max_isometric_force=109.2
        optimal_fiber_length=0.0626 tendon_slack_length=0.365 pennation_angle_at_optimal=0.05235988
        max_contraction_velocity=0
      PathPoint EDCR-P1_l: humerus_l (-0.00149831 -0.277916 -0.0171153)
      MovingPathPoint EDCR-P2_l: radius_l (0.0026 -0.03991 -0.01552) x_coordinate=pro_sup_l y_coordinate=pro_sup_l
          z_coordinate=pro_sup_l
        x_location: SimmSpline: x=(-1.5708 0 1.5708) y=(0.0134 0.0026 -0.0082)
        y_location: SimmSpline: x=(-1.5708 0 1.5708) y=(-0.04121 -0.03991 -0.03611)
        z_location: SimmSpline: x=(-1.5708 0 1.5708) y=(-0.01202 -0.01552 -0.01463)
      PathPoint EDCR-P3_l: radius_l (0.00847119 -0.214815 -0.0411458)
      PathPoint EDCR-P4_l: hand_l (-0.0150215 -0.0533051 -0.00897062)
      PathPoint EDCR-P5_l: hand_l (-0.0137056 -0.0558887 -0.0111508)
      PathPoint EDCR-P6_l: hand_l (-0.0151751 -0.0693062 0.0040435)
      PathPoint EDCR-P7_l: hand_l (-0.00792373 -0.0838955 0.0217062)
      PathPoint EDCR-P8_l: hand_l (-0.00261243 -0.0845774 0.0327418)
      PathPoint EDCR-P9_l: hand_l (0.00732825 -0.0770859 0.0447379)
      PathPoint EDCR-P10_l: hand_l (0.0102672 -0.0750017 0.0474559)
      PathWrap: wrap_object=EDCR_l method=hybrid
      PathWrap: wrap_object=_4rdmcp_ext_l method=hybrid range=(5 6)
      PathWrap: wrap_object=Fourthpm_ext_l method=hybrid range=(7 8)
      PathWrap: wrap_object=Fourthmd_ext_l method=hybrid range=(9 10)
    Thelen2003Muscle EDCM_l: min_control=0 max_control=1 optimal_force=1 max_isometric_force=94.4
        optimal_fiber_length=0.0724 tendon_slack_length=0.365 pennation_angle_at_optimal=0.05235988
        max_contraction_velocity=0
      PathPoint EDCM-P1_l: humerus_l (0.000489831 -0.278377 -0.0187192)
      MovingPathPoint EDCM-P2_l: radius_l (0.00316 -0.03948 -0.01528) x_coordinate=pro_sup_l y_coordinate=pro_sup_l
          z_coordinate=pro_sup_l
        x_location: SimmSpline: x=(-1.5708 0 1.5708) y=(0.01396 0.00316 -0.00764)
        y_location: SimmSpline: x=(-1.5708 0 1.5708) y=(-0.04078 -0.03948 -0.03568)
        z_location: SimmSpline: x=(-1.5708 0 1.5708) y=(-0.01178 -0.01528 -0.01439)
      PathPoint EDCM-P3_l: radius_l (0.0138305 -0.214402 -0.0405599)
      PathPoint EDCM-P4_l: hand_l (0.000374576 -0.0506542 -0.0143203)
      PathPoint EDCM-P5_l: hand_l (-0.000835593 -0.0535356 -0.0139458)
      PathPoint EDCM-P6_l: hand_l (0.00178644 -0.0741277 -0.0057339)
      PathPoint EDCM-P7_l: hand_l (0.00967175 -0.0894469 0.0170384)
      PathPoint EDCM-P8_l: hand_l (0.0126876 -0.0918 0.0293514)
      PathPoint EDCM-P9_l: hand_l (0.0178356 -0.0818785 0.0457079)
      PathPoint EDCM-P10_l: hand_l (0.0197469 -0.0767689 0.0512977)
      PathPoint EDCM-P11_l: hand_l (0.0210819 -0.0739644 0.0543904)
      PathWrap: wrap_object=EDCM_l method=hybrid range=(1 4)
      PathWrap: wrap_object=Thirdmd_ext_l method=hybrid range=(9 10)
      PathWrap: wrap_object=Thirdpm_ext_l method=hybrid range=(7 8)
      PathWrap: wrap_object=_3rdmcp_ext_l method=hybrid range=(5 6)
    Thelen2003Muscle EDCI_l: min_control=0 max_control=1 optimal_force=1 max_isometric_force=48.8
        optimal_fiber_length=0.07 tendon_slack_length=0.365 pennation_angle_at_optimal=0.05235988
        max_contraction_velocity=0
      PathPoint EDCI-P1_l: humerus_l (0.000624294 -0.277551 -0.0179508)
      MovingPathPoint EDCI-P2_l: radius_l (0.00228 -0.03918 -0.01483) x_coordinate=pro_sup_l y_coordinate=pro_sup_l
          z_coordinate=pro_sup_l
        x_location: SimmSpline: x=(-1.5708 0 1.5708) y=(0.01308 0.00228 -0.00852)
        y_location: SimmSpline: x=(-1.5708 0 1.5708) y=(-0.04048 -0.03918 -0.03538)
        z_location: SimmSpline: x=(-1.5708 0 1.5708) y=(-0.01133 -0.01483 -0.01394)
      PathPoint EDCI-P3_l: radius_l (0.0147237 -0.214315 -0.0403006)
      PathPoint EDCI-P4_l: hand_l (0.0148198 -0.0449492 -0.0157418)
      PathPoint EDCI-P5_l: hand_l (0.0182198 -0.054304 -0.0138113)
      PathPoint EDCI-P6_l: hand_l (0.0191514 -0.0737435 -0.00570508)
      PathPoint EDCI-P7_l: hand_l (0.0282853 -0.0879966 0.0119576)
      PathPoint EDCI-P8_l: hand_l (0.0299757 -0.0897925 0.0279011)
      PathPoint EDCI-P9_l: hand_l (0.0289384 -0.0815136 0.0409921)
      PathPoint EDCI-P10_l: hand_l (0.0281316 -0.0778254 0.047696)
      PathWrap: wrap_object=EDCI_l method=hybrid range=(3 4)
      PathWrap: wrap_object=_2rdmcp_ext_l method=hybrid range=(5 6)
      PathWrap: wrap_object=Secondpm_ext_l method=hybrid range=(7 8)
      PathWrap: wrap_object=Secondmd_ext_l method=hybrid range=(9 10)
    Thelen2003Muscle EDM_l: min_control=0 max_control=1 optimal_force=1 max_isometric_force=72.4
        optimal_fiber_length=0.0675 tendon_slack_length=0.335 pennation_angle_at_optimal=0.05235988
        max_contraction_velocity=0
      PathPoint EDM-P1_l: humerus_l (0.000854802 -0.277753 -0.0177395)
      PathPoint EDM-P2_l: ulna_l (-0.0093836 -0.0375249 -0.0296206)
      PathPoint EDM-P3_l: ulna_l (-0.0072514 -0.0794006 -0.0350181)
      PathPoint EDM-P4_l: radius_l (0.00436045 -0.217456 -0.0353254)
      PathPoint EDM-P5_l: hand_l (-0.0197757 -0.00991186 -0.00357288)
      PathPoint EDM-P6_l: hand_l (-0.0246164 -0.0453525 -0.000220904)
      PathPoint EDM-P7_l: hand_l (-0.0244819 -0.062535 0.0105458)
      PathPoint EDM-P8_l: hand_l (-0.0185655 -0.0750113 0.0261051)
      PathPoint EDM-P9_l: hand_l (-0.0129277 -0.0757989 0.0374)
      PathPoint EDM-P10_l: hand_l (-0.00207458 -0.0722356 0.0440751)
      PathPoint EDM-P11_l: hand_l (0.0012678 -0.0705452 0.0461305)
      PathWrap: wrap_object=EDM_l method=hybrid range=(4 5)
      PathWrap: wrap_object=Fifthmd_ext_l method=hybrid range=(10 11)
      PathWrap: wrap_object=Fifthpm_ext_l method=hybrid range=(8 9)
      PathWrap: wrap_object=_5rdmcp_ext_l method=hybrid range=(6 7)
    Thelen2003Muscle EIP_l: min_control=0 max_control=1 optimal_force=1 max_isometric_force=47.3
        optimal_fiber_length=0.0589 tendon_slack_length=0.21 pennation_angle_at_optimal=0.1047198
        max_contraction_velocity=0
      PathPoint EIP-P1_l: ulna_l (-0.00378418 -0.159934 -0.0353638)
      PathPoint EIP-P2_l: ulna_l (0.00164237 -0.167781 -0.0388887)
      PathPoint EIP-P3_l: radius_l (0.0103345 -0.21882 -0.035191)
      PathPoint EIP-P4_l: hand_l (0.00372655 -0.0214565 -0.0113718)
      PathPoint EIP-P5_l: hand_l (0.0162605 -0.0541695 -0.0132254)
      PathPoint EIP-P6_l: hand_l (0.0166638 -0.073878 -0.00558023)
      PathPoint EIP-P7_l: hand_l (0.0265565 -0.0894565 0.0145124)
      PathPoint EIP-P8_l: hand_l (0.0276514 -0.0906379 0.0271136)
      PathPoint EIP-P9_l: hand_l (0.027565 -0.0818688 0.0412514)
      PathPoint EIP-P10_l: hand_l (0.0272192 -0.0747712 0.0528345)
      PathWrap: wrap_object=Extensor_ellipse_l method=hybrid
      PathWrap: wrap_object=_2rdmcp_ext_l method=hybrid range=(5 6)
      PathWrap: wrap_object=Secondpm_ext_l method=hybrid range=(7 8)
      PathWrap: wrap_object=Secondmd_ext_l method=hybrid range=(9 10)
    Thelen2003Muscle EPL_l: min_control=0 max_control=1 optimal_force=1 max_isometric_force=88.3
        optimal_fiber_length=0.054 tendon_slack_length=0.2305 pennation_angle_at_optimal=0.1047198
        max_contraction_velocity=0
      PathPoint EPL-P1_l: ulna_l (-0.0135616 -0.0932215 -0.0283525)
      PathPoint EPL-P2_l: radius_l (0.00119096 -0.131275 -0.0218023)
      PathPoint EPL-P3_l: radius_l (0.0259514 -0.21007 -0.0367661)
      PathPoint EPL-P4_l: radius_l (0.0324825 -0.218541 -0.044248)
      PathPoint EPL-P5_l: radius_l (0.0406655 -0.228309 -0.0400797)
      PathPoint EPL-P6_l: hand_l (0.0233198 0.000134463 -0.00583955)
      PathPoint EPL-P7_l: hand_l (0.0224554 -0.00880734 0.000374576)
      PathPoint EPL-P8_l: hand_l (0.0279011 -0.0137056 0.00469661)
      PathPoint EPL-P9_l: hand_l (0.0423944 -0.0328186 0.0174226)
      PathPoint EPL-P10_l: hand_l (0.0467452 -0.0446226 0.0238864)
      PathPoint EPL-P11_l: hand_l (0.0456311 -0.0673277 0.0362475)
      PathPoint EPL-P12_l: hand_l (0.0385237 -0.0726582 0.0411362)
      PathWrap: wrap_object=MPthumb_l method=hybrid
    Thelen2003Muscle EPB_l: min_control=0 max_control=1 optimal_force=1 max_isometric_force=46
        optimal_fiber_length=0.0675 tendon_slack_length=0.1155 pennation_angle_at_optimal=0.122173
        max_contraction_velocity=0
      PathPoint EPB-P1_l: radius_l (0.0184791 -0.141138 -0.020304)
      PathPoint EPB-P2_l: radius_l (0.0218599 -0.152299 -0.025596)
      PathPoint EPB-P3_l: radius_l (0.0367949 -0.18942 -0.0368237)
      PathPoint EPB-P4_l: radius_l (0.0502797 -0.226772 -0.0259226)
      PathPoint EPB-P5_l: hand_l (0.0299949 0.00245876 0.00314068)
      PathPoint EPB-P6_l: hand_l (0.0285446 -0.00762599 0.0137921)
      PathPoint EPB-P7_l: hand_l (0.0424712 -0.0316949 0.0232621)
      PathPoint EPB-P8_l: hand_l (0.0434893 -0.0459576 0.0306)
      PathWrap: wrap_object=MPthumb_l method=hybrid
    Thelen2003Muscle FPL_l: min_control=0 max_control=1 optimal_force=1 max_isometric_force=201
        optimal_fiber_length=0.0552 tendon_slack_length=0.197 pennation_angle_at_optimal=0.1221731
        max_contraction_velocity=0
      PathPoint FPL-P1_l: radius_l (0.00932597 -0.0908395 -0.0169904)
      PathPoint FPL-P2_l: radius_l (0.0159243 -0.129901 -0.0183927)
      PathPoint FPL-P3_l: radius_l (0.0179508 -0.172228 -0.0190938)
      PathPoint FPL-P4_l: radius_l (0.0364972 -0.222546 -0.0151751)
      MovingPathPoint FPL-P5_l: hand_l (0.01869 0.00882 0.01547) x_coordinate=flexion_l y_coordinate=flexion_l
          z_coordinate=flexion_l
        x_location: SimmSpline: x=(-1.22173 0 1.22173) y=(0.01869 0.01869 0.01549)
        y_location: SimmSpline: x=(-1.22173 0 1.22173) y=(0.00882 0.00882 -0.00078)
        z_location: SimmSpline: x=(-1.22173 0 1.22173) y=(0.01547 0.01547 0.02087)
      PathPoint FPL-P6_l: hand_l (0.011948 -0.0211972 0.0200638)
      PathPoint FPL-P7_l: hand_l (0.015761 -0.0251734 0.0213316)
      PathPoint FPL-P8_l: hand_l (0.0235983 -0.0316373 0.0214853)
      PathPoint FPL-P9_l: hand_l (0.027152 -0.052652 0.0293418)
      PathPoint FPL-P10_l: hand_l (0.0337215 -0.0626119 0.0360073)
      PathPoint FPL-P11_l: hand_l (0.0339328 -0.0735322 0.0395514)
      PathWrap: wrap_object=FPL_l method=hybrid
      PathWrap: wrap_object=IPthumb_l method=hybrid range=(10 11)
      PathWrap: wrap_object=MPthumb_l method=hybrid
    Thelen2003Muscle APL_l: min_control=0 max_control=1 optimal_force=1 max_isometric_force=116.7
        optimal_fiber_length=0.0713 tendon_slack_length=0.1295 pennation_angle_at_optimal=0.1396263
        max_contraction_velocity=0
      PathPoint APL-P1_l: radius_l (0.0110836 -0.091022 -0.0161452)
      PathPoint APL-P2_l: radius_l (0.0291017 -0.134175 -0.0336831)
      PathPoint APL-P3_l: radius_l (0.0383508 -0.154364 -0.0326554)
      PathPoint APL-P4_l: radius_l (0.0422311 -0.171393 -0.0301006)
      PathPoint APL-P5_l: radius_l (0.0528729 -0.221711 -0.0227435)
      MovingPathPoint APL-P6_l: hand_l (0.03385 0.00634 0.00745) x_coordinate=flexion_l y_coordinate=flexion_l
          z_coordinate=flexion_l
        x_location: SimmSpline: x=(-1.22173 0 1.22173) y=(0.03385 0.03385 0.03135)
        y_location: SimmSpline: x=(-1.22173 0 1.22173) y=(0.00634 0.00634 0.00534)
        z_location: SimmSpline: x=(-1.22173 0 1.22173) y=(0.00745 0.00745 0.01245)
      PathPoint APL-P7_l: hand_l (0.0248469 0.00196893 0.0158475)
      PathPoint APL-P8_l: hand_l (0.0276418 -0.00647345 0.0179605)
      PathPoint APL-P9_l: hand_l (0.0295435 -0.015204 0.0181045)
